<?xml version="1.0"?>
<?xml-stylesheet type="text/xsl" href="http://jsbsim.sourceforge.net/JSBSim.xsl"?>
<fdm_config name="General Dynamics F-16A" version="2.0" release="PRODUCTION"
 xmlns:xsi="http://www.w3.org/2001/XMLSchema-instance"
 xsi:noNamespaceSchemaLocation="http://jsbsim.sourceforge.net/JSBSim.xsd">

 <fileheader>
  <author> Erik Hofman </author>
  <filecreationdate> 2001-12-28 </filecreationdate>
  <version> $Revision: 1.93 $ </version>
  <license>
   <licenseName>GPL (General Public License)</licenseName>
   <licenseURL>http://www.gnu.org/licenses/gpl.html</licenseURL>
  </license>
  <description> Models an F-16A Block-32 (Basic US configuration) </description>
  <note>
   This model was created using data that is, or has been, publically
   available by means of technical reports, textbooks, image graphs or
   published code. This aircraft description file is in no way related
   to the manufacturer of the real aircraft.
   Neither the name of (any of) the authors nor the names of (any of) the
   manufacturers may be used to endorse or promote products derived from
   this file.

   The data is provided ''as is'' and any express or implied
   warranties, including, but not limitted to the implied warranties of
   merchantability and fitness for a particular purpose are disclaimed.
  </note>
  <reference refID="ISBN 0-7232-3458-2" author="William Green" title="General Dynamics F-16 Dash-1" date="1987"/>
  <reference refID="NASA TP-1538" author="" title="wind tunnel data" date="12/1979"/>
  <reference refID="None" author="Richard Murray" title="http://www.cds.caltech.edu/~murray/projects/afosr95-vehicles/models/f16/" date="n/a"/>
  <reference refID="H-1999" author="NASA" title="Dynamic ground effects flight test of an F-15 aircraft" date="n/a"/>
  <reference refID="H-2177" author="NASA" title="Dynamic ground effect for a Cranked Arrow Wing Airplane" date="n/a"/>
  <reference refID="None" author="n/a" title="http://www.codeonemagazine.com/archives/1991/articles/jul_91/july2a_91.html" date="n/a"/>
 </fileheader>

 <metrics>
  <wingarea unit="FT2"> 300 </wingarea>
  <wingspan unit="FT"> 30 </wingspan>
  <chord unit="FT"> 11.32 </chord>
  <htailarea unit="FT2"> 63.7 </htailarea>
  <htailarm unit="FT"> 16.46 </htailarm>
  <vtailarea unit="FT2"> 54.75 </vtailarea>
  <vtailarm unit="FT"> 0 </vtailarm>
  <location name="AERORP" unit="IN">
   <x> -198.4336 </x><!-- -198.4336 = static margin of -0.04 -->
   <y> 0 </y>
   <z> 0 </z>
  </location>
  <location name="EYEPOINT" unit="IN">
   <x> -336.2 </x>
   <y> 0 </y>
   <z> 29.5 </z>
  </location>
  <location name="VRP" unit="IN">
   <x> -180 </x>
   <y> 0 </y>
   <z> 0 </z>
  </location>
 </metrics>

 <mass_balance>
  <ixx unit="SLUG*FT2"> 9496 </ixx>
  <iyy unit="SLUG*FT2"> 55814 </iyy>
  <izz unit="SLUG*FT2"> 63100 </izz>
  <ixy unit="SLUG*FT2"> 0 </ixy>
  <ixz unit="SLUG*FT2"> 982 </ixz>
  <iyz unit="SLUG*FT2"> 0 </iyz>
  <emptywt unit="LBS"> 17400 </emptywt>
  <location name="CG" unit="IN">
   <x> -193 </x>
   <y> 0 </y>
   <z> 0 </z>
  </location>
  <pointmass name="Pilot">
   <weight unit="LBS"> 0 </weight>
   <location name="POINTMASS" unit="IN">
    <x> -336.2 </x>
    <y> 0 </y>
    <z> 0 </z>
   </location>
  </pointmass>
 </mass_balance>

 <ground_reactions>
  <contact type="BOGEY" name="NOSE_LG">
   <location unit="IN">
    <x> -299.6 </x>
    <y> 0 </y>
    <z> -72 </z>
   </location>
   <static_friction> 0.8 </static_friction>
   <dynamic_friction> 0.5 </dynamic_friction>
   <rolling_friction> 0.02 </rolling_friction>
   <spring_coeff unit="LBS/FT"> 17250 </spring_coeff>
   <damping_coeff unit="LBS/FT/SEC"> 4250 </damping_coeff>
   <max_steer unit="DEG"> 80 </max_steer>
   <brake_group> NOSE </brake_group>
   <retractable>1</retractable>
  </contact>
  <contact type="BOGEY" name="LEFT_MLG">
   <location unit="IN">
    <x> -158.6 </x>
    <y> -48 </y>
    <z> -71.6 </z>
   </location>
   <static_friction> 0.8 </static_friction>
   <dynamic_friction> 0.5 </dynamic_friction>
   <rolling_friction> 0.02 </rolling_friction>
   <spring_coeff unit="LBS/FT"> 37500 </spring_coeff>
   <damping_coeff unit="LBS/FT/SEC"> 7500 </damping_coeff>
   <max_steer unit="DEG"> 0.0 </max_steer>
   <brake_group> LEFT </brake_group>
   <retractable>1</retractable>
  </contact>
  <contact type="BOGEY" name="RIGHT_MLG">
   <location unit="IN">
    <x> -158.6 </x>
    <y> 48 </y>
    <z> -71.6 </z>
   </location>
   <static_friction> 0.8 </static_friction>
   <dynamic_friction> 0.5 </dynamic_friction>
   <rolling_friction> 0.02 </rolling_friction>
   <spring_coeff unit="LBS/FT"> 37500 </spring_coeff>
   <damping_coeff unit="LBS/FT/SEC"> 7500 </damping_coeff>
   <max_steer unit="DEG"> 0.0 </max_steer>
   <brake_group> RIGHT </brake_group>
   <retractable>1</retractable>
  </contact>
  <contact type="STRUCTURE" name="LEFT_WT">
   <location unit="IN">
    <x> -121.3 </x>
    <y> -189 </y>
    <z> 0 </z>
   </location>
   <static_friction> 0.2 </static_friction>
   <dynamic_friction> 0.2 </dynamic_friction>
   <rolling_friction> 0.2 </rolling_friction>
   <spring_coeff unit="LBS/FT"> 10000 </spring_coeff>
   <damping_coeff unit="LBS/FT/SEC"> 2000 </damping_coeff>
  </contact>
  <contact type="STRUCTURE" name="RIGHT_WT">
   <location unit="IN">
    <x> -121.3 </x>
    <y> 189 </y>
    <z> 0 </z>
   </location>
   <static_friction> 0.2 </static_friction>
   <dynamic_friction> 0.2 </dynamic_friction>
   <rolling_friction> 0.2 </rolling_friction>
   <spring_coeff unit="LBS/FT"> 10000 </spring_coeff>
   <damping_coeff unit="LBS/FT/SEC"> 2000 </damping_coeff>
  </contact>
  <contact type="STRUCTURE" name="TOP_VS">
   <location unit="IN">
    <x> -27.2 </x>
    <y> 0 </y>
    <z> 123.2 </z>
   </location>
   <static_friction> 0.2 </static_friction>
   <dynamic_friction> 0.2 </dynamic_friction>
   <rolling_friction> 0.2 </rolling_friction>
   <spring_coeff unit="LBS/FT"> 10000 </spring_coeff>
   <damping_coeff unit="LBS/FT/SEC"> 2000 </damping_coeff>
  </contact>
  <contact type="STRUCTURE" name="LEFT_VFT">
   <location unit="IN">
    <x> -97.6 </x>
    <y> -24.8 </y>
    <z> -52 </z>
   </location>
   <static_friction> 0.2 </static_friction>
   <dynamic_friction> 0.2 </dynamic_friction>
   <rolling_friction> 0.2 </rolling_friction>
   <spring_coeff unit="LBS/FT"> 200 </spring_coeff>
   <damping_coeff unit="LBS/FT/SEC"> 5000 </damping_coeff>
  </contact>
  <contact type="STRUCTURE" name="RIGHT_VFT">
   <location unit="IN">
    <x> -97.6 </x>
    <y> 24.8 </y>
    <z> -52 </z>
   </location>
   <static_friction> 0.2 </static_friction>
   <dynamic_friction> 0.2 </dynamic_friction>
   <rolling_friction> 0.2 </rolling_friction>
   <spring_coeff unit="LBS/FT"> 200 </spring_coeff>
   <damping_coeff unit="LBS/FT/SEC"> 5000 </damping_coeff>
  </contact>
  <contact type="STRUCTURE" name="INTAKE">
   <location unit="IN">
    <x> -322.4 </x>
    <y> 0 </y>
    <z> -36.6 </z>
   </location>
   <static_friction> 0.2 </static_friction>
   <dynamic_friction> 0.2 </dynamic_friction>
   <rolling_friction> 0.2 </rolling_friction>
   <spring_coeff unit="LBS/FT"> 10000 </spring_coeff>
   <damping_coeff unit="LBS/FT/SEC"> 2000 </damping_coeff>
  </contact>
  <contact type="STRUCTURE" name="RADOME">
   <location unit="IN">
    <x> -486.6 </x>
    <y> 0 </y>
    <z> -8.7 </z>
   </location>
   <static_friction> 0.2 </static_friction>
   <dynamic_friction> 0.2 </dynamic_friction>
   <rolling_friction> 0.2 </rolling_friction>
   <spring_coeff unit="LBS/FT"> 10000 </spring_coeff>
   <damping_coeff unit="LBS/FT/SEC"> 2000 </damping_coeff>
  </contact>
 </ground_reactions>

 <external_reactions>
   <force name="pushback" frame="BODY">
  <location unit="IN">
    <x>  -2.98081 </x>
    <y> 0.0 </y>
    <z>  -1.9683 </z>
  </location>
  <direction>
    <x>1</x>
    <y>0</y>
    <z>0</z>
  </direction>
   </force>

   <force name="hook" frame="BODY">
  <location unit="IN">
    <x>  100.669 </x>
    <y> 0.0 </y>
    <z>  -28.818 </z>
  </location>
  <direction>
    <x>  -0.9995 </x>
    <y>   0.0 </y>
    <z>   0.01 </z>
  </direction>
   </force>
 </external_reactions>

 <propulsion>
  <engine file="gen">
   <location unit="IN">
    <x> 0 </x>
    <y> 0 </y>
    <z> 0 </z>
   </location>
   <orient unit="DEG">
    <roll> 0.0 </roll>
    <pitch> 0 </pitch>
    <yaw> 0 </yaw>
   </orient>
   <feed>0</feed>
   <feed>1</feed>
   <feed>2</feed>
   <feed>3</feed>
   <thruster file="direct">
    <location unit="IN">
     <x> -300 </x>
     <y> 0 </y>
     <z> 0 </z>
    </location>
    <orient unit="DEG">
     <roll> 0.0 </roll>
     <pitch> 0.0 </pitch>
     <yaw> 0.0 </yaw>
    </orient>
   </thruster>
  </engine>
  <tank type="FUEL"> <!-- Tank number 0 -->
   <location unit="IN">
    <x> -193 </x>
   <y> 0 </y>
   <z> 0 </z>
   </location>
   <capacity unit="LBS"> 3486 </capacity>
   <contents unit="LBS"> 1500 </contents>
  </tank>
  <tank type="FUEL"> <!-- Tank number 1 -->
   <location unit="IN">
    <x> -193 </x>
   <y> 0 </y>
   <z> 0 </z>
   </location>
   <capacity unit="LBS"> 3486 </capacity>
   <contents unit="LBS"> 1500 </contents>
  </tank>
  <tank type="FUEL"> <!-- External Tank number 0  (station 4) -->
   <location unit="IN">
    <x> -193 </x>
   <y> 0 </y>
   <z> 0 </z>
   </location>
   <capacity unit="LBS"> 2991 </capacity>
   <contents unit="LBS"> 0 </contents>
  </tank>
  <tank type="FUEL"> <!-- External Tank number 1 (station 6) -->
   <location unit="IN">
    <x> -193 </x>
   <y> 0 </y>
   <z> 0 </z>
   </location>
   <capacity unit="LBS"> 2991 </capacity>
   <contents unit="LBS"> 0 </contents>
  </tank>
 </propulsion>

 <system file="pushback">
   <property>/sim/model/pushback/kp</property>
   <property>/sim/model/pushback/ki</property>
   <property>/sim/model/pushback/kd</property>
 </system>
 <system file="hook"/>

 <flight_control name="F-16 FC">

   <!-- Declare some interface properties -->
  <property>fcs/alpha-norm</property>
  <property>fcs/hook-engage</property>
  <property>fcs/canopy-engage</property>
  <property>fcs/fbw-override</property>


<!-- begin: control system by Nikolai V. Chr. -->
    <property value="0.25">fcs/fly-by-wire/K_A</property>
    <property value="2">fcs/fly-by-wire/normal-gain</property>
    <property value="1">fcs/fly-by-wire/washout</property>
    <property value="5">fcs/fly-by-wire/integrator</property>
    <property value="1">fcs/fly-by-wire/enable-q</property>
    <property value="1">fcs/fly-by-wire/enable-nz</property>
    <property value="1">fcs/fly-by-wire/enable-int</property>
    <property value="1">fcs/fly-by-wire/enable-fake</property>
    <property value="1">fcs/fly-by-wire/enable-alpha</property>
    <property value="1">fcs/fly-by-wire/enable-q-washout</property>

    <property value="0">fcs/fly-by-wire/pitch/alpha-indicated-lagged</property>
    <property value="0">fcs/fly-by-wire/pitch/pitch-loop-ground-product</property>

    <channel execrate="1" name="FCS Lookup Ref">

        <switch name="fcs/fly-by-wire/condition-a">
            <default value="0"/>
            <test logic="OR" value="1">
                gear/gear-cmd-norm == 1
                /controls/flight/flaps gt 0
                <!-- todo: if refueling door open and q_c < 646 -->
            </test>
        </switch>

        <fcs_function name="fcs/fly-by-wire/q_c">
            <function>
                <!--<v>1400</v> standby gain-->
                <p>aero/qbar-psf</p>
            </function>
        </fcs_function>

        <fcs_function name="fcs/fly-by-wire/P_s">
            <function>
                <p>atmosphere/P-psf</p>
                <!--<v>2116</v> standby gain-->
            </function>
        </fcs_function>

        <switch name="fcs/fly-by-wire/MLG-GND">
            <default value="0"/>
            <!--<test logic="AND" value="1">
                gear/gear-pos-norm == 1
            </test>-->
            <test logic="AND" value="1">
                gear/unit[1]/WOW eq 1
                gear/unit[2]/WOW eq 1
            </test>
        </switch>

        <fcs_function name="fcs/fly-by-wire/qcps-ratio">
            <function>
                <quotient>
                    <p>fcs/fly-by-wire/q_c</p>
                    <p>fcs/fly-by-wire/P_s</p>
                </quotient>
            </function>
        </fcs_function>

        <fcs_function name="fcs/fly-by-wire/integrator">
            <function>
                <table>
                    <independentVar lookup="row">inertia/weight-lbs</independentVar>
                    <tableData>
                        17400 2
                        20000 2.5
                        23000 5
                    </tableData>
                </table>
            </function>
        </fcs_function>

        <fcs_function name="fcs/fly-by-wire/pitch/F2">
            <function>
                <table>
                <independentVar lookup="row">fcs/fly-by-wire/qcps-ratio</independentVar>
                <tableData>
                    0     0.50
                    0.53  0.50
                    1.79 -1.00
                </tableData>
            </table>
            </function>
        </fcs_function>

        <fcs_function name="fcs/fly-by-wire/pitch/F3">
            <function>
                <table>
                    <independentVar lookup="row">fcs/fly-by-wire/q_c</independentVar>
                    <tableData>
                        0.0 1
                        300 1
                        800 0.533
                        3000 0.083
                    </tableData>
                </table>
            </function>
        </fcs_function>

        <fcs_function name="fcs/fly-by-wire/ari/F7">
            <function>
                <table>
                    <independentVar lookup="row">fcs/fly-by-wire/qcps-ratio</independentVar>
                    <tableData>
                        0.0   0
                        0.187 0
                        1.129 1
                        1.709 1
                        3.29  0
                    </tableData>
                </table>
            </function>
        </fcs_function>

        <fcs_function name="fcs/fly-by-wire/yaw/F8">
            <function>
                <table>
                    <independentVar lookup="row">fcs/fly-by-wire/qcps-ratio</independentVar>
                    <tableData>
                        0.0  0.5
                        2.04 0.5
                        3.23 1.0
                    </tableData>
                </table>
            </function>
        </fcs_function>

        <fcs_function name="fcs/fly-by-wire/tef/F9">
            <function>
                <table>
                    <independentVar lookup="row">fcs/fly-by-wire/qcps-ratio</independentVar>
                    <tableData>
                        0.0  0
                        0.787 0
                        1.008 -2.0
                    </tableData>
                </table>
            </function>
        </fcs_function>

        <fcs_function name="fcs/fly-by-wire/roll/F10">
            <function>
                <table>
                    <independentVar lookup="row">fcs/fly-by-wire/qcps-ratio</independentVar>
                    <tableData>
                        0.0   0.25
                        0.694 0.25
                        1.132 0.50
                    </tableData>
                </table>
            </function>
        </fcs_function>

    </channel>


    <channel execrate="1" name="Yaw Ref">

        <fcs_function name="fcs/fly-by-wire/yaw/pedal-force-lbf">
            <function>
                <table>
                    <independentVar lookup="row">fcs/rudder-cmd-norm</independentVar>
                    <tableData>
                       -1 -120
                        0    0
                        1  120
                    </tableData>
                </table>
            </function>
        </fcs_function>

        <fcs_function name="fcs/fly-by-wire/yaw/command-deg">
            <function>
                <table>
                    <independentVar lookup="row">fcs/fly-by-wire/yaw/pedal-force-lbf</independentVar>
                    <tableData>
                        -120  30.0
                         -15   0.0
                          15   0.0
                         120 -30.0
                    </tableData>
                </table>
            </function>
        </fcs_function>

        <aerosurface_scale name="fcs/fly-by-wire/yaw/trim-scaled">
            <input>fcs/yaw-trim-cmd-norm</input>
            <zero_centered> true </zero_centered>
            <domain>
                <min> -1.0 </min>
                <max>  1.0 </max>
            </domain>
            <range>
                <min> -8 </min>
                <max>  8 </max>
            </range>
        </aerosurface_scale>

        <summer name="fcs/fly-by-wire/yaw/command-sum">
            <input>fcs/fly-by-wire/yaw/trim-scaled</input>
            <input>-fcs/fly-by-wire/yaw/command-deg</input>
        </summer>

        <summer name="fcs/fly-by-wire/yaw/command-sum-ari">
            <input>fcs/fly-by-wire/ari/final</input>
            <input>fcs/fly-by-wire/yaw/command-sum</input>
        </summer>

        <pure_gain name="fcs/fly-by-wire/yaw/g-gain">
            <input>accelerations/Ny</input>
            <gain> 19.32 </gain>
        </pure_gain>

        <pure_gain name="velocities/r-aero-deg_sec">
            <input>velocities/r-aero-rad_sec</input>
            <gain> 57.2957795 </gain>
        </pure_gain>

        <pure_gain name="fcs/fly-by-wire/yaw/cross-gain">
            <input>fcs/fly-by-wire/roll/lead-exit</input>
            <gain> 0.01745 </gain>
        </pure_gain>

        <pure_gain name="fcs/fly-by-wire/yaw/cross-multiplier">
            <input>fcs/fly-by-wire/pitch/alpha-indicated-lagged</input>
            <gain> fcs/fly-by-wire/yaw/cross-gain </gain>
        </pure_gain>

        <summer name="fcs/fly-by-wire/yaw/yaw-limits-sum-1">
            <input>velocities/r-aero-deg_sec</input>
            <input>-fcs/fly-by-wire/yaw/cross-multiplier</input>
        </summer>

        <lead_lag_filter name="fcs/fly-by-wire/yaw/lead">
          <input> fcs/fly-by-wire/yaw/yaw-limits-sum-1 </input>
          <c1> 3 </c1>
          <c2> 15 </c2>
          <c3> 1 </c3>
          <c4> 15 </c4>
        </lead_lag_filter>

        <lead_lag_filter name="fcs/fly-by-wire/yaw/lead-second">
          <input> fcs/fly-by-wire/yaw/lead </input>
          <c1> 1.5 </c1>
          <c2> 0 </c2>
          <c3> 1 </c3>
          <c4> 1 </c4>
        </lead_lag_filter>

        <summer name="fcs/fly-by-wire/yaw/yaw-limits-sum-2">
            <input>fcs/fly-by-wire/yaw/lead-second</input>
            <input>fcs/fly-by-wire/yaw/g-gain</input>
        </summer>

        <pure_gain name="fcs/fly-by-wire/yaw/schedule">
            <input>fcs/fly-by-wire/yaw/yaw-limits-sum-2</input>
            <gain> fcs/fly-by-wire/yaw/F8 </gain>
        </pure_gain>

        <summer name="fcs/fly-by-wire/yaw/rudder-sum">
            <input>fcs/fly-by-wire/yaw/schedule</input>
            <input>fcs/fly-by-wire/yaw/command-sum-ari</input>
        </summer>

        <second_order_filter name="fcs/fly-by-wire/yaw/final-filter">
          <input> fcs/fly-by-wire/yaw/rudder-sum </input>
          <c1> 1 </c1>
          <c2> 0 </c2>
          <c3> 1225 </c3>
          <c4> 1 </c4>
          <c5> 0 </c5>
          <c6> 1225 </c6>
        </second_order_filter>

        <lag_filter name="fcs/fly-by-wire/yaw/rudder-lag">
            <input> fcs/fly-by-wire/yaw/final-filter </input>
            <c1> 20 </c1>
            <!-- defl. limit = 30, rate limit = 120 deg/s -->
        </lag_filter>

        <kinematic name="fcs/fly-by-wire/yaw/rudder-deflection-deg">
            <input>fcs/fly-by-wire/yaw/rudder-lag</input>
            <noscale/>
            <traverse>
                <setting>
                    <position> -30.0 </position>
                    <time>      0.0 </time>
                </setting>
                <setting>
                    <position>  30.0 </position>
                    <time>      0.5 </time>
                </setting>
            </traverse>
            <clipto>
                <min> -30 </min>
                <max>  30 </max>
            </clipto>
        </kinematic>

        <aerosurface_scale name="fcs/fly-by-wire/yaw/rudder-pos-norm">
            <input>fcs/fly-by-wire/yaw/rudder-deflection-deg</input>
            <zero_centered> true </zero_centered>
            <domain>
                <min> -30.0 </min>
                <max>  30.0 </max>
            </domain>
            <range>
                <min> -1.0 </min>
                <max>  1.0 </max>
            </range>
        </aerosurface_scale>

    </channel>


    <channel execrate="1" name="Roll Ref">

        <fcs_function name="fcs/fly-by-wire/roll/stick-force-lbf">
            <function>
                <table>
                    <independentVar lookup="row">fcs/aileron-cmd-norm</independentVar>
                    <tableData>
                       -1 -17
                        0   0
                        1  17
                    </tableData>
                </table>
            </function>
        </fcs_function>

        <fcs_function name="fcs/fly-by-wire/roll/command-deg_s">
            <function>
                <table>
                    <independentVar lookup="row">fcs/fly-by-wire/roll/stick-force-lbf</independentVar>
                    <independentVar lookup="column">gear/gear-pos-norm</independentVar>
                    <tableData>
                                 0    1
                         -17  -308 -167
                         -11   -80  -43.38
                          -6   -20   11
                          -1     0    0
                           0     0    0
                           1     0    0
                           6    20   11
                          11    80   43.38
                          17   308  167
                    </tableData>
                </table>
            </function>
        </fcs_function>

        <aerosurface_scale name="fcs/fly-by-wire/roll/trim-scaled">
            <input>fcs/roll-trim-cmd-norm</input>
            <zero_centered> true </zero_centered>
            <domain>
                <min> -1.0 </min>
                <max>  1.0 </max>
            </domain>
            <range>
                <min> -40 </min>
                <max>  40 </max>
            </range>
        </aerosurface_scale>

        <switch name="fcs/fly-by-wire/roll/switch">
            <default value="1.0"/>
            <test logic="OR" value="0.542">
                fcs/fly-by-wire/condition-a == 1
            </test>
        </switch>

        <pure_gain name="fcs/fly-by-wire/roll/ground-gain">
            <input>fcs/fly-by-wire/roll/command-deg_s</input>
            <gain> fcs/fly-by-wire/roll/switch </gain>
        </pure_gain>

        <summer name="fcs/fly-by-wire/roll/loop-sum">
            <input>fcs/fly-by-wire/roll/ground-gain</input>
            <input>-fcs/fly-by-wire/roll/loop-top-lead</input>
            <input>-fcs/fly-by-wire/roll/loop-bottom-lead</input>
        </summer>

        <lag_filter name="fcs/fly-by-wire/roll/loop-lag">
            <input> fcs/fly-by-wire/roll/loop-sum </input>
            <c1> 10 </c1>
        </lag_filter>

        <summer name="fcs/fly-by-wire/roll/loop-lag-neg">
            <input>fcs/fly-by-wire/roll/loop-lag</input>
            <clipto>
                <min>-10000</min>
                <max>0</max>
            </clipto>
        </summer>

        <summer name="fcs/fly-by-wire/roll/loop-lag-pos">
            <input>fcs/fly-by-wire/roll/loop-lag</input>
            <clipto>
                <min> 0 </min>
                <max> 10000 </max>
            </clipto>
        </summer>

        <lead_lag_filter name="fcs/fly-by-wire/roll/loop-bottom-lead">
          <input> fcs/fly-by-wire/roll/loop-lag-neg </input>
          <c1> 6 </c1>
          <c2> 0 </c2>
          <c3> 1 </c3>
          <c4> 20 </c4>
          <clipto>
                <min>-10000</min>
                <max>0</max>
          </clipto>
        </lead_lag_filter>

        <lead_lag_filter name="fcs/fly-by-wire/roll/loop-top-lead">
          <input> fcs/fly-by-wire/roll/loop-lag-pos </input>
          <c1> 6 </c1>
          <c2> 0 </c2>
          <c3> 1 </c3>
          <c4> 20 </c4>
          <clipto>
            <min> 0 </min>
            <max> 10000 </max>
          </clipto>
        </lead_lag_filter>

        <summer name="fcs/fly-by-wire/roll/loop-sum-end">
            <input>-fcs/fly-by-wire/roll/loop-lag</input>
            <input>-fcs/fly-by-wire/roll/trim-gain</input>
            <input>fcs/fly-by-wire/roll/roll-filter</input>
        </summer>

        <pure_gain name="fcs/fly-by-wire/roll/trim-gain">
            <input>fcs/fly-by-wire/roll/trim-scaled</input>
            <gain> 1.67 </gain>
        </pure_gain>

        <pure_gain name="velocities/p-aero-deg_sec">
            <input>velocities/p-aero-rad_sec</input>
            <gain> 57.2957795 </gain>
        </pure_gain>

        <second_order_filter name="fcs/fly-by-wire/roll/lead-exit">
          <input> velocities/p-aero-deg_sec </input>
          <c1> 1 </c1>
          <c2> 0 </c2>
          <c3> 3025 </c3>
          <c4> 1 </c4>
          <c5> 0 </c5>
          <c6> 3025 </c6>
        </second_order_filter>

        <second_order_filter name="fcs/fly-by-wire/roll/roll-filter">
          <input> velocities/p-aero-deg_sec </input>
          <c1> 4 </c1>
          <c2> 64 </c2>
          <c3> 6400 </c3>
          <c4> 1 </c4>
          <c5> 80 </c5>
          <c6> 6400 </c6>
        </second_order_filter>

        <pure_gain name="fcs/fly-by-wire/roll/final">
            <input>fcs/fly-by-wire/roll/loop-sum-end</input>
            <gain> 0.12 </gain>
            <clipto>
                <min> -21.5 </min>
                <max>  21.5 </max>
            </clipto>
        </pure_gain>

        <summer name="fcs/fly-by-wire/roll/top-sum">
            <input>fcs/fly-by-wire/roll/final</input>
            <input>-fcs/fly-by-wire/roll/bottom-deadzone</input>
            <input>fcs/fly-by-wire/tef/tef-cmd-pos-deg</input>
        </summer>

        <summer name="fcs/fly-by-wire/roll/bottom-sum">
            <input>-fcs/fly-by-wire/roll/final</input>
            <input>-fcs/fly-by-wire/roll/top-deadzone</input>
            <input>fcs/fly-by-wire/tef/tef-cmd-pos-deg</input>
        </summer>

        <fcs_function name="fcs/fly-by-wire/roll/top-deadzone-pos">
            <function>
                <difference>
                    <property> fcs/fly-by-wire/roll/top-sum </property>
                    <value> 21.5 </value>
                </difference>
            </function>
        </fcs_function>

        <switch name="fcs/fly-by-wire/roll/top-deadzone">
            <default value="0"/>
            <test logic="AND" value="fcs/fly-by-wire/roll/top-deadzone-pos">
                fcs/fly-by-wire/roll/top-sum gt  25
            </test>
        </switch>

        <fcs_function name="fcs/fly-by-wire/roll/bottom-deadzone-pos">
            <function>
                <difference>
                    <property> fcs/fly-by-wire/roll/bottom-sum </property>
                    <value> 21.5 </value>
                </difference>
            </function>
        </fcs_function>

        <switch name="fcs/fly-by-wire/roll/bottom-deadzone">
            <default value="0"/>
            <test logic="AND" value="fcs/fly-by-wire/roll/bottom-deadzone-pos">
                fcs/fly-by-wire/roll/bottom-sum gt  25
            </test>
        </switch>

        <summer name="fcs/fly-by-wire/roll/bottom-limit">
            <input>fcs/fly-by-wire/roll/bottom-sum</input>
            <clipto>
                <min> -21.5 </min>
                <max>  21.5 </max>
            </clipto>
        </summer>

        <summer name="fcs/fly-by-wire/roll/top-limit">
            <input>fcs/fly-by-wire/roll/top-sum</input>
            <clipto>
                <min> -21.5 </min>
                <max>  21.5 </max>
            </clipto>
        </summer>

        <lag_filter name="fcs/fly-by-wire/roll/flaperon-right-lag">
            <input> fcs/fly-by-wire/roll/top-limit </input>
            <c1> 20 </c1>
            <!-- defl. limit = 20, rate limit = 80 deg/s -->
        </lag_filter>

        <fcs_function name="fcs/fly-by-wire/roll/mech-bias-right">
            <function>
                <sum>
                    <property> fcs/fly-by-wire/roll/flaperon-right-lag </property>
                    <value> -1.5 </value>
                </sum>
            </function>
        </fcs_function>

        <kinematic name="fcs/fly-by-wire/roll/flaperon-right-deflection-deg">
            <input>fcs/fly-by-wire/roll/mech-bias-right</input>
            <noscale/>
            <traverse>
                <setting>
                    <position> -80.0 </position>
                    <time>      0.0 </time>
                </setting>
                <setting>
                    <position>  80.0 </position>
                    <time>      2 </time>
                </setting>
            </traverse>
            <clipto>
                <min> -23.0 </min>
                <max>  20.0 </max>
            </clipto>
        </kinematic>

        <aerosurface_scale name="fcs/fly-by-wire/roll/flaperon-right-pos-norm">
            <input>fcs/fly-by-wire/roll/flaperon-right-deflection-deg</input>
            <zero_centered> true </zero_centered>
            <domain>
                <min> -23.0 </min>
                <max>  20.0 </max>
            </domain>
            <range>
                <min> -1.0 </min>
                <max>  0.8695 </max>
            </range>
        </aerosurface_scale>

        <lag_filter name="fcs/fly-by-wire/roll/flaperon-left-lag">
            <input> fcs/fly-by-wire/roll/bottom-limit </input>
            <c1> 20 </c1>
            <!-- defl. limit = 20, rate limit = 80 deg/s -->
        </lag_filter>

        <fcs_function name="fcs/fly-by-wire/roll/mech-bias-left">
            <function>
                <sum>
                    <property> fcs/fly-by-wire/roll/flaperon-left-lag </property>
                    <value> -1.5 </value>
                </sum>
            </function>
        </fcs_function>

        <kinematic name="fcs/fly-by-wire/roll/flaperon-left-deflection-deg">
            <input>fcs/fly-by-wire/roll/mech-bias-left</input>
            <noscale/>
            <traverse>
                <setting>
                    <position> -80.0 </position>
                    <time>      0.0 </time>
                </setting>
                <setting>
                    <position>  80.0 </position>
                    <time>      2 </time>
                </setting>
            </traverse>
            <clipto>
                <min> -23.0 </min>
                <max>  20.0 </max>
            </clipto>
        </kinematic>

        <aerosurface_scale name="fcs/fly-by-wire/roll/flaperon-left-pos-norm">
            <input>fcs/fly-by-wire/roll/flaperon-left-deflection-deg</input>
            <zero_centered> true </zero_centered>
            <domain>
                <min> -23.0 </min>
                <max>  20.0 </max>
            </domain>
            <range>
                <min> -1.0 </min>
                <max>  0.8695 </max>
            </range>
        </aerosurface_scale>

        <summer name="fcs/fly-by-wire/roll/inter-sum">
            <input>-fcs/fly-by-wire/roll/bottom-limit</input>
            <input>fcs/fly-by-wire/roll/top-limit</input>
        </summer>

        <pure_gain name="fcs/fly-by-wire/roll/inter-gain">
            <input>fcs/fly-by-wire/roll/inter-sum</input>
            <gain> 0.5 </gain>
        </pure_gain>

        <pure_gain name="fcs/fly-by-wire/roll/inter-schedule">
            <input>fcs/fly-by-wire/roll/inter-gain</input>
            <gain> fcs/fly-by-wire/roll/F10 </gain>
        </pure_gain>

        <summer name="fcs/fly-by-wire/roll/aileron-pos-deg">
            <input>-fcs/fly-by-wire/roll/flaperon-left-deflection-deg</input>
            <input>fcs/fly-by-wire/roll/flaperon-right-deflection-deg</input>
        </summer>

        <aerosurface_scale name="fcs/fly-by-wire/roll/aileron-pos-norm">
            <input>fcs/fly-by-wire/roll/aileron-pos-deg</input>
            <zero_centered> true </zero_centered>
            <domain>
                <min> -40.0 </min>
                <max>  40.0 </max>
            </domain>
            <range>
                <min> -1.0 </min>
                <max>  1.0 </max>
            </range>
        </aerosurface_scale>

    </channel>


    <channel execrate="1" name="ARI Ref">

        <fcs_function name="fcs/fly-by-wire/ari/inverter-norm">
            <function>
                <table>
                    <independentVar lookup="row">fcs/fly-by-wire/pitch/alpha-indicated-lagged</independentVar>
                    <tableData>
                        -10   0.0
                          0   1.0
                         10   0.0
                    </tableData>
                </table>
            </function>
        </fcs_function>

        <pure_gain name="fcs/fly-by-wire/ari/schedule">
            <input>fcs/fly-by-wire/ari/inverter-norm</input>
            <gain> fcs/fly-by-wire/ari/F7 </gain>
        </pure_gain>

        <pure_gain name="fcs/fly-by-wire/ari/gain">
            <input>fcs/fly-by-wire/pitch/alpha-indicated-lagged</input>
            <gain> 0.075 </gain>
        </pure_gain>

        <summer name="fcs/fly-by-wire/ari/sum">
            <input>-fcs/fly-by-wire/ari/schedule</input>
            <input>fcs/fly-by-wire/ari/gain</input>
        </summer>

        <pure_gain name="fcs/fly-by-wire/ari/final">
            <input>fcs/fly-by-wire/ari/sum</input>
            <gain> fcs/fly-by-wire/roll/inter-gain </gain>
        </pure_gain>

    </channel>


    <channel execrate="1" name="Pitch Ref">

        <fcs_function name="fcs/fly-by-wire/pitch/stick-force-N">
            <function>
                <table>
                    <independentVar lookup="row">fcs/elevator-cmd-norm</independentVar>
                    <tableData>
                       -1  180
                        0    0
                        1  -80
                    </tableData>
                </table>
            </function>
        </fcs_function>

        <!--<lag_filter name="fcs/fly-by-wire/pitch/stick-force-N-lagged">
            <input> fcs/fly-by-wire/pitch/stick-force-N </input>
            <c1> 60 </c1>
        </lag_filter>-->

        <fcs_function name="fcs/fly-by-wire/pitch/command-g">
            <function>
                <table>
                    <independentVar lookup="row">fcs/fly-by-wire/pitch/stick-force-N</independentVar>
                    <tableData>
                        -80  -4.0
                        -35  -0.5
                         -8   0.0
                          8   0.0
                         35   0.5
                        180  11.0
                    </tableData>
                </table>
            </function>
        </fcs_function>

        <aerosurface_scale name="fcs/fly-by-wire/pitch/trim-scaled">
            <input>fcs/pitch-trim-cmd-norm</input>
            <zero_centered> true </zero_centered>
            <domain>
                <min> -1.0 </min>
                <max>  1.0 </max>
            </domain>
            <range>
                <min> -2.4 </min>
                <max>  2.4 </max>
            </range>
        </aerosurface_scale>

        <summer name="fcs/fly-by-wire/pitch/command-sum">
            <input>fcs/fly-by-wire/pitch/trim-scaled</input>
            <input>fcs/fly-by-wire/pitch/command-g</input>
        </summer>

        <fcs_function name="fcs/fly-by-wire/pitch/negative-g-limit">
            <function>
                <table>
                    <independentVar lookup="row">aero/qbar-psf</independentVar>
                    <tableData>
                        0.0      -1
                        31.32815 -1
                        187.9689 -4
                        208.8543 -4
                    </tableData>
                </table>
            </function>
        </fcs_function>

        <switch name="fcs/fly-by-wire/pitch/negative-g-limit-final">
            <default value="fcs/fly-by-wire/pitch/negative-g-limit"/>
            <test logic="OR" value="-4">
                fcs/fly-by-wire/condition-a == 1
            </test>
        </switch>


        <!--<summer name="fcs/fly-by-wire/pitch/g-limit-pos">
            <description>This deviates slightly from the diagram, but I think this is how its intended.</description>
            <input>fcs/fly-by-wire/pitch/command-sum</input>
            <clipto>
                <min>fcs/fly-by-wire/pitch/negative-g-limit</min>
                <max>8.0</max>
            </clipto>
        </summer>-->

        <summer name="fcs/fly-by-wire/pitch/g-limit-pos">
            <input>fcs/fly-by-wire/pitch/command-sum</input>
            <clipto>
                <min>-10000</min>
                <max>8.0</max>
            </clipto>
        </summer>

        <summer name="fcs/fly-by-wire/pitch/g-limit-neg">
            <input>fcs/fly-by-wire/pitch/command-sum</input>
            <clipto>
                <min>fcs/fly-by-wire/pitch/negative-g-limit-final</min>
                <max>80</max>
            </clipto>
        </summer>

        <summer name="fcs/fly-by-wire/pitch/g-limit">
            <input>fcs/fly-by-wire/pitch/g-limit-neg</input>
            <input>fcs/fly-by-wire/pitch/g-limit-pos</input>
        </summer>

        <switch name="fcs/fly-by-wire/pitch/g-limit-product">
            <default value="0.5"/>
            <test logic="AND" value="1">
                fcs/fly-by-wire/MLG-GND == 1
            </test>
        </switch>

        <pure_gain name="fcs/fly-by-wire/pitch/g-limit-gain">
            <input>fcs/fly-by-wire/pitch/g-limit</input>
            <gain> fcs/fly-by-wire/pitch/g-limit-product </gain>
        </pure_gain>

        <lag_filter name="fcs/fly-by-wire/pitch/command-sum-limit-lagged">
            <input> fcs/fly-by-wire/pitch/g-limit-gain </input>
            <c1> 8.3 </c1>
        </lag_filter>

        <pure_gain name="fcs/fly-by-wire/pitch/alpha">
            <input>aero/alpha-deg</input>
            <gain> fcs/fly-by-wire/enable-alpha </gain>
        </pure_gain>

        <summer name="fcs/fly-by-wire/pitch/alpha-indicated-clamp">
            <input>fcs/fly-by-wire/pitch/alpha</input><!-- should really be indicated -->
            <clipto>
                <min>-5</min>
                <max>30</max>
            </clipto>
        </summer>

        <switch name="fcs/fly-by-wire/pitch/alpha-indicated-switch">
            <default value="fcs/fly-by-wire/pitch/alpha-indicated-clamp"/>
            <test logic="AND" value="0">
                fcs/fly-by-wire/MLG-GND == 1
            </test>
        </switch>

        <fcs_function name="fcs/fly-by-wire/pitch/roll-rate-abs">
            <function>
                <abs>
                    <product>
                        <property> velocities/p-aero-rad_sec </property>
                        <v> 57.29577951308233 </v>
                    </product>
                </abs>
            </function>
        </fcs_function>

        <pure_gain name="fcs/fly-by-wire/pitch/roll-rate-gain">
            <input>fcs/fly-by-wire/pitch/roll-rate-abs</input>
            <gain> 0.15 </gain>
        </pure_gain>

        <lag_filter name="fcs/fly-by-wire/pitch/roll-rate-lagged">
            <input> fcs/fly-by-wire/pitch/roll-rate-gain </input>
            <c1> 0.67 </c1>
        </lag_filter>

        <fcs_function name="fcs/fly-by-wire/pitch/roll-rate-schedule">
            <function>
                <table>
                    <independentVar lookup="row">fcs/fly-by-wire/pitch/roll-rate-lagged</independentVar>
                    <tableData>
                        20      0
                        54    5.4
                    </tableData>
                </table>
            </function>
        </fcs_function>

        <pure_gain name="fcs/fly-by-wire/pitch/fake-alpha">
            <input> fcs/fly-by-wire/pitch/roll-rate-schedule </input>
            <gain> fcs/fly-by-wire/enable-fake </gain>
        </pure_gain>

        <summer name="fcs/fly-by-wire/pitch/alpha-sum">
            <input> fcs/fly-by-wire/pitch/alpha-indicated-switch </input>
            <input> fcs/fly-by-wire/pitch/fake-alpha </input>
        </summer>

        <lag_filter name="fcs/fly-by-wire/pitch/alpha-indicated-lagged">
            <input> fcs/fly-by-wire/pitch/alpha-sum </input>
            <c1> 10 </c1>
        </lag_filter>

        <fcs_function name="fcs/fly-by-wire/pitch/alpha-indicated-sum">
            <function>
                <sum>
                    <property> fcs/fly-by-wire/pitch/alpha-indicated-lagged </property>
                    <value> -20.4 </value>
                    <property> fcs/fly-by-wire/pitch/pitch-rate-gain </property>
                </sum>
            </function>
        </fcs_function>

        <pure_gain name="fcs/fly-by-wire/pitch/alpha-indicated-gain">
            <description>
                This is 0.5 on diagram, but needs to be higher
                to be able to recover from sustained turn at low speeds.
                At 1.0 it will limit alpha to 25-30 degs and prevent a deep stall.
            </description>
            <input>fcs/fly-by-wire/pitch/alpha-indicated-sum</input>
            <gain> 1.0 </gain>
            <clipto>
                <min> 0 </min>
                <max>10000</max>
            </clipto>
        </pure_gain>

        <summer name="fcs/fly-by-wire/pitch/command-sum-limit-alpha">
            <input> -fcs/fly-by-wire/pitch/command-sum-limit-lagged </input>
            <input> fcs/fly-by-wire/pitch/alpha-indicated-gain </input>
        </summer>

        <summer name="fcs/fly-by-wire/pitch/command-sum-limit-alpha-pitch">
            <input> fcs/fly-by-wire/pitch/command-sum-limit-alpha </input>
            <input> fcs/fly-by-wire/pitch/pitch-rate-lead-2nd </input>
        </summer>

        <pure_gain name="fcs/fly-by-wire/pitch/command-sum-limit-alpha-pitch-gain">
            <input>fcs/fly-by-wire/pitch/command-sum-limit-alpha-pitch</input>
            <gain> 3.0 </gain>
        </pure_gain>

        <pure_gain name="fcs/fly-by-wire/pitch/pitch-loop-gain">
            <input>fcs/fly-by-wire/pitch/command-sum-limit-alpha-pitch-gain</input>
            <gain> fcs/fly-by-wire/pitch/F3 </gain>
        </pure_gain>

        <summer name="fcs/fly-by-wire/pitch/pitch-loop-gain-sum">
            <input> fcs/fly-by-wire/pitch/pitch-loop-gain </input>
            <input> -fcs/fly-by-wire/pitch/pitch-loop-gain-feedback-gain </input>
        </summer>

        <switch name="fcs/fly-by-wire/pitch/pitch-loop-gain-switch">
            <default value="fcs/fly-by-wire/pitch/pitch-loop-gain-sum"/>
            <test logic="AND" value="fcs/fly-by-wire/pitch/pitch-loop-ground-product">
                fcs/fly-by-wire/MLG-GND == 1
            </test>
        </switch>

        <summer name="fcs/fly-by-wire/pitch/pitch-loop-gain-sum-extra">
            <input> fcs/fly-by-wire/pitch/pitch-loop-gain-switch </input>
            <input> -fcs/fly-by-wire/pitch/amplifier </input>
            <input> -fcs/fly-by-wire/pitch/int-balance </input>
        </summer>

        <integrator name="fcs/fly-by-wire/pitch/pitch-loop-gain-sum-int">
            <input> fcs/fly-by-wire/pitch/pitch-loop-gain-sum-extra </input>
            <!--<trigger> gear/gear-pos-norm </trigger>-->
            <c1> fcs/fly-by-wire/integrator </c1>
        </integrator>

        <pure_gain name="fcs/fly-by-wire/pitch/pitch-loop-ground-product">
            <input>fcs/fly-by-wire/pitch/pitch-loop-gain-sum-int</input>
            <gain> -0.5 </gain><!-- diagram say 0.5, but negative makes more sense -->
        </pure_gain>

        <fcs_function name="fcs/fly-by-wire/pitch/amp-deadzone-neg">
            <function>
                <difference>
                    <property> fcs/fly-by-wire/pitch/pitch-loop-gain-sum-int </property>
                    <value> -25 </value>
                </difference>
            </function>
        </fcs_function>

        <fcs_function name="fcs/fly-by-wire/pitch/amp-deadzone-pos">
            <function>
                <difference>
                    <property> fcs/fly-by-wire/pitch/pitch-loop-gain-sum-int </property>
                    <value> 25 </value>
                </difference>
            </function>
        </fcs_function>

        <switch name="fcs/fly-by-wire/pitch/amp-deadzone">
            <default value="0"/>
            <test logic="AND" value="fcs/fly-by-wire/pitch/amp-deadzone-pos">
                fcs/fly-by-wire/pitch/pitch-loop-gain-sum-int gt  25
            </test>
            <test logic="AND" value="fcs/fly-by-wire/pitch/amp-deadzone-neg">
                fcs/fly-by-wire/pitch/pitch-loop-gain-sum-int lt  -25
            </test>
        </switch>

        <pure_gain name="fcs/fly-by-wire/pitch/amplifier">
            <input>fcs/fly-by-wire/pitch/amp-deadzone</input>
            <gain> fcs/fly-by-wire/K_A </gain>
        </pure_gain>

        <pure_gain name="fcs/fly-by-wire/pitch/integrator">
            <input>fcs/fly-by-wire/pitch/pitch-loop-gain-sum-int</input>
            <gain> fcs/fly-by-wire/enable-int </gain>
        </pure_gain>

        <summer name="fcs/fly-by-wire/pitch/pitch-loop-gain-sum-int-sum">
            <input> fcs/fly-by-wire/pitch/integrator </input>
            <input> fcs/fly-by-wire/pitch/pitch-loop-gain </input>
        </summer>

        <summer name="fcs/fly-by-wire/pitch/int-balance-summer"><!-- test system not made, so is 0 -->
            <input> fcs/fly-by-wire/pitch/pitch-loop-gain-sum-int-sum </input>
            <input> -fcs/fly-by-wire/pitch/pitch-loop-gain-sum-int-sum </input>
        </summer>

        <pure_gain name="fcs/fly-by-wire/pitch/int-balance">
            <input>fcs/fly-by-wire/pitch/int-balance-summer</input>
            <gain> 0.5 </gain>
        </pure_gain>

        <summer name="fcs/fly-by-wire/pitch/pitch-loop-gain-sum-int-sum-sum">
            <input> fcs/fly-by-wire/pitch/pitch-loop-gain-sum-int-sum </input>
            <input> fcs/fly-by-wire/pitch/alpha-feedback </input>
        </summer>

        <fcs_function name="fcs/fly-by-wire/pitch/pitch-loop-gain-feedback-deadzone-neg">
            <function>
                <difference>
                    <property> fcs/fly-by-wire/pitch/pitch-loop-gain-sum-int-sum-sum </property>
                    <value> -25 </value>
                </difference>
            </function>
        </fcs_function>

        <fcs_function name="fcs/fly-by-wire/pitch/pitch-loop-gain-feedback-deadzone-pos">
            <function>
                <difference>
                    <property> fcs/fly-by-wire/pitch/pitch-loop-gain-sum-int-sum-sum </property>
                    <value> 25 </value>
                </difference>
            </function>
        </fcs_function>

        <switch name="fcs/fly-by-wire/pitch/pitch-loop-gain-feedback-deadzone">
            <default value="0"/>
            <test logic="AND" value="fcs/fly-by-wire/pitch/pitch-loop-gain-feedback-deadzone-pos">
                fcs/fly-by-wire/pitch/pitch-loop-gain-sum-int-sum-sum gt  25
            </test>
            <test logic="AND" value="fcs/fly-by-wire/pitch/pitch-loop-gain-feedback-deadzone-neg">
                fcs/fly-by-wire/pitch/pitch-loop-gain-sum-int-sum-sum lt  -25
            </test>
        </switch>

        <pure_gain name="fcs/fly-by-wire/pitch/pitch-loop-gain-feedback-gain">
            <input>fcs/fly-by-wire/pitch/pitch-loop-gain-feedback-deadzone</input>
            <gain> 5 </gain>
        </pure_gain>

        <pure_gain name="fcs/fly-by-wire/pitch/alpha-feedback">
            <input>fcs/fly-by-wire/pitch/alpha-indicated-lagged</input>
            <gain> fcs/fly-by-wire/pitch/F2 </gain>
        </pure_gain>

        <summer name="fcs/fly-by-wire/pitch/pitch-loop-gain-final">
            <input> fcs/fly-by-wire/pitch/pitch-loop-gain-sum-int-sum </input>
            <input> fcs/fly-by-wire/pitch/alpha-feedback </input>
        </summer>

        <pure_gain name="fcs/fly-by-wire/pitch/q">
            <input>velocities/q-aero-rad_sec</input>
            <gain> fcs/fly-by-wire/enable-q </gain>
        </pure_gain>

        <pure_gain name="velocities/q-aero-deg_sec">
            <input>fcs/fly-by-wire/pitch/q</input>
            <gain> 57.2957795 </gain>
        </pure_gain>

        <washout_filter name="fcs/fly-by-wire/pitch/q-washout">
          <input> velocities/q-aero-deg_sec </input>
          <c1> fcs/fly-by-wire/washout </c1>
        </washout_filter>

        <switch name="fcs/fly-by-wire/pitch/q-switch">
            <default value="fcs/fly-by-wire/pitch/q-washout"/>
            <test logic="AND" value="velocities/q-aero-deg_sec">
                fcs/fly-by-wire/enable-q-washout == 0
            </test>
        </switch>

        <pure_gain name="fcs/fly-by-wire/pitch/q-gain-1">
            <input>fcs/fly-by-wire/pitch/q-switch</input>
            <gain> 0.7 </gain>
        </pure_gain>

        <pure_gain name="fcs/fly-by-wire/pitch/pitch-rate-gain">
            <input>fcs/fly-by-wire/pitch/q-gain-1</input>
            <gain> fcs/fly-by-wire/pitch/F3 </gain>
        </pure_gain>

        <switch name="fcs/fly-by-wire/pitch/bias-top">
            <default value="6"/>
            <test logic="AND" value="0">
                fcs/fly-by-wire/MLG-GND == 1
            </test>
        </switch>

        <fcs_function name="fcs/fly-by-wire/pitch/bias-middle">
            <function>
                <v> 9 </v>
            </function>
        </fcs_function>

        <switch name="fcs/fly-by-wire/pitch/bias-bottom">
            <default value="0"/>
            <test logic="AND" value="9">
                fcs/fly-by-wire/condition-a == 1
            </test>
        </switch>

        <lag_filter name="fcs/fly-by-wire/pitch/bias-top-lag">
            <input> fcs/fly-by-wire/pitch/bias-top </input>
            <c1> 10 </c1>
        </lag_filter>

        <lag_filter name="fcs/fly-by-wire/pitch/bias-bottom-lag">
            <input> fcs/fly-by-wire/pitch/bias-bottom </input>
            <c1> 0.125 </c1>
        </lag_filter>

        <summer name="fcs/fly-by-wire/pitch/bias1">
            <input> -fcs/fly-by-wire/pitch/bias-bottom-lag </input>
            <input> fcs/fly-by-wire/pitch/bias-middle </input>
        </summer>

        <summer name="fcs/fly-by-wire/pitch/bias2">
            <input> fcs/fly-by-wire/pitch/bias-top-lag </input>
            <input> fcs/fly-by-wire/pitch/bias1 </input>
        </summer>

        <summer name="fcs/fly-by-wire/pitch/pitch-rate-gain-sum">
            <input> fcs/fly-by-wire/pitch/pitch-rate-gain </input>
            <input> -fcs/fly-by-wire/pitch/bias2 </input>
            <input> fcs/fly-by-wire/pitch/alpha-indicated-lagged </input>
        </summer>

        <pure_gain name="fcs/fly-by-wire/pitch/pitch-rate-gain-sum-gain">
            <input>fcs/fly-by-wire/pitch/pitch-rate-gain-sum</input>
            <gain> 0.161 </gain>
        </pure_gain>

        <pure_gain name="fcs/fly-by-wire/pitch/pitch-rate-upper">
            <input>fcs/fly-by-wire/pitch/pitch-rate-gain-sum-gain</input>
            <gain> 1 </gain>
            <clipto>
                <min> 0 </min>
                <max>10000</max>
            </clipto>
        </pure_gain>

        <pure_gain name="fcs/fly-by-wire/pitch/pitch-rate-lower">
            <input>fcs/fly-by-wire/pitch/pitch-rate-gain-sum-gain</input>
            <gain> 1 </gain>
            <clipto>
                <min> -10000 </min>
                <max> 0 </max>
            </clipto>
        </pure_gain>

        <switch name="fcs/fly-by-wire/pitch/pitch-rate-lower-switch">
            <description>
                Is 1.0 or 10 in diagram, but does not make sense to me.
            </description>
            <default value="0"/>
            <test logic="AND" value="0.1">
                fcs/fly-by-wire/condition-a == 1
            </test>
        </switch>

        <lag_filter name="fcs/fly-by-wire/pitch/pitch-rate-lower-lag">
            <input> fcs/fly-by-wire/pitch/pitch-rate-lower-switch </input>
            <c1> 12.5 </c1><!-- diagram say 0.125, but that does a pitch up for too long after takeoff -->
        </lag_filter>

        <pure_gain name="fcs/fly-by-wire/pitch/pitch-rate-lower-gain">
            <input>fcs/fly-by-wire/pitch/pitch-rate-lower</input>
            <gain> fcs/fly-by-wire/pitch/pitch-rate-lower-lag </gain>
        </pure_gain>

        <summer name="fcs/fly-by-wire/pitch/pitch-rate-gain-sum-gain-sum">
            <input> fcs/fly-by-wire/pitch/pitch-rate-upper </input>
            <input> fcs/fly-by-wire/pitch/pitch-rate-lower-gain </input>
            <input> fcs/fly-by-wire/pitch/pitch-rate-gain-2-sum </input>
        </summer>

        <fcs_function name="velocities/V-fps">
            <description>Page 42: Not used.</description>
            <function>
                <sqrt>
                    <sum>
                        <pow>
                            <property> velocities/u-fps </property>
                            <v>2</v>
                        </pow>
                        <pow>
                            <property> velocities/v-fps </property>
                            <v>2</v>
                        </pow>
                        <pow>
                            <property> velocities/w-fps </property>
                            <v>2</v>
                        </pow>
                    </sum>
                </sqrt>
            </function>
        </fcs_function>

        <fcs_function name="accelerations/a_n">
            <description>Page 43: Calc of G-force.</description>
            <function>
                <quotient>
                    <sum>
                        <product>
                            <property> velocities/q-rad_sec </property>
                            <property> velocities/u-fps </property>
                        </product>
                        <product>
                            <v>-1</v>
                            <property> velocities/p-rad_sec </property>
                            <property> velocities/v-fps </property>
                        </product>
                        <product>
                            <property> accelerations/gravity-ft_sec2 </property>
                            <cos>
                                <property> attitude/theta-rad </property>
                            </cos>
                            <cos>
                                <property> attitude/phi-rad </property>
                            </cos>
                        </product>
                        <product>
                            <v>-1</v>
                            <property> accelerations/wdot-ft_sec2 </property>
                        </product>
                    </sum>
                    <property> accelerations/gravity-ft_sec2 </property>
                </quotient>
            </function>
        </fcs_function>

        <fcs_function name="fcs/fly-by-wire/pitch/normal-1">
            <function>
                <product>
                    <p>fcs/fly-by-wire/enable-nz</p>
                    <difference>
                        <property> accelerations/a_n </property>
                        <value> 1 </value>
                    </difference>
                </product>
            </function>
        </fcs_function>

        <switch name="fcs/fly-by-wire/pitch/normal-1-special">
            <description>This prevents NaN to propagate through the system</description>
            <default value="0"/>
            <test logic="AND" value="fcs/fly-by-wire/pitch/normal-1">
                accelerations/a_n lt  30
                accelerations/a_n gt -30
            </test>
        </switch>

        <lag_filter name="fcs/fly-by-wire/pitch/normal-lagged">
            <description>Bypassing this sim lag as its close to 120 Hz timestep.</description>
            <input> fcs/fly-by-wire/pitch/normal-1-special </input>
            <c1> 50 </c1>
        </lag_filter>

        <pure_gain name="fcs/fly-by-wire/pitch/normal-lagged-gain">
            <input>fcs/fly-by-wire/pitch/normal-1-special</input>
            <gain> fcs/fly-by-wire/normal-gain </gain>
        </pure_gain>

        <pure_gain name="fcs/fly-by-wire/pitch/normal-lagged-gain2">
            <input>fcs/fly-by-wire/pitch/normal-lagged-gain</input>
            <gain> 0.5 </gain>
        </pure_gain>

        <summer name="fcs/fly-by-wire/pitch/pitch-rate-gain-2-sum">
            <input> fcs/fly-by-wire/pitch/normal-lagged-gain2 </input>
            <input> fcs/fly-by-wire/pitch/q-gain-2 </input>
        </summer>

        <switch name="fcs/fly-by-wire/pitch/q-product">
            <default value="0.167"/>
            <test logic="AND" value="0.231">
                fcs/fly-by-wire/MLG-GND == 1
            </test>
        </switch>

        <pure_gain name="fcs/fly-by-wire/pitch/q-gain-2">
            <input>fcs/fly-by-wire/pitch/q-switch</input>
            <gain> fcs/fly-by-wire/pitch/q-product </gain>
        </pure_gain>

        <lead_lag_filter name="fcs/fly-by-wire/pitch/pitch-rate-lead">
          <input> fcs/fly-by-wire/pitch/pitch-rate-gain-sum-gain-sum </input>
          <c1> 3 </c1>
          <c2> 12 </c2>
          <c3> 1 </c3>
          <c4> 12 </c4>
        </lead_lag_filter>

        <second_order_filter name="fcs/fly-by-wire/pitch/pitch-rate-lead-2nd">
          <input> fcs/fly-by-wire/pitch/pitch-rate-lead </input>
          <c1> 2.5 </c1><!-- on old diagram looks to be 2.5, not 25 -->
          <c2> 20 </c2>
          <c3> 3500 </c3>
          <c4> 1 </c4>
          <c5> 40 </c5>
          <c6> 3500 </c6>
        </second_order_filter>

        <summer name="fcs/fly-by-wire/pitch/tp-left-sum">
            <input> fcs/fly-by-wire/pitch/pitch-loop-gain-final </input>
            <input> fcs/fly-by-wire/roll/inter-schedule </input>
        </summer>

        <summer name="fcs/fly-by-wire/pitch/bt-left-sum">
            <input> fcs/fly-by-wire/pitch/pitch-loop-gain-final </input>
            <input> -fcs/fly-by-wire/roll/inter-schedule </input>
        </summer>

        <lag_filter name="fcs/fly-by-wire/pitch/tp-lag">
            <input> fcs/fly-by-wire/pitch/tp-left-sum </input>
            <c1> 20.2 </c1>
            <!-- defl. limit = 25, rate limit = 60 deg/s -->
        </lag_filter>

        <lag_filter name="fcs/fly-by-wire/pitch/bt-lag">
            <input> fcs/fly-by-wire/pitch/bt-left-sum </input>
            <c1> 20.2 </c1>
            <!-- defl. limit = 25, rate limit = 60 deg/s -->
        </lag_filter>

        <summer name="fcs/fly-by-wire/pitch/tp-right-sum">
            <input> fcs/fly-by-wire/pitch/tp-lag </input>
            <input> fcs/fly-by-wire/pitch/bt-lag </input>
        </summer>

        <summer name="fcs/fly-by-wire/pitch/bt-right-sum">
            <input> fcs/fly-by-wire/pitch/tp-lag </input>
            <input> -fcs/fly-by-wire/pitch/bt-lag </input>
        </summer>

        <pure_gain name="fcs/fly-by-wire/pitch/horz-tail-deflection">
            <input>fcs/fly-by-wire/pitch/tp-right-sum</input>
            <gain> 0.5 </gain>
        </pure_gain>

        <pure_gain name="fcs/fly-by-wire/pitch/horz-tail-diff-deflection">
            <input>fcs/fly-by-wire/pitch/bt-right-sum</input>
            <gain> 0.5 </gain>
        </pure_gain>

        <kinematic name="fcs/fly-by-wire/pitch/horz-tail-deflection-deg">
            <input>fcs/fly-by-wire/pitch/horz-tail-deflection</input>
            <noscale/>
            <traverse>
                <setting>
                    <position> -25.0 </position>
                    <time>      0.0 </time>
                </setting>
                <setting>
                    <position>  25.0 </position>
                    <time>      0.8333 </time>
                </setting>
            </traverse>
            <clipto>
                <min> -25 </min>
                <max>  25 </max>
            </clipto>
        </kinematic>

        <aerosurface_scale name="fcs/fly-by-wire/pitch/horz-tail-deflection-norm">
          <input>fcs/fly-by-wire/pitch/horz-tail-deflection-deg</input>
          <domain>
            <min>-25</min>
            <max>25</max>
          </domain>
          <range>
            <min>-1</min>
            <max>1</max>
          </range>
        </aerosurface_scale>

        <kinematic name="fcs/fly-by-wire/pitch/horz-tail-diff-deflection-deg">
            <input>fcs/fly-by-wire/pitch/horz-tail-diff-deflection</input>
            <noscale/>
            <traverse>
                <setting>
                    <position> -25.0 </position>
                    <time>      0.0 </time>
                </setting>
                <setting>
                    <position>  25.0 </position>
                    <time>      0.8333 </time>
                </setting>
            </traverse>
            <clipto>
                <min> -25 </min>
                <max>  25 </max>
            </clipto>
        </kinematic>

        <summer name="fcs/fly-by-wire/pitch/horz-tail-left-deflection-deg">
            <input> fcs/fly-by-wire/pitch/horz-tail-deflection-deg </input>
            <input> fcs/fly-by-wire/pitch/horz-tail-diff-deflection-deg </input>
        </summer>

        <summer name="fcs/fly-by-wire/pitch/horz-tail-right-deflection-deg">
            <input> fcs/fly-by-wire/pitch/horz-tail-deflection-deg </input>
            <input> -fcs/fly-by-wire/pitch/horz-tail-diff-deflection-deg </input>
        </summer>

    </channel>


    <channel name="Throttle">

        <fcs_function name="fcs/fly-by-wire/throttle/pos-norm">
            <description>Page 153 of secondary doc</description>
            <function>
                <table>
                    <independentVar lookup="row">fcs/throttle-cmd-norm</independentVar>
                    <tableData>
                      0.0       0.0
                      0.77      1.0
                      1.0       2.0
                    </tableData>
                </table>
            </function>
            <output>fcs/throttle-pos-norm</output>
        </fcs_function>

    </channel>

    <channel execrate="1" name="Leading edge flaps">

        <fcs_function name="fcs/fly-by-wire/lef/input-factor">
            <function>
                <value>1.38</value>
            </function>
        </fcs_function>

        <lead_lag_filter name="fcs/fly-by-wire/lef/lead-lag">
          <input> fcs/fly-by-wire/lef/input-factor </input>
          <c1> 2 </c1>
          <c2> 7.25 </c2>
          <c3> 1 </c3>
          <c4> 7.25 </c4>
        </lead_lag_filter>

        <pure_gain name="fcs/fly-by-wire/lef/alpha-gain">
            <input>fcs/fly-by-wire/lef/lead-lag</input>
            <gain>aero/alpha-deg</gain>
        </pure_gain>

        <fcs_function name="fcs/fly-by-wire/lef/cmd-pos">
            <function>
                <difference>
                    <p>fcs/fly-by-wire/lef/alpha-gain</p>
                    <sum>
                        <product>
                            <value>9.05</value>
                            <quotient>
                                <p>aero/qbar-psf</p><!-- dynamic pressure -->
                                <p>atmosphere/P-psf</p><!-- static pressure -->
                            </quotient>
                        </product>
                        <v>1.45</v>
                    </sum>
                </difference>
            </function>
        </fcs_function>

        <lag_filter name="fcs/fly-by-wire/lef/pos-direct">
            <input> fcs/fly-by-wire/lef/cmd-pos </input>
            <c1> 0.136 </c1>
        </lag_filter>

        <kinematic name="fcs/fly-by-wire/lef/lef-pos-deg">
            <input>fcs/fly-by-wire/lef/pos-direct</input>
            <noscale/>
            <traverse>
                <setting>
                    <position>0</position>
                    <time>0.0</time>
                </setting>
                <setting>
                    <position>25</position>
                    <time>1</time><!-- 25 degs per second -->
                </setting>
            </traverse>
            <clipto>
                <min>0</min>
                <max>25</max>
            </clipto>
        </kinematic>

        <pure_gain name="fcs/fly-by-wire/lef/lef-pos-rad">
            <input>fcs/fly-by-wire/lef/lef-pos-deg</input>
            <gain>0.017453</gain>
        </pure_gain>

        <aerosurface_scale name="fcs/fly-by-wire/lef/lef-pos-norm">
            <input>fcs/fly-by-wire/lef/lef-pos-deg</input>
            <zero_centered> true </zero_centered>
            <domain>
                <min> 0 </min>
                <max> 25 </max>
            </domain>
            <range>
                <min>0</min>
                <max>1</max>
            </range>
        </aerosurface_scale>

        <fcs_function name="fcs/fly-by-wire/lef/lef-pos-r-norm">
            <function>
                <difference>
                    <v>1</v>
                    <p>fcs/fly-by-wire/lef/lef-pos-norm</p>
                </difference>
            </function>
        </fcs_function>

    </channel>


    <channel name="Trailing edge flaps">

        <!--<switch name="fcs/fly-by-wire/tef/cmd-gear">
            <default value="0"/>
            <test logic="AND" value="20">
                gear/gear-cmd-norm == 1
            </test>
        </switch>

        <switch name="fcs/fly-by-wire/tef/cmd-switch">
            <default value="fcs/fly-by-wire/tef/cmd-gear"/>
            <test logic="AND" value="20">
                /controls/flight/flaps gt 0
            </test>
        </switch>

        <summer name="fcs/fly-by-wire/tef/F9-limit">
            <input> fcs/fly-by-wire/tef/F9 </input>
            <clipto>
                <min> -2 </min>
                <max>  2 </max>
            </clipto>
        </summer>

        <summer name="fcs/fly-by-wire/tef/sum">
            <input> fcs/fly-by-wire/tef/cmd-switch </input>
            <input> -fcs/fly-by-wire/tef/int </input>
            <input> fcs/fly-by-wire/tef/F9-limit </input>
            <clipto>
                <min> -0.625 </min>
                <max>  0.625 </max>
            </clipto>
        </summer>

        <integrator name="fcs/fly-by-wire/tef/int">
            <input> fcs/fly-by-wire/tef/sum </input>
            <c1> 8 </c1>
        </integrator>

        <fcs_function name="fcs/fly-by-wire/tef/tef-pos-deg">
            <function>
                <sum>
                    <property> fcs/fly-by-wire/tef/int </property>
                    <value> 1.5 </value>
                </sum>
            </function>
        </fcs_function>-->

        <fcs_function name="fcs/fly-by-wire/tef/tef-cmd-pos-deg">
            <function>
                <product>
                    <max>
                      <p>/controls/flight/flaps</p>
                      <p>gear/gear-cmd-norm</p>
                    </max>
                    <table>
                        <independentVar lookup="row">velocities/vc-kts</independentVar>
                        <independentVar lookup="column">velocities/mach</independentVar>
                        <tableData>
                                 0  0.95  1
                            250 20  20   -2
                            370  0   0   -2
                        </tableData>
                    </table>
                </product>
            </function>
        </fcs_function>

        <kinematic name="fcs/fly-by-wire/tef/tef-pos-deg">
            <input>fcs/fly-by-wire/tef/tef-cmd-pos-deg</input>
            <noscale/>
            <traverse>
                <setting>
                    <position>0</position>
                    <time>0</time>
                </setting>
                <setting>
                    <position>80</position>
                    <time>1</time>
                </setting>
            </traverse>
        </kinematic>

        <pure_gain name="fcs/fly-by-wire/tef/tef-pos-norm">
            <input>fcs/fly-by-wire/tef/tef-pos-deg</input>
            <gain>0.05</gain>
        </pure_gain>

    </channel>
<!-- end: control system by Nikolai V. Chr. -->


  <channel name="Landing Gear">

   <switch name="fcs/gear-wow">
    <default value="0"/>
    <test logic="AND" value="1">
     gear/unit[1]/WOW eq 1
     gear/unit[2]/WOW eq 1
    </test>
   </switch>

   <kinematic name="fcs/gear-control">
    <input>gear/gear-cmd-norm</input>
    <traverse>
     <setting>
      <position>0</position>
      <time>0</time>
     </setting>
     <setting>
      <position>1</position>
      <time>5</time>
     </setting>
    </traverse>
    <output>gear/gear-pos-norm</output>
   </kinematic>

   <scheduled_gain name="fcs/scheduled-steer-pos-deg">
    <input>fcs/steer-cmd-norm</input>
    <table>
     <independentVar>velocities/vg-fps</independentVar>
     <tableData>
      10.0  80.0
      50.0  15.0
      150.0    2.0
     </tableData>
    </table>
    <output>fcs/steer-pos-deg</output>
   </scheduled_gain>

  </channel>


  <channel name="Speedbrake">
   <!--
     - To prevent deep stall the Flight Computer commands speedbrake
     - deflection at high angle of attack (alpha) and low speeds. This
     - will provide just enough pitch down moment to keep the aircraft
     - under control.
     -->
   <switch name="fcs/speedbrake-alpha-limiter">
    <default value="0"/>
    <test logic="AND" value="1">
     aero/alpha-deg ge 53
     velocities/v-fps le 18
    </test>
   </switch>

   <switch name="fcs/speedbrake-initiate">
    <default value="0"/>
    <test logic="OR" value="1">
     fcs/speedbrake-alpha-limiter eq 1
     fcs/speedbrake-cmd-norm eq 1
    </test>
   </switch>

   <!--
     - Speedbrake deflection is limited to 43 degrees (instead of 60
     - degrees) when the gear is extended to prevent physical
     - speedbrake damage on touchdown.
     -->
   <scheduled_gain name="fcs/speedbrake-scheduler">
    <input>fcs/speedbrake-initiate</input>
    <table>
     <independentVar>gear/gear-cmd-norm</independentVar>
     <tableData>
      0 1.0
      1 0.71667
     </tableData>
    </table>
    <!-- <output>fcs/speedbrake-pos-norm</output> -->
   </scheduled_gain>

   <kinematic name="fcs/speedbrake-control">
    <input>fcs/speedbrake-scheduler</input>
    <traverse>
     <setting>
      <position>0</position>
      <time>0</time>
     </setting>
     <setting>
      <position>60</position>
      <time>2</time>                                      <!-- 2 seconds to deploy -->
     </setting>
    </traverse>
    <output>fcs/speedbrake-pos-deg</output>
   </kinematic>

     <aerosurface_scale name="fcs/speedbrake-position-normalizer">
     <input>fcs/speedbrake-control</input>
     <domain>
    <min>0</min>
    <max>60</max>
     </domain>
     <range>
    <min>0</min>
    <max>1</max>
     </range>
     <output>fcs/speedbrake-pos-norm</output>
   </aerosurface_scale>

  </channel>

  <channel name="Hook">

   <kinematic name="fcs/hook-control">
    <input>fcs/hook-engage</input>
    <traverse>
     <setting>
      <position>0</position>
      <time>0</time>
     </setting>
     <setting>
      <position>1</position>
      <time>2.5</time>
     </setting>
    </traverse>
    <output>fcs/hook-pos-norm</output>
   </kinematic>

  </channel>

  <channel name="Canopy">

   <switch name="fcs/canopy-trigger">
    <default value="fcs/canopy-engage"/>
    <test value="0">
     velocities/u-fps gt 1.0
    </test>
   </switch>

   <kinematic name="fcs/canopy-control">
    <input>fcs/canopy-trigger</input>
    <traverse>
     <setting>
      <position>0</position>
      <time>0</time>
     </setting>
     <setting>
      <position>1</position>
      <time>10</time>
     </setting>
    </traverse>
    <output>fcs/canopy-pos-norm</output>
   </kinematic>

  </channel>

 </flight_control>
<aerodynamics>

<!-- begin: aerodynamics by Nikolai V. Chr.

 Note:
======
In all aero tables that do not have author listed, the numbers was typed in by Nikolai V. Chr.


 Todo:
======
Make all coefficients functions (like Cy is)
Put in engine gyroscopic effect (160 slugs-ft2/sec)


 Missing wind-tunnel data:
==========================
+Gear dynamics
 Ground effect
+Wave drag
+Trailing edge flaps dynamics
 Stores dynamics
 Canopy dynamics
 Dynamics of high speed

-->

    <!--<aero_ref_pt_shift_x>
        <function name="metrics/aero-rp-shift-mac">
            <description>
                Mach-tuck: Transonic Shift of Aerodynamic Center

                An estimate by Nikolai V. Chr.

                Default static margin =-0.04c (5.4336 inch)
                Default CoG           = 0.35c
                Chord                 = 11.32 ft

                0.19 makes the AeroRP move to 0.5c at 1.1 mach.

            </description>
            <table name="table/ACshift">
                <independentVar>velocities/mach</independentVar>
                <tableData>
                  0.6 0
                  0.8 0.05
                  1.1 0.19
                </tableData>
            </table>
        </function>
    </aero_ref_pt_shift_x>-->

    <!-- the following 4 functions are adapted from the FGAddon F16 -->
    <function name="aero/coefficient/CDwave">
        <product>
              <table name="table/CDwave">
                  <independentVar>velocities/mach</independentVar>
                  <tableData>
                      0.000  0.000
                      0.810  0.000
                      1.100  0.028
                      1.800  0.020
                  </tableData>
              </table>
              <table name="table/CDwave_sb">
                  <independentVar>fcs/speedbrake-pos-norm</independentVar>
                  <tableData>
                      0  1.0
                      1  1.5
                  </tableData>
              </table>
        </product>
    </function>

    <function name="aero/coefficient/CDtef">
        <product>
            <property>fcs/fly-by-wire/tef/tef-pos-norm</property>
            <value>0.020</value>
        </product>
    </function>

    <function name="aero/coefficient/CDgear">
        <product>
            <property>gear/gear-pos-norm</property>
            <value>0.025</value>
        </product>
    </function>

    <function name="aero/coefficient/CLtef">
        <product>
            <property>fcs/fly-by-wire/tef/tef-pos-norm</property>
            <value>0.1221731</value>
        </product>
    </function>

    <function name="aero/coefficient/CL_g">
       <description>Change in lift due to ground effect</description>
       <product>
          <table>
           <independentVar>aero/h_b-mac-ft</independentVar>
           <tableData>
             0.0000  0.2290
             0.1000  0.1240
             0.1500  0.1160
             0.2000  0.1240
             0.3000  0.1050
             0.4000  0.0410
             0.5000  0.0340
             0.6000  0.0190
             0.7000  0.0080
             0.8000  0.0030
             0.9000  0.0010
             1.0000  0.0000
             1.1000  0.0000
           </tableData>
          </table>
       </product>
      </function>

    <function name="aero/coefficient/Cx_g">
        <sum>
            <v>1</v>
            <product>
                <property>aero/coefficient/CL_g</property>
                <abs>
                    <sin>
                        <property>aero/alpha-rad</property>
                    </sin>
                </abs>
            </product>
        </sum>
    </function>

    <function name="aero/coefficient/Cz_g">
        <sum>
            <v>1</v>
            <product>
                <property>aero/coefficient/CL_g</property>
                <abs>
                    <cos>
                        <property>aero/alpha-rad</property>
                    </cos>
                </abs>
            </product>
        </sum>
    </function>

    <axis name="X">

        <function name="aero/coefficient/CDx">
            <description>Drag</description>
            <product>
                <property>aero/qbar-psf</property>
                <property>metrics/Sw-sqft</property>
                <sum>
                    <property>aero/coefficient/CDgear</property>
                    <property>aero/coefficient/CDtef</property>
                    <property>aero/coefficient/CDwave</property>
                </sum>
                <cos>
                  <property>aero/alpha-rad</property>
                </cos>
                <v>-1</v>
            </product>
        </function>

        <function name="aero/coefficient/CLx">
            <description>Lift</description>
            <product>
                <property>aero/qbar-psf</property>
                <property>metrics/Sw-sqft</property>
                <sum>
                    <property>aero/coefficient/CLtef</property>
                </sum>
                <sin>
                  <property>aero/alpha-rad</property>
                </sin>
            </product>
        </function>

        <function name="aero/coefficient/Cx">
            <description>
               Cx coefficient in body coordinate system.
            </description>
            <product>
                <property>aero/qbar-psf</property>
                <property>metrics/Sw-sqft</property>
                <!--<p>aero/coefficient/Cx_g</p>-->
                <table name="table/Cx">
                    <independentVar lookup="row">aero/alpha-deg</independentVar>
                    <independentVar lookup="column">aero/beta-deg</independentVar>
                    <independentVar lookup="table">fcs/fly-by-wire/pitch/horz-tail-deflection-deg</independentVar>
                    <tableData breakPoint="-25.0">
       -30    -25    -20    -15    -10     -8     -6     -4     -2      0      2      4      6      8     10     15     20     25     30
-20 -.1837 -.1953 -.1904 -.1899 -.1949 -.1914 -.1872 -.1860 -.1860 -.1868 -.1899 -.1902 -.1900 -.1896 -.1883 -.1833 -.1838 -.1787 -.1771
-15 -.1714 -.1765 -.1792 -.1827 -.1816 -.1834 -.1852 -.1853 -.1877 -.1875 -.1898 -.1876 -.1868 -.1846 -.1841 -.1852 -.1817 -.1790 -.1739
-10 -.1531 -.1627 -.1692 -.1718 -.1695 -.1693 -.1707 -.1735 -.1772 -.1787 -.1769 -.1729 -.1711 -.1706 -.1698 -.1721 -.1695 -.1630 -.1534
-05 -.1151 -.1232 -.1276 -.1317 -.1390 -.1415 -.1420 -.1425 -.1437 -.1432 -.1425 -.1422 -.1410 -.1397 -.1372 -.1299 -.1258 -.1214 -.1133
 00 -.0907 -.0985 -.1043 -.1093 -.1120 -.1115 -.1122 -.1124 -.1130 -.1132 -.1129 -.1119 -.1110 -.1102 -.1092 -.1065 -.1015 -.0957 -.0879
 05 -.0514 -.0567 -.0603 -.0640 -.0653 -.0661 -.0668 -.0675 -.0690 -.0693 -.0686 -.0680 -.0664 -.0650 -.0649 -.0631 -.0594 -.0558 -.0505
 10 -.0079 -.0108 -.0099 -.0101 -.0074 -.0070 -.0078 -.0090 -.0116 -.0120 -.0123 -.0106 -.0088 -.0083 -.0080 -.0107 -.0105 -.0114 -.0085
 15 0.0354 0.0358 0.0388 0.0402 0.0477 0.0503 0.0535 0.0553 0.0538 0.0537 0.0533 0.0536 0.0527 0.0509 0.0485 0.0410 0.0396 0.0366 0.0362
 20 0.0740 0.0756 0.0746 0.0745 0.0867 0.0888 0.0924 0.0941 0.0948 0.0951 0.0975 0.0939 0.0913 0.0867 0.0824 0.0702 0.0703 0.0713 0.0697
 25 0.1092 0.1124 0.1102 0.1067 0.1101 0.1121 0.1126 0.1129 0.1123 0.1111 0.1122 0.1125 0.1136 0.1115 0.1075 0.1041 0.1076 0.1098 0.1066
 30 0.0915 0.1010 0.0975 0.1079 0.1188 0.1333 0.1399 0.1422 0.1443 0.1435 0.1431 0.1407 0.1379 0.1359 0.1323 0.1214 0.1110 0.1145 0.1050
 35 0.1079 0.1137 0.1198 0.1278 0.1402 0.1425 0.1478 0.1570 0.1623 0.1663 0.1667 0.1664 0.1637 0.1560 0.1460 0.1336 0.1256 0.1195 0.1137
 40 0.1306 0.1437 0.1350 0.1441 0.1574 0.1585 0.1601 0.1682 0.1726 0.1739 0.1711 0.1699 0.1655 0.1611 0.1567 0.1434 0.1343 0.1430 0.1299
 45 0.1535 0.1603 0.1605 0.1604 0.1637 0.1671 0.1664 0.1639 0.1674 0.1659 0.1649 0.1650 0.1625 0.1597 0.1573 0.1540 0.1541 0.1539 0.1471
 50 0.1471 0.1584 0.1646 0.1671 0.1712 0.1712 0.1676 0.1644 0.1656 0.1693 0.1714 0.1728 0.1749 0.1725 0.1730 0.1537 0.1457 0.1435 0.1362
 55 0.1554 0.1615 0.1568 0.1661 0.1778 0.1769 0.1765 0.1749 0.1762 0.1804 0.1743 0.1666 0.1677 0.1724 0.1761 0.1722 0.1347 0.1448 0.1442
 60 0.1501 0.1599 0.1647 0.1525 0.1664 0.1662 0.1794 0.1710 0.1719 0.1718 0.1728 0.1730 0.1734 0.1721 0.1688 0.1471 0.1462 0.1486 0.1460
 70 0.1501 0.1536 0.1569 0.1420 0.1573 0.1595 0.1788 0.1715 0.1738 0.1695 0.1710 0.1712 0.1730 0.1720 0.1686 0.1474 0.1567 0.1557 0.1545
 80 0.1685 0.1615 0.1559 0.1520 0.1521 0.1521 0.1535 0.1585 0.1566 0.1598 0.1573 0.1563 0.1586 0.1558 0.1572 0.1410 0.1410 0.1467 0.1538
 90 0.1712 0.1651 0.1608 0.1648 0.1676 0.1660 0.1686 0.1667 0.1669 0.1660 0.1672 0.1662 0.1664 0.1711 0.1677 0.1531 0.1493 0.1549 0.1624
                    </tableData>
                    <tableData breakPoint="-10.0">
       -30    -25    -20    -15    -10     -8     -6     -4     -2      0      2      4      6      8     10     15     20     25     30
-20 -.1362 -.1351 -.1419 -.1386 -.1374 -.1330 -.1268 -.1249 -.1222 -.1223 -.1246 -.1247 -.1252 -.1257 -.1282 -.1294 -.1327 -.1259 -.1270
-15 -.1216 -.1245 -.1235 -.1208 -.1176 -.1176 -.1170 -.1177 -.1184 -.1188 -.1185 -.1187 -.1182 -.1178 -.1184 -.1216 -.1243 -.1253 -.1224
-10 -.1018 -.1066 -.1068 -.1071 -.1061 -.1068 -.1072 -.1083 -.1094 -.1147 -.1095 -.1084 -.1077 -.1063 -.1069 -.1079 -.1076 -.1074 -.1026
-05 -.0655 -.0706 -.0746 -.0771 -.0836 -.0864 -.0876 -.0887 -.0889 -.0893 -.0885 -.0875 -.0859 -.0842 -.0812 -.0747 -.0722 -.0682 -.0631
 00 -.0483 -.0509 -.0532 -.0544 -.0578 -.0589 -.0597 -.0606 -.0613 -.0617 -.0611 -.0603 -.0595 -.0577 -.0561 -.0527 -.0515 -.0492 -.0466
 05 -.0118 -.0106 -.0096 -.0102 -.0142 -.0148 -.0155 -.0161 -.0177 -.0172 -.0178 -.0167 -.0156 -.0141 -.0133 -.0093 -.0087 -.0106 -.0127
 10 0.0268 0.0328 0.0367 0.0399 0.0412 0.0417 0.0408 0.0413 0.0406 0.0399 0.0399 0.0409 0.0415 0.0414 0.0412 0.0399 0.0367 0.0328 0.0268
 15 0.0735 0.0800 0.0887 0.0934 0.0983 0.1006 0.1024 0.1034 0.1033 0.1027 0.1031 0.1027 0.1018 0.1008 0.0983 0.0934 0.0887 0.0800 0.0735
 20 0.1222 0.1275 0.1258 0.1249 0.1326 0.1347 0.1350 0.1349 0.1325 0.1322 0.1332 0.1338 0.1343 0.1310 0.1298 0.1221 0.1230 0.1247 0.1194
 25 0.1374 0.1474 0.1466 0.1454 0.1465 0.1485 0.1485 0.1453 0.1429 0.1407 0.1418 0.1443 0.1457 0.1442 0.1439 0.1428 0.1440 0.1448 0.1348
 30 0.1056 0.1261 0.1297 0.1437 0.1500 0.1619 0.1655 0.1660 0.1663 0.1651 0.1640 0.1643 0.1624 0.1615 0.1593 0.1530 0.1390 0.1354 0.1149
 35 0.1075 0.1154 0.1299 0.1377 0.1523 0.1591 0.1722 0.1789 0.1801 0.1795 0.1793 0.1804 0.1782 0.1749 0.1675 0.1529 0.1451 0.1306 0.1227
 40 0.1335 0.1412 0.1365 0.1456 0.1597 0.1622 0.1725 0.1762 0.1798 0.1798 0.1810 0.1771 0.1710 0.1702 0.1659 0.1518 0.1427 0.1474 0.1397
 45 0.1521 0.1486 0.1517 0.1520 0.1608 0.1613 0.1597 0.1671 0.1667 0.1671 0.1664 0.1653 0.1629 0.1597 0.1569 0.1481 0.1478 0.1447 0.1482
 50 0.1346 0.1410 0.1422 0.1486 0.1561 0.1570 0.1538 0.1511 0.1515 0.1544 0.1549 0.1547 0.1560 0.1538 0.1544 0.1469 0.1405 0.1393 0.1329
 55 0.1375 0.1367 0.1251 0.1336 0.1467 0.1472 0.1475 0.1465 0.1462 0.1488 0.1433 0.1361 0.1370 0.1405 0.1431 0.1300 0.1215 0.1331 0.1339
 60 0.1316 0.1360 0.1355 0.1154 0.1285 0.1289 0.1336 0.1351 0.1372 0.1383 0.1356 0.1320 0.1387 0.1323 0.1310 0.1179 0.1380 0.1385 0.1341
 70 0.1171 0.1174 0.1185 0.1108 0.1161 0.1187 0.1376 0.1312 0.1353 0.1328 0.1301 0.1263 0.1270 0.1281 0.1268 0.1215 0.1292 0.1281 0.1278
 80 0.1201 0.1161 0.1136 0.1124 0.1158 0.1148 0.1149 0.1194 0.1177 0.1211 0.1195 0.1195 0.1225 0.1204 0.1177 0.1143 0.1155 0.1180 0.1220
 90 0.1287 0.1241 0.1214 0.1221 0.1265 0.1256 0.1257 0.1236 0.1248 0.1247 0.1262 0.1256 0.1256 0.1297 0.1257 0.1213 0.1206 0.1233 0.1279
                     </tableData>
                    <tableData breakPoint="0.0">
       -30    -25    -20    -15    -10     -8     -6     -4     -2      0      2      4      6      8     10     15     20     25     30
-20 -.1072 -.1061 -.1129 -.1096 -.1084 -.1040 -.0978 -.0959 -.0932 -.0933 -.0956 -.0957 -.0962 -.0967 -.0992 -.1004 -.1037 -.0969 -.0980
-15 -.1006 -.1035 -.1025 -.0998 -.0966 -.0966 -.0960 -.0967 -.0974 -.0978 -.0975 -.0977 -.0972 -.0968 -.0974 -.1006 -.1033 -.1043 -.1014
-10 -.0853 -.0901 -.0903 -.0906 -.0896 -.0903 -.0907 -.0918 -.0929 -.0982 -.0930 -.0919 -.0912 -.0898 -.0904 -.0914 -.0911 -.0909 -.0861
-05 -.0546 -.0597 -.0637 -.0662 -.0727 -.0755 -.0767 -.0778 -.0780 -.0784 -.0776 -.0766 -.0750 -.0733 -.0703 -.0638 -.0613 -.0573 -.0522
 00 -.0355 -.0381 -.0404 -.0416 -.0450 -.0461 -.0469 -.0478 -.0485 -.0489 -.0483 -.0475 -.0467 -.0449 -.0433 -.0399 -.0387 -.0364 -.0338
 05 -.0012 0.0000 0.0010 0.0004 -.0036 -.0042 -.0049 -.0055 -.0071 -.0066 -.0072 -.0061 -.0050 -.0035 -.0027 0.0013 0.0019 0.0000 -.0021
 10 0.0359 0.0491 0.0458 0.0490 0.0503 0.0508 0.0499 0.0509 0.0497 0.0490 0.0490 0.0500 0.0506 0.0505 0.0503 0.0490 0.0458 0.0419 0.0359
 15 0.0780 0.0845 0.0932 0.0979 0.1028 0.1051 0.1069 0.1079 0.1078 0.1072 0.1076 0.1072 0.1063 0.1053 0.1028 0.0979 0.0932 0.0845 0.0780
 20 0.1183 0.1236 0.1219 0.1210 0.1287 0.1308 0.1311 0.1310 0.1286 0.1283 0.1293 0.1299 0.1304 0.1271 0.1259 0.1182 0.1191 0.1208 0.1155
 25 0.1267 0.1367 0.1359 0.1347 0.1358 0.1378 0.1378 0.1346 0.1322 0.1300 0.1311 0.1336 0.1350 0.1335 0.1332 0.1321 0.1333 0.1341 0.1241
 30 0.0941 0.1146 0.1182 0.1322 0.1385 0.1504 0.1540 0.1545 0.1548 0.1536 0.1525 0.1528 0.1509 0.1500 0.1478 0.1415 0.1275 0.1239 0.1034
 35 0.0885 0.0964 0.1109 0.1189 0.1333 0.1391 0.1532 0.1599 0.1611 0.1605 0.1603 0.1614 0.1592 0.1559 0.1485 0.1339 0.1261 0.1116 0.1037
 40 0.1089 0.1166 0.1119 0.1210 0.1351 0.1376 0.1479 0.1516 0.1552 0.1552 0.1564 0.1525 0.1464 0.1456 0.1413 0.1272 0.1181 0.1228 0.1151
 45 0.1232 0.1197 0.1228 0.1231 0.1319 0.1324 0.1308 0.1332 0.1378 0.1382 0.1375 0.1364 0.1340 0.1380 0.1280 0.1192 0.1189 0.1158 0.1193
 50 0.1135 0.1185 0.1184 0.1171 0.1243 0.1279 0.1279 0.1258 0.1257 0.1281 0.1258 0.1228 0.1221 0.1186 0.1180 0.1108 0.1121 0.1122 0.1072
 55 0.1137 0.1195 0.1146 0.1161 0.1209 0.1211 0.1211 0.1195 0.1183 0.1200 0.1185 0.1153 0.1160 0.1152 0.1135 0.1087 0.1072 0.1121 0.1063
 60 0.1037 0.1090 0.1094 0.1049 0.1109 0.1123 0.1181 0.1184 0.1170 0.1147 0.1141 0.1126 0.1129 0.1129 0.1109 0.1049 0.1094 0.1090 0.1037
 70 0.0857 0.0858 0.0857 0.0796 0.0851 0.0919 0.1150 0.1087 0.1089 0.1025 0.1022 0.1007 0.1012 0.0994 0.0952 0.0897 0.0958 0.0959 0.0958
 80 0.0842 0.0807 0.0787 0.0778 0.0791 0.0793 0.0805 0.0846 0.0808 0.0821 0.0802 0.0799 0.0826 0.0800 0.0709 0.0756 0.0765 0.0785 0.0820
 90 0.0847 0.0813 0.0798 0.0824 0.0843 0.0843 0.0853 0.0841 0.0858 0.0864 0.0857 0.0828 0.0817 0.0857 0.0816 0.0797 0.0771 0.0786 0.0820
                    </tableData>
                    <tableData breakPoint="10.0">
       -30    -25    -20    -15    -10     -8     -6     -4     -2      0      2      4      6      8     10     15     20     25     30
-20 -.1023 -.1012 -.1080 -.1047 -.1035 -.0991 -.0929 -.0910 -.0884 -.0884 -.0907 -.0908 -.0913 -.0918 -.0943 -.0955 -.0988 -.0920 -.0931
-15 -.1038 -.1067 -.1057 -.1030 -.0998 -.0988 -.0992 -.0999 -.1006 -.1010 -.1007 -.1009 -.1004 -.1000 -.1006 -.1038 -.1065 -.1075 -.1046
-10 -.0963 -.1011 -.1013 -.1016 -.1006 -.1013 -.1017 -.1028 -.1039 -.1092 -.1040 -.1029 -.1022 -.1008 -.1014 -.1024 -.1021 -.1019 -.0971
-05 -.0664 -.0715 -.0755 -.0780 -.0845 -.0873 -.0885 -.0896 -.0898 -.0902 -.0894 -.0884 -.0868 -.0851 -.0821 -.0756 -.0731 -.0691 -.0640
 00 -.0472 -.0498 -.0521 -.0533 -.0567 -.0578 -.0586 -.0595 -.0602 -.0606 -.0600 -.0592 -.0584 -.0566 -.0550 -.0516 -.0504 -.0481 -.0455
 05 -.0146 -.0134 -.0124 -.0130 -.0170 -.0176 -.0183 -.0189 -.0205 -.0200 -.0206 -.0195 -.0184 -.0169 -.0161 -.0121 -.0115 -.0134 -.0155
 10 0.0182 0.0242 0.0281 0.0313 0.0326 0.0331 0.0322 0.0327 0.0320 0.0313 0.0313 0.0323 0.0329 0.0328 0.0326 0.0313 0.0281 0.0242 0.0182
 15 0.0537 0.0602 0.0689 0.0736 0.0785 0.0808 0.0826 0.0836 0.0835 0.0829 0.0833 0.0829 0.0820 0.0810 0.0785 0.0736 0.0689 0.0602 0.0537
 20 0.0871 0.0924 0.0907 0.0898 0.0975 0.0996 0.0999 0.0998 0.0974 0.0971 0.0981 0.0987 0.0992 0.0959 0.0947 0.0870 0.0879 0.0896 0.0843
 25 0.0916 0.1016 0.1008 0.0996 0.1007 0.1027 0.1027 0.0995 0.0971 0.0949 0.0960 0.0985 0.0999 0.0984 0.0981 0.0970 0.0982 0.0990 0.0890
 30 0.0509 0.0714 0.0750 0.0890 0.0953 0.1072 0.1108 0.1113 0.1116 0.1104 0.1093 0.1096 0.1077 0.1068 0.1046 0.0983 0.0843 0.0807 0.0602
 35 0.0481 0.0560 0.0705 0.0783 0.0929 0.0987 0.1128 0.1195 0.1207 0.1201 0.1199 0.1210 0.1188 0.1155 0.1081 0.0935 0.0857 0.0712 0.0633
 40 0.0664 0.0741 0.0694 0.0785 0.0926 0.0951 0.1054 0.1091 0.1127 0.1127 0.1139 0.1100 0.1039 0.1031 0.0988 0.0847 0.0756 0.0803 0.0726
 45 0.0846 0.0811 0.0842 0.0845 0.0933 0.0938 0.0922 0.0946 0.0992 0.0996 0.0989 0.0978 0.0954 0.0922 0.0894 0.0806 0.0803 0.0772 0.0807
 50 0.0908 0.0985 0.1011 0.0999 0.1063 0.1061 0.1018 0.0996 0.1021 0.1071 0.1071 0.1064 0.1070 0.1036 0.1032 0.0968 0.0980 0.0954 0.0877
 55 0.0842 0.0869 0.0790 0.0882 0.1025 0.1010 0.0993 0.0980 0.0991 0.1030 0.0972 0.0897 0.0914 0.0969 0.1015 0.0872 0.0780 0.0859 0.0832
 60 0.0749 0.0823 0.0849 0.0794 0.0831 0.0841 0.0896 0.0908 0.0915 0.0914 0.0908 0.0893 0.0895 0.0889 0.0868 0.0831 0.0886 0.0860 0.0786
 70 0.0504 0.0500 0.0504 0.0467 0.0813 0.0811 0.0972 0.0950 0.1075 0.1190 0.1101 0.1001 0.0967 0.0958 0.0931 0.0585 0.0622 0.0618 0.0622
 80 0.0421 0.0380 0.0355 0.0397 0.0420 0.0417 0.0424 0.0478 0.0473 0.0519 0.0484 0.0465 0.0489 0.0472 0.0450 0.0427 0.0385 0.0410 0.0451
 90 0.0433 0.0404 0.0395 0.0467 0.0495 0.0492 0.0499 0.0484 0.0500 0.0504 0.0495 0.0463 0.0457 0.0510 0.0482 0.0454 0.0382 0.0391 0.0420
                    </tableData>
                    <tableData breakPoint="25.0">
       -30    -25    -20    -15    -10     -8     -6     -4     -2      0      2      4      6      8     10     15     20     25     30
-20 -.1068 -.1102 -.1160 -.1176 -.1291 -.1289 -.1244 -.1158 -.1137 -.1141 -.1164 -.1192 -.1200 -.1240 -.1243 -.1128 -.1112 -.1054 -.1020
-15 -.1122 -.1180 -.1227 -.1292 -.1365 -.1397 -.1406 -.1416 -.1442 -.1450 -.1448 -.1428 -.1408 -.1440 -.1397 -.1324 -.1259 -.1212 -.1154
-10 -.1102 -.1212 -.1319 -.1359 -.1403 -.1427 -.1454 -.1480 -.1520 -.1633 -.1518 -.1482 -.1457 -.1438 -.1419 -.1375 -.1335 -.1228 -.1118
-05 -.0911 -.1027 -.1093 -.1144 -.1244 -.1304 -.1316 -.1320 -.1333 -.1337 -.1340 -.1322 -.1309 -.1280 -.1243 -.1143 -.1092 -.1026 -.0910
 00 -.0811 -.0889 -.0955 -.0996 -.1015 -.1037 -.1056 -.1065 -.1077 -.1075 -.1072 -.1061 -.1045 -.1024 -.1003 -.0984 -.0943 -.0877 -.0799
 05 -.0575 -.0588 -.0631 -.0676 -.0671 -.0694 -.0715 -.0739 -.0775 -.0785 -.0787 -.0744 -.0704 -.0688 -.0669 -.0674 -.0624 -.0586 -.0573
 10 -.0183 -.0188 -.0211 -.0241 -.0226 -.0254 -.0291 -.0333 -.0370 -.0336 -.0345 -.0326 -.0283 -.0247 -.0236 -.0251 -.0221 -.0198 -.0193
 15 0.0195 0.0186 0.0204 0.0186 0.0194 0.0181 0.0154 0.0162 0.0198 0.0212 0.0157 0.0131 0.0136 0.0158 0.0179 0.0171 0.0189 0.0171 0.0180
 20 0.0494 0.0626 0.0562 0.0477 0.0323 0.0279 0.0289 0.0263 0.0204 0.0187 0.0173 0.0255 0.0183 0.0165 0.0119 0.0273 0.0358 0.0422 0.0290
 25 0.0699 0.0695 0.0627 0.0557 0.0366 0.0316 0.0263 0.0207 0.0160 0.0198 0.0165 0.0218 0.0244 0.0228 0.0214 0.0405 0.0475 0.0543 0.0547
 30 0.0207 0.0324 0.0323 0.0293 0.0304 0.0404 0.0419 0.0404 0.0385 0.0381 0.0374 0.0379 0.0389 0.0417 0.0446 0.0435 0.0465 0.0466 0.0349
 35 0.0211 0.0282 0.0309 0.0263 0.0307 0.0334 0.0437 0.0466 0.0458 0.0479 0.0495 0.0495 0.0487 0.0467 0.0434 0.0390 0.0435 0.0409 0.0338
 40 0.0386 0.0462 0.0331 0.0339 0.0365 0.0407 0.0394 0.0411 0.0407 0.0418 0.0413 0.0426 0.0392 0.0405 0.0381 0.0355 0.0347 0.0478 0.0402
 45 0.0460 0.0438 0.0341 0.0311 0.0348 0.0373 0.0362 0.0335 0.0338 0.0363 0.0325 0.0340 0.0342 0.0356 0.0338 0.0301 0.0331 0.0428 0.0450
 50 0.0394 0.0479 0.0513 0.0447 0.0538 0.0528 0.0483 0.0441 0.0444 0.0472 0.0488 0.0497 0.0507 0.0487 0.0495 0.0478 0.0525 0.0476 0.0376
 55 0.0336 0.0411 0.0380 0.0471 0.0543 0.0508 0.0471 0.0445 0.0450 0.0484 0.0442 0.0383 0.0410 0.0471 0.0522 0.0432 0.0272 0.0347 0.0315
 60 0.0158 0.0284 0.0361 0.0335 0.0487 0.0443 0.0442 0.0432 0.0451 0.0460 0.0451 0.0433 0.0435 0.0438 0.0416 0.0363 0.0397 0.0340 0.0246
 70 -.0186 -.0121 -.0057 -.0070 0.0410 0.0451 0.0655 0.0604 0.0655 0.0641 0.0677 0.0701 0.0702 0.0636 0.0546 0.0033 0.0020 -.0005 0.0058
 80 -.0242 -.0267 -.0277 -.0200 -.0215 -.0224 -.0223 -.0180 -.0202 -.0173 -.0046 0.0281 0.0311 0.0053 -.0210 -.0288 -.0312 -.0240 -.0152
 90 -.0208 -.0271 -.0315 -.0229 -.0156 -.0165 -.0141 -.0184 -.0173 -.0173 -.0168 -.0185 -.0183 -.0130 -.0157 -.0237 -.0323 -.0246 -.0150
                     </tableData>
                </table>
            </product>
        </function>

        <function name="aero/coefficient/dCx_lef">
            <description>
               Cx due to leading edge flaps coefficient.
            </description>
            <product>
                <property>aero/qbar-psf</property>
                <property>metrics/Sw-sqft</property>
                <property>fcs/fly-by-wire/lef/lef-pos-r-norm</property>
                <difference>
                    <table name="table/Cx_lef">
                        <independentVar lookup="row">aero/alpha-deg</independentVar>
                        <independentVar lookup="column">aero/beta-deg</independentVar>
                        <tableData>
       -30    -25    -20    -15    -10     -8     -6     -4     -2      0      2      4      6      8     10     15     20     25     30
-20 -.0277 -.0285 -.0318 -.0256 -.0184 -.0156 -.0159 -.0162 -.0174 -.0181 -.0179 -.0167 -.0168 -.0156 -.0153 -.0225 -.0287 -.0254 -.0246
-15 -.0314 -.0310 -.0259 -.0191 -.0161 -.0157 -.0162 -.0173 -.0189 -.0193 -.0186 -.0186 -.0170 -.0155 -.0154 -.0184 -.0252 -.0303 -.0307
-10 -.0295 -.0298 -.0260 -.0233 -.0209 -.0215 -.0214 -.0224 -.0230 -.0224 -.0220 -.0217 -.0213 -.0205 -.0199 -.0223 -.0250 -.0288 -.0285
-05 -.0148 -.0153 -.0163 -.0150 -.0167 -.0173 -.0185 -.0189 -.0193 -.0196 -.0192 -.0185 -.0179 -.0178 -.0162 -.0155 -.0168 -.0158 -.0153
 00 -.0136 -.0149 -.0143 -.0136 -.0168 -.0178 -.0182 -.0188 -.0197 -.0202 -.0196 -.0188 -.0180 -.0172 -.0160 -.0144 -.0151 -.0149 -.0144
 05 -.0029 -.0010 -.0003 -.0005 -.0004 -.0006 -.0017 -.0027 -.0033 -.0033 -.0033 -.0024 -.0014 -.0004 0.0004 0.0013 0.0011 -.0002 -.0021
 10 0.0085 0.0104 0.0116 0.0121 0.0131 0.0125 0.0122 0.0119 0.0104 0.0099 0.0096 0.0106 0.0117 0.0126 0.0127 0.0117 0.0112 0.0100 0.0081
 15 0.0145 0.0168 0.0196 0.0218 0.0225 0.0231 0.0238 0.0238 0.0231 0.0224 0.0224 0.0226 0.0227 0.0223 0.0222 0.0215 0.0193 0.0165 0.0142
 20 0.0165 0.0170 0.0205 0.0226 0.0252 0.0245 0.0236 0.0232 0.0233 0.0221 0.0232 0.0241 0.0250 0.0267 0.0276 0.0250 0.0229 0.0212 0.0189
 25 0.0138 0.0172 0.0157 0.0178 0.0226 0.0251 0.0264 0.0274 0.0271 0.0278 0.0275 0.0271 0.0267 0.0249 0.0252 0.0203 0.0183 0.0198 0.0164
 30 0.0092 0.0122 0.0129 0.0165 0.0202 0.0253 0.0279 0.0295 0.0296 0.0301 0.0309 0.0306 0.0278 0.0261 0.0247 0.0200 0.0174 0.0167 0.0137
 35 0.0099 0.0134 0.0162 0.0149 0.0208 0.0229 0.0273 0.0286 0.0303 0.0305 0.0286 0.0307 0.0292 0.0259 0.0253 0.0194 0.0207 0.0179 0.0144
 40 0.0206 0.0202 0.0236 0.0246 0.0289 0.0293 0.0290 0.0320 0.0317 0.0328 0.0314 0.0305 0.0289 0.0281 0.0262 0.0219 0.0209 0.0175 0.0179
 45 0.0257 0.0274 0.0266 0.0236 0.0266 0.0283 0.0236 0.0298 0.0268 0.0309 0.0307 0.0280 0.0238 0.0284 0.0254 0.0224 0.0254 0.0262 0.0245
                        </tableData>
                    </table>
                    <table name="table/Cx_dh0">
                        <independentVar lookup="row">aero/alpha-deg</independentVar>
                        <independentVar lookup="column">aero/beta-deg</independentVar>
                        <tableData>
       -30    -25    -20    -15    -10     -8     -6     -4     -2      0      2      4      6      8     10     15     20     25     30
-20 -.1072 -.1061 -.1129 -.1096 -.1084 -.1040 -.0978 -.0959 -.0932 -.0933 -.0956 -.0957 -.0962 -.0967 -.0992 -.1004 -.1037 -.0969 -.0980
-15 -.1006 -.1035 -.1025 -.0998 -.0966 -.0966 -.0960 -.0967 -.0974 -.0978 -.0975 -.0977 -.0972 -.0968 -.0974 -.1006 -.1033 -.1043 -.1014
-10 -.0853 -.0901 -.0903 -.0906 -.0896 -.0903 -.0907 -.0918 -.0929 -.0982 -.0930 -.0919 -.0912 -.0898 -.0904 -.0914 -.0911 -.0909 -.0861
-05 -.0546 -.0597 -.0637 -.0662 -.0727 -.0755 -.0767 -.0778 -.0780 -.0784 -.0776 -.0766 -.0750 -.0733 -.0703 -.0638 -.0613 -.0573 -.0522
 00 -.0355 -.0381 -.0404 -.0416 -.0450 -.0461 -.0469 -.0478 -.0485 -.0489 -.0483 -.0475 -.0467 -.0449 -.0433 -.0399 -.0387 -.0364 -.0338
 05 -.0012 0.0000 0.0010 0.0004 -.0036 -.0042 -.0049 -.0055 -.0071 -.0066 -.0072 -.0061 -.0050 -.0035 -.0027 0.0013 0.0019 0.0000 -.0021
 10 0.0359 0.0491 0.0458 0.0490 0.0503 0.0508 0.0499 0.0509 0.0497 0.0490 0.0490 0.0500 0.0506 0.0505 0.0503 0.0490 0.0458 0.0419 0.0359
 15 0.0780 0.0845 0.0932 0.0979 0.1028 0.1051 0.1069 0.1079 0.1078 0.1072 0.1076 0.1072 0.1063 0.1053 0.1028 0.0979 0.0932 0.0845 0.0780
 20 0.1183 0.1236 0.1219 0.1210 0.1287 0.1308 0.1311 0.1310 0.1286 0.1283 0.1293 0.1299 0.1304 0.1271 0.1259 0.1182 0.1191 0.1208 0.1155
 25 0.1267 0.1367 0.1359 0.1347 0.1358 0.1378 0.1378 0.1346 0.1322 0.1300 0.1311 0.1336 0.1350 0.1335 0.1332 0.1321 0.1333 0.1341 0.1241
 30 0.0941 0.1146 0.1182 0.1322 0.1385 0.1504 0.1540 0.1545 0.1548 0.1536 0.1525 0.1528 0.1509 0.1500 0.1478 0.1415 0.1275 0.1239 0.1034
 35 0.0885 0.0964 0.1109 0.1189 0.1333 0.1391 0.1532 0.1599 0.1611 0.1605 0.1603 0.1614 0.1592 0.1559 0.1485 0.1339 0.1261 0.1116 0.1037
 40 0.1089 0.1166 0.1119 0.1210 0.1351 0.1376 0.1479 0.1516 0.1552 0.1552 0.1564 0.1525 0.1464 0.1456 0.1413 0.1272 0.1181 0.1228 0.1151
 45 0.1232 0.1197 0.1228 0.1231 0.1319 0.1324 0.1308 0.1332 0.1378 0.1382 0.1375 0.1364 0.1340 0.1380 0.1280 0.1192 0.1189 0.1158 0.1193
 50 0.1135 0.1185 0.1184 0.1171 0.1243 0.1279 0.1279 0.1258 0.1257 0.1281 0.1258 0.1228 0.1221 0.1186 0.1180 0.1108 0.1121 0.1122 0.1072
 55 0.1137 0.1195 0.1146 0.1161 0.1209 0.1211 0.1211 0.1195 0.1183 0.1200 0.1185 0.1153 0.1160 0.1152 0.1135 0.1087 0.1072 0.1121 0.1063
 60 0.1037 0.1090 0.1094 0.1049 0.1109 0.1123 0.1181 0.1184 0.1170 0.1147 0.1141 0.1126 0.1129 0.1129 0.1109 0.1049 0.1094 0.1090 0.1037
 70 0.0857 0.0858 0.0857 0.0796 0.0851 0.0919 0.1150 0.1087 0.1089 0.1025 0.1022 0.1007 0.1012 0.0994 0.0952 0.0897 0.0958 0.0959 0.0958
 80 0.0842 0.0807 0.0787 0.0778 0.0791 0.0793 0.0805 0.0846 0.0808 0.0821 0.0802 0.0799 0.0826 0.0800 0.0709 0.0756 0.0765 0.0785 0.0820
 90 0.0847 0.0813 0.0798 0.0824 0.0843 0.0843 0.0853 0.0841 0.0858 0.0864 0.0857 0.0828 0.0817 0.0857 0.0816 0.0797 0.0771 0.0786 0.0820
                        </tableData>
                    </table>
                </difference>
            </product>
        </function>

        <function name="aero/coefficient/dCx_sb">
            <description>
               Cx due speed brake coefficient.
            </description>
            <product>
                <property>aero/qbar-psf</property>
                <property>metrics/Sw-sqft</property>
                <property>fcs/speedbrake-pos-norm</property>
                <table name="table/dCx_sb">
                    <independentVar lookup="row">aero/alpha-deg</independentVar>
                    <tableData>
-20 -.0101
-15 -.0101
-10 -.0101
-05 -.0101
 00 -.0101
 05 -.0358
 10 -.0790
 15 -.1227
 20 -.1827
 25 -.1892
 30 -.1988
 35 -.2000
 40 -.1874
 45 -.1673
 50 -.1476
 55 -.1310
 60 -.1279
 70 -.1325
 80 -.1250
 90 -.1250
                     </tableData>
                </table>
            </product>
        </function>

        <function name="aero/coefficient/Cx_q">
            <description>
               Cx due to pitch rate coefficient.
            </description>
            <product>
                <property>aero/qbar-psf</property>
                <property>metrics/Sw-sqft</property>
                <property>aero/ci2vel</property>
                <property>velocities/q-rad_sec</property>
                <table name="table/Cx_q">
                    <independentVar lookup="row">aero/alpha-deg</independentVar>
                    <tableData>
-20 .953
-15 .953
-10 .953
-05 1.55
 00 1.90
 05 2.46
 10 2.92
 15 3.30
 20 2.76
 25 2.05
 30 1.50
 35 1.49
 40 1.83
 45 1.21
 50 1.33
 55 1.61
 60 .910
 70 3.43
 80 .617
 90 .273
                    </tableData>
                </table>
            </product>
        </function>

        <function name="aero/coefficient/dCx_q-lef">
            <description>
               Cx due to pitch rate due to leading edge flaps coefficient.
            </description>
            <product>
                <property>aero/qbar-psf</property>
                <property>metrics/Sw-sqft</property>
                <property>aero/ci2vel</property>
                <property>velocities/q-rad_sec</property>
                <property>fcs/fly-by-wire/lef/lef-pos-r-norm</property>
                <table name="table/dCx_q-lef">
                    <independentVar lookup="row">aero/alpha-deg</independentVar>
                    <tableData>
-20 -1.22
-15 -1.22
-10 -1.22
-05 -1.66
 00 -1.62
 05 -1.58
 10 -1.96
 15 -2.51
 20 -2.04
 25 -1.64
 30 -.824
 35 -.817
 40 -1.10
 45 -.550
                     </tableData>
                </table>
            </product>
        </function>

    </axis>


    <axis name="Z">

        <function name="aero/coefficient/CDz">
            <description>Drag</description>
            <product>
                <property>aero/qbar-psf</property>
                <property>metrics/Sw-sqft</property>
                <sum>
                    <property>aero/coefficient/CDgear</property>
                    <property>aero/coefficient/CDtef</property>
                    <property>aero/coefficient/CDwave</property>
                </sum>
                <sin>
                  <property>aero/alpha-rad</property>
                </sin>
                <v>-1</v>
            </product>
        </function>

        <function name="aero/coefficient/CLz">
            <description>Lift</description>
            <product>
                <property>aero/qbar-psf</property>
                <property>metrics/Sw-sqft</property>
                <sum>
                    <property>aero/coefficient/CLtef</property>
                </sum>
                <cos>
                  <property>aero/alpha-rad</property>
                </cos>
                <v>-1</v>
            </product>
        </function>

        <function name="aero/coefficient/Cz">
            <description>
               Cz coefficient
            </description>
            <product>
                <property>aero/qbar-psf</property>
                <property>metrics/Sw-sqft</property>
                <!--<p>aero/coefficient/Cz_g</p>-->
                <table name="table/Cz">
                    <independentVar lookup="row">aero/alpha-deg</independentVar>
                    <independentVar lookup="column">aero/beta-deg</independentVar>
                    <independentVar lookup="table">fcs/fly-by-wire/pitch/horz-tail-deflection-deg</independentVar>
                    <tableData breakPoint="-25.0">
       -30    -25    -20    -15    -10     -8     -6     -4     -2      0      2      4      6      8     10     15     20     25     30
-20 1.1940 1.2720 1.3110 1.3560 1.3960 1.3470 1.3390 1.3140 1.3210 1.3150 1.3370 1.3320 1.3400 1.3380 1.2940 1.2350 1.1850 1.1400 1.1000
-15 0.9960 1.0570 1.0900 1.1210 1.1280 1.1290 1.1310 1.1430 1.1580 1.1710 1.1770 1.1420 1.1480 1.1310 1.1370 1.1300 1.1000 1.0600 1.0050
-10 0.7930 0.8320 0.8410 0.8560 0.8870 0.8888 0.8990 0.9090 0.9150 0.9250 0.9100 0.8920 0.8890 0.8810 0.8750 0.8350 0.8210 0.8150 0.7800
-05 0.4100 0.4100 0.4200 0.4250 0.4510 0.4640 0.4740 0.4720 0.4740 0.4690 0.4600 0.4540 0.4470 0.4460 0.4400 0.4240 0.4050 0.3940 0.4030
 00 0.1800 0.1550 0.1350 0.1300 0.1410 0.1490 0.1540 0.1530 0.1510 0.1550 0.1540 0.1510 0.1470 0.1380 0.1390 0.1190 0.1370 0.1230 0.1590
 05 -0.090 -0.130 -0.160 -0.180 -0.184 -0.186 -0.182 -0.187 -0.187 -0.189 -0.193 -0.191 -0.193 -0.195 -0.194 -0.187 -0.171 -0.133 -0.099
 10 -0.340 -0.405 -0.460 -0.498 -0.511 -0.518 -0.526 -0.535 -0.534 -0.530 -0.532 -0.525 -0.520 -0.521 -0.515 -0.498 -0.465 -0.402 -0.341
 15 -0.610 -0.665 -0.720 -0.770 -0.806 -0.818 -0.837 -0.849 -0.851 -0.856 -0.854 -0.855 -0.855 -0.836 -0.827 -0.801 -0.738 -0.664 -0.602
 20 -0.870 -0.950 -1.015 -1.080 -1.122 -1.137 -1.149 -1.154 -1.156 -1.169 -1.151 -1.148 -1.146 -1.135 -1.129 -1.077 -0.994 -0.943 -0.873
 25 -1.170 -1.235 -1.295 -1.355 -1.406 -1.405 -1.429 -1.441 -1.446 -1.446 -1.452 -1.449 -1.455 -1.440 -1.415 -1.356 -1.288 -1.217 -1.167
 30 -1.315 -1.380 -1.445 -1.515 -1.581 -1.671 -1.697 -1.714 -1.719 -1.717 -1.720 -1.709 -1.684 -1.670 -1.651 -1.580 -1.477 -1.463 -1.389
 35 -1.520 -1.570 -1.635 -1.710 -1.788 -1.818 -1.838 -1.889 -1.910 -1.909 -1.909 -1.893 -1.891 -1.846 -1.800 -1.721 -1.640 -1.590 -1.531
 40 -1.600 -1.670 -1.730 -1.810 -1.891 -1.907 -1.911 -1.983 -2.016 -2.037 -1.932 -1.990 -1.969 -1.836 -1.918 -1.839 -1.755 -1.671 -1.630
 45 -1.560 -1.615 -1.685 -1.750 -1.854 -1.991 -2.033 -1.939 -2.003 -1.985 -2.020 -2.040 -1.913 -1.918 -1.946 -1.911 -1.824 -1.689 -1.663
 50 -1.300 -1.480 -1.600 -1.720 -1.880 -1.924 -1.913 -1.866 -1.879 -1.959 -1.992 -2.017 -2.030 -1.942 -2.002 -1.870 -1.738 -1.623 -1.447
 55 -1.705 -1.795 -1.825 -1.850 -1.938 -1.959 -2.012 -1.999 -1.969 -2.010 -1.965 -1.847 -1.895 -1.928 -1.965 -1.755 -1.697 -1.706 -1.618
 60 -1.700 -1.740 -1.730 -1.895 -1.933 -1.880 -1.907 -1.898 -1.892 -1.916 -1.936 -1.877 -1.933 -1.952 -1.915 -1.780 -1.750 -1.750 -1.688
 70 -1.690 -1.740 -1.735 -1.830 -1.813 -1.864 -2.004 -1.950 -1.925 -1.957 -1.905 -1.833 -1.932 -1.952 -1.893 -1.800 -1.853 -1.799 -1.791
 80 -1.935 -1.950 -1.945 -1.920 -1.872 -1.838 -1.908 -1.949 -1.826 -1.816 -1.837 -1.755 -1.848 -1.858 -1.774 -1.810 -1.864 -1.885 -1.834
 90 -1.960 -1.935 -1.850 -1.870 -1.953 -2.036 -2.013 -1.968 -1.990 -1.978 -1.957 -1.956 -1.962 -2.048 -1.970 -1.895 -1.890 -1.969 -1.970
                    </tableData>
                    <tableData breakPoint="-10.0" note="Numbers in this table typed in by E.V.Oort and L.Sonneveldt">
       -30    -25    -20    -15    -10     -8     -6     -4     -2      0      2      4      6      8     10     15     20     25     30
-20  1.149  1.214  1.264  1.294  1.327  1.283  1.266  1.245  1.234  1.228  1.258  1.257  1.268  1.265  1.236  1.196  1.154  1.109  1.063
-15  0.948  0.995  1.021  1.047  1.043  1.040  1.037  1.042  1.050  1.059  1.066  1.048  1.051  1.040  1.053  1.051  1.031  0.999  0.955
-10  0.755  0.778  0.777  0.788  0.801  0.799  0.803  0.804  0.812  0.815  0.813  0.805  0.804  0.800  0.797  0.776  0.769  0.765  0.747
-05  0.320  0.320  0.327  0.332  0.350  0.365  0.370  0.372  0.357  0.356  0.352  0.349  0.343  0.337  0.328  0.317  0.309  0.295  0.306
 00  0.086  0.061  0.041  0.039  0.052  0.056  0.062  0.062  0.061  0.064  0.062  0.061  0.058  0.053  0.047  0.035  0.049  0.044  0.076
 05 -0.192 -0.232 -0.262 -0.279 -0.280 -0.284 -0.281 -0.287 -0.287 -0.287 -0.289 -0.291 -0.289 -0.291 -0.293 -0.292 -0.275 -0.244 -0.205
 10 -0.455 -0.522 -0.575 -0.611 -0.624 -0.632 -0.641 -0.647 -0.650 -0.650 -0.651 -0.646 -0.642 -0.638 -0.635 -0.622 -0.587 -0.524 -0.463
 15 -0.714 -0.784 -0.846 -0.898 -0.933 -0.949 -0.967 -0.976 -0.977 -0.980 -0.980 -0.978 -0.977 -0.963 -0.951 -0.923 -0.864 -0.790 -0.717
 20 -1.005 -1.088 -1.161 -1.223 -1.263 -1.284 -1.299 -1.306 -1.302 -1.306 -1.292 -1.289 -1.287 -1.279 -1.266 -1.220 -1.146 -1.090 -1.005
 25 -1.313 -1.378 -1.445 -1.509 -1.560 -1.566 -1.583 -1.590 -1.595 -1.594 -1.597 -1.595 -1.595 -1.584 -1.566 -1.505 -1.445 -1.374 -1.307
 30 -1.418 -1.498 -1.578 -1.663 -1.746 -1.825 -1.848 -1.861 -1.861 -1.863 -1.863 -1.856 -1.836 -1.816 -1.795 -1.735 -1.613 -1.557 -1.470
 35 -1.542 -1.629 -1.719 -1.819 -1.919 -1.977 -2.033 -2.064 -2.079 -2.090 -2.081 -2.075 -2.067 -2.034 -1.989 -1.896 -1.800 -1.696 -1.613
 40 -1.671 -1.768 -1.862 -1.967 -2.074 -2.077 -2.151 -2.184 -2.199 -2.216 -2.192 -2.194 -2.084 -2.110 -2.111 -1.996 -1.900 -1.787 -1.702
 45 -1.615 -1.577 -1.770 -1.963 -2.130 -2.217 -2.184 -2.216 -2.306 -2.263 -2.304 -2.304 -2.242 -2.235 -2.210 -2.121 -1.891 -1.654 -1.696
 50 -1.406 -1.592 -1.716 -1.944 -2.026 -2.081 -2.081 -2.033 -2.031 -2.097 -2.118 -2.131 -2.142 -2.062 -2.129 -2.047 -1.819 -1.695 -1.509
 55 -1.688 -1.738 -1.721 -1.809 -2.014 -2.048 -2.112 -2.100 -2.058 -2.088 -2.067 -1.972 -2.016 -2.019 -2.025 -1.820 -1.732 -1.749 -1.669
 60 -1.724 -1.793 -1.800 -1.756 -1.949 -1.923 -1.975 -1.990 -2.005 -2.051 -2.021 -1.914 -1.956 -1.998 -1.985 -1.792 -1.836 -1.829 -1.760
 70 -1.743 -1.754 -1.811 -1.781 -1.839 -1.897 -2.004 -1.999 -1.986 -2.027 -1.943 -1.835 -1.925 -1.993 -1.921 -1.863 -1.893 -1.836 -1.825
 80 -1.935 -1.993 -1.979 -1.991 -1.928 -1.877 -1.931 -1.981 -1.892 -1.916 -1.938 -1.856 -1.943 -1.947 -1.848 -1.911 -1.899 -1.913 -1.855
 90 -1.990 -2.009 -1.950 -1.979 -2.006 -2.085 -2.019 -2.007 -2.019 -1.998 -1.990 -2.004 -2.036 -2.102 -2.003 -1.976 -1.947 -2.006 -1.987
                     </tableData>
                    <tableData breakPoint="0.0">
       -30    -25    -20    -15    -10     -8     -6     -4     -2      0      2      4      6      8     10     15     20     25     30
-20 1.0910 1.1400 1.2030 1.2150 1.2390 1.2010 1.1710 1.1570 1.1220 1.1160 1.1560 1.1600 1.1750 1.1720 1.1610 1.1450 1.1150 1.0700 1.0150
-15 0.9050 0.9390 0.9590 0.9800 0.9670 0.9600 0.9540 0.9510 0.9530 0.9590 0.9660 0.9640 0.9650 0.9590 0.9780 0.9800 0.9700 0.9450 0.9100
-10 0.7130 0.7190 0.7060 0.7110 0.7050 0.6990 0.6960 0.6870 0.6970 0.6920 0.7050 0.7080 0.7100 0.7100 0.7090 0.7100 0.7100 0.7100 0.7100
-05 0.2650 0.2650 0.2700 0.2750 0.2880 0.3050 0.3060 0.3110 0.2850 0.2870 0.2860 0.2850 0.2800 0.2710 0.2600 0.2510 0.2510 0.2340 0.2470
 00 -0.006 -0.030 -0.050 -0.050 -0.036 -0.035 -0.028 -0.027 -0.027 -0.025 -0.028 -0.028 -0.029 -0.031 -0.034 -0.048 -0.037 -0.033 -0.006
 05 -0.275 -0.315 -0.345 -0.360 -0.359 -0.364 -0.362 -0.368 -0.368 -0.367 -0.368 -0.372 -0.368 -0.370 -0.373 -0.377 -0.360 -0.335 -0.292
 10 -0.550 -0.620 -0.670 -0.705 -0.719 -0.727 -0.737 -0.741 -0.747 -0.750 -0.750 -0.746 -0.744 -0.736 -0.735 -0.725 -0.689 -0.626 -0.564
 15 -0.825 -0.910 -0.980 -1.035 -1.069 -1.089 -1.105 -1.111 -1.111 -1.112 -1.112 -1.108 -1.106 -1.098 -1.083 -1.053 -0.999 -0.924 -0.840
 20 -1.115 -1.200 -1.280 -1.340 -1.379 -1.405 -1.421 -1.431 -1.422 -1.418 -1.408 -1.405 -1.403 -1.396 -1.382 -1.336 -1.271 -1.210 -1.113
 25 -1.375 -1.440 -1.510 -1.575 -1.626 -1.635 -1.650 -1.655 -1.659 -1.658 -1.660 -1.658 -1.655 -1.646 -1.631 -1.570 -1.513 -1.442 -1.367
 30 -1.520 -1.615 -1.710 -1.810 -1.910 -1.977 -1.997 -2.006 -2.002 -2.008 -2.006 -2.001 -1.981 -1.961 -1.939 -1.888 -1.799 -1.651 -1.550
 35 -1.555 -1.665 -1.770 -1.885 -1.998 -2.073 -2.152 -2.171 -2.182 -2.200 -2.186 -2.186 -2.174 -2.149 -2.104 -2.002 -1.897 -1.760 -1.663
 40 -1.715 -1.830 -1.945 -2.065 -2.188 -2.183 -2.301 -2.310 -2.314 -2.328 -2.355 -2.231 -2.156 -2.281 -2.231 -2.095 -1.991 -1.860 -1.747
 45 -1.625 -1.570 -1.785 -2.000 -2.178 -2.272 -2.210 -2.264 -2.358 -2.311 -2.353 -2.350 -2.299 -2.290 -2.255 -2.157 -2.002 -1.648 -1.702
 50 -1.570 -1.735 -1.900 -2.050 -2.165 -2.254 -2.288 -2.258 -2.258 -2.326 -2.312 -2.290 -2.277 -2.184 -2.239 -2.109 -1.986 -1.848 -1.649
 55 -1.775 -1.900 -1.970 -2.055 -2.176 -2.184 -2.223 -2.211 -2.196 -2.252 -2.235 -2.145 -2.182 -2.165 -2.152 -2.025 -1.965 -1.931 -1.800
 60 -1.900 -1.935 -1.960 -1.995 -2.128 -2.111 -2.173 -2.183 -2.181 -2.208 -2.190 -2.094 -2.131 -2.150 -2.114 -1.990 -1.986 -1.962 -1.876
 70 -1.930 -1.945 -1.940 -1.920 -1.929 -2.021 -2.161 -2.160 -2.120 -2.134 -2.085 -2.011 -2.108 -2.125 -2.063 -1.970 -2.016 -1.947 -1.924
 80 -2.000 -2.045 -2.075 -2.080 -2.045 -1.994 -2.048 -2.092 -1.992 -2.004 -2.019 -1.930 -2.014 -2.018 -1.919 -2.000 -2.034 -2.032 -1.958
 90 -1.960 -1.950 -1.900 -2.010 -2.060 -2.158 -2.112 -2.117 -2.145 -2.140 -2.110 -2.107 -2.101 -2.169 -2.073 -2.074 -2.038 -2.088 -2.060
                    </tableData>
                    <tableData breakPoint="10.0" note="Numbers in this table typed in by E.V.Oort and L.Sonneveldt">
       -30    -25    -20    -15    -10     -8     -6     -4     -2      0      2      4      6      8     10     15     20     25     30
-20  1.021  1.066  1.116  1.126  1.139  1.108  1.103  1.070  1.041  1.039  1.071  1.076  1.089  1.086  1.078  1.070  1.046  1.007  0.957
-15  0.815  0.838  0.846  0.863  0.854  0.848  0.844  0.841  0.846  0.849  0.856  0.852  0.853  0.848  0.863  0.863  0.856  0.841  0.820
-10  0.622  0.618  0.603  0.609  0.606  0.602  0.599  0.592  0.600  0.596  0.605  0.607  0.609  0.609  0.609  0.607  0.607  0.611  0.619
-05  0.181  0.176  0.179  0.184  0.198  0.212  0.213  0.215  0.202  0.205  0.202  0.198  0.192  0.183  0.180  0.165  0.163  0.155  0.169
 00 -0.069 -0.100 -0.125 -0.131 -0.122 -0.120 -0.114 -0.112 -0.115 -0.114 -0.117 -0.117 -0.121 -0.123 -0.126 -0.134 -0.122 -0.109 -0.075
 05 -0.339 -0.400 -0.444 -0.474 -0.480 -0.480 -0.481 -0.486 -0.487 -0.490 -0.490 -0.504 -0.496 -0.491 -0.493 -0.483 -0.458 -0.412 -0.354
 10 -0.585 -0.630 -0.715 -0.768 -0.806 -0.810 -0.824 -0.833 -0.844 -0.849 -0.851 -0.842 -0.846 -0.831 -0.825 -0.801 -0.752 -0.676 -0.595
 15 -0.843 -0.947 -1.031 -1.097 -1.133 -1.147 -1.167 -1.175 -1.182 -1.177 -1.171 -1.176 -1.175 -1.171 -1.158 -1.120 -1.047 -0.954 -0.864
 20 -1.104 -1.200 -1.287 -1.356 -1.404 -1.431 -1.446 -1.453 -1.445 -1.442 -1.435 -1.430 -1.434 -1.428 -1.414 -1.357 -1.286 -1.215 -1.110
 25 -1.362 -1.458 -1.560 -1.655 -1.741 -1.771 -1.771 -1.782 -1.794 -1.789 -1.787 -1.791 -1.775 -1.775 -1.760 -1.646 -1.582 -1.473 -1.370
 30 -1.520 -1.630 -1.740 -1.854 -1.968 -2.037 -2.070 -2.081 -2.083 -2.082 -2.080 -2.070 -2.054 -2.039 -2.016 -1.929 -1.790 -1.673 -1.563
 35 -1.690 -1.856 -2.006 -2.136 -2.252 -2.255 -2.260 -2.326 -2.317 -2.308 -2.355 -2.341 -2.302 -2.259 -2.219 -2.081 -1.938 -1.760 -1.679
 40 -1.849 -1.949 -2.054 -2.169 -2.290 -2.361 -2.343 -2.375 -2.284 -2.411 -2.419 -2.402 -2.345 -2.333 -2.303 -2.163 -2.065 -1.971 -1.878
 45 -1.590 -1.484 -1.741 -2.000 -2.193 -2.279 -2.186 -2.262 -2.395 -2.306 -2.373 -2.369 -2.295 -2.293 -2.262 -2.175 -1.993 -1.555 -1.661
 50 -1.707 -1.891 -2.013 -2.255 -2.141 -2.200 -2.204 -2.165 -2.179 -2.261 -2.283 -2.281 -2.294 -2.182 -2.218 -2.178 -1.936 -1.814 -1.630
 55 -1.735 -1.838 -1.844 -1.904 -2.133 -2.159 -2.217 -2.209 -2.184 -2.231 -2.186 -2.068 -2.115 -2.145 -2.180 -1.951 -1.891 -1.885 -1.782
 60 -1.799 -1.889 -1.917 -1.942 -2.097 -2.065 -2.112 -2.123 -2.140 -2.185 -2.164 -2.065 -2.107 -2.142 -2.121 -1.966 -1.941 -1.913 -1.823
 70 -1.753 -1.752 -1.797 -1.779 -1.987 -2.048 -2.157 -2.149 -2.048 -2.268 -2.178 -2.064 -2.142 -2.161 -2.102 -1.894 -1.912 -1.867 -1.868
 80 -2.067 -2.123 -2.107 -2.145 -2.053 -1.911 -1.974 -2.024 -1.926 -1.940 -1.967 -1.891 -1.978 -1.976 -1.872 -1.964 -1.926 -1.942 -1.886
 90 -2.008 -2.020 -1.955 -2.076 -2.026 -2.116 -2.061 -2.057 -2.073 -2.057 -2.034 -2.033 -2.030 -2.095 -1.996 -2.046 -1.925 -1.990 -1.978
                    </tableData>
                    <tableData breakPoint="25.0">
       -30    -25    -20    -15    -10     -8     -6     -4     -2      0      2      4      6      8     10     15     20     25     30
-20 0.7230 0.7500 0.7440 0.7440 0.7110 0.7090 0.6970 0.6970 0.6960 0.7100 0.7040 0.7150 0.7200 0.7210 0.7210 0.7500 0.7500 0.7400 0.7100
-15 0.5120 0.4950 0.4610 0.4650 0.4700 0.4700 0.4710 0.4670 0.4830 0.4760 0.4810 0.4720 0.4750 0.4730 0.4730 0.4650 0.4700 0.4900 0.5150
-10 0.2490 0.2120 0.1860 0.1950 0.2030 0.2050 0.2020 0.2030 0.2070 0.2050 0.2000 0.1940 0.1980 0.1980 0.2010 0.1850 0.1900 0.2100 0.2500
-05 0.1000 0.0900 0.0900 0.0950 0.1110 0.1220 0.1220 0.1220 0.1210 0.1250 0.1210 0.1140 0.1070 0.0970 0.1010 0.0810 0.0770 0.0770 0.0930
 00 -.1500 -.1900 -.2200 -.2350 -.2320 -.2240 -.2240 -.2210 -.2270 -.2280 -.2310 -.2320 -.2390 -.2410 -.2440 -.2440 -.2320 -.2070 -.1640
 05 -.3850 -.4600 -.5150 -.5550 -.5660 -.5630 -.5660 -.5710 -.5720 -.5780 -.5780 -.5990 -.5880 -.5770 -.5790 -.5590 -.5280 -.4670 -.3980
 10 -.6200 -.6900 -.7600 -.8300 -.8920 -.8910 -.9100 -.9240 -.9390 -.9460 -.9490 -.9360 -.9450 -.9240 -.9130 -.8760 -.8130 -.7240 -.6260
 15 -0.865 -0.990 -1.090 -1.170 -1.208 -1.215 -1.239 -1.250 -1.269 -1.253 -1.240 -1.255 -1.255 -1.257 -1.245 -1.198 -1.103 -0.990 -0.891
 20 -1.055 -1.195 -1.320 -1.430 -1.519 -1.550 -1.564 -1.558 -1.555 -1.554 -1.563 -1.549 -1.577 -1.578 -1.563 -1.453 -1.358 -1.241 -1.097
 25 -1.360 -1.460 -1.570 -1.670 -1.763 -1.797 -1.794 -1.806 -1.820 -1.814 -1.811 -1.816 -1.798 -1.800 -1.785 -1.661 -1.595 -1.479 -1.371
 30 -1.520 -1.635 -1.750 -1.870 -1.989 -2.058 -2.095 -2.107 -2.112 -2.108 -2.106 -2.094 -2.079 -2.066 -2.043 -1.943 -1.804 -1.681 -1.568
 35 -1.615 -1.750 -1.875 -1.995 -2.111 -2.145 -2.200 -2.240 -2.242 -2.248 -2.261 -2.255 -2.231 -2.198 -2.155 -2.037 -1.915 -1.760 -1.670
 40 -1.775 -1.875 -1.980 -2.095 -2.216 -2.287 -2.269 -2.301 -2.210 -2.337 -2.345 -2.328 -2.271 -2.259 -2.229 -2.089 -1.991 -1.897 -1.804
 45 -1.740 -1.845 -1.925 -2.000 -2.130 -2.251 -2.286 -2.270 -2.239 -2.327 -2.289 -2.288 -2.312 -2.282 -2.232 -2.099 -2.030 -1.945 -1.834
 50 -1.570 -1.740 -1.900 -2.050 -2.156 -2.216 -2.203 -2.158 -2.175 -2.261 -2.266 -2.262 -2.255 -2.153 -2.201 -2.110 -1.984 -1.841 -1.637
 55 -1.700 -1.810 -1.880 -1.950 -2.043 -2.170 -2.184 -2.111 -2.204 -2.231 -2.203 -2.102 -2.135 -2.173 -2.107 -1.950 -1.892 -1.877 -1.765
 60 -1.795 -1.895 -1.960 -2.020 -2.113 -2.094 -2.124 -2.124 -2.134 -2.174 -2.177 -2.103 -2.153 -2.176 -2.144 -2.000 -1.960 -1.930 -1.838
 70 -1.780 -1.785 -1.790 -1.810 -1.873 -1.943 -2.059 -2.274 -2.000 -2.259 -2.211 -1.885 -2.221 -2.212 -2.125 -1.970 -1.907 -1.882 -1.874
 80 -1.950 -1.980 -1.980 -1.960 -1.911 -1.881 -1.955 -2.005 -1.894 -1.899 -2.009 -2.014 -2.101 -2.014 -1.825 -1.840 -1.899 -1.922 -1.873
 90 -1.925 -1.920 -1.870 -1.885 -1.969 -2.071 -2.029 -2.039 -2.070 -2.069 -2.026 -2.005 -2.000 -2.085 -2.007 -1.935 -1.948 -1.989 -1.951
                     </tableData>
                </table>
            </product>
        </function>

        <function name="aero/coefficient/dCz_lef">
            <description>
               Cz due to leading edge flaps coefficient.
            </description>
            <product>
                <property>aero/qbar-psf</property>
                <property>metrics/Sw-sqft</property>
                <property>fcs/fly-by-wire/lef/lef-pos-r-norm</property>
                <difference>
                <table name="table/Cz_lef">
                    <independentVar lookup="row">aero/alpha-deg</independentVar>
                    <independentVar lookup="column">aero/beta-deg</independentVar>
                    <tableData>
       -30    -25    -20    -15    -10     -8     -6     -4     -2      0      2      4      6      8     10     15     20     25     30
-20 1.1830 1.2460 1.2790 1.2900 1.3690 1.3640 1.2970 1.2770 1.2760 1.2560 1.2810 1.2800 1.3120 1.3150 1.3060 1.2270 1.2160 1.1830 1.1200
-15 0.9600 1.0180 1.0550 1.0930 1.0580 1.0390 1.0310 1.0190 1.0250 1.0350 1.0330 1.0420 1.0430 1.0560 1.0560 1.0910 1.0530 1.0160 0.9580
-10 0.7090 0.7100 0.7020 0.7040 0.7010 0.7100 0.7300 0.7290 0.7290 0.7250 0.7290 0.7280 0.7280 0.7230 0.7110 0.7140 0.7120 0.7200 0.7190
-05 0.2220 0.2160 0.2310 0.2270 0.2400 0.2430 0.2440 0.2490 0.2490 0.2480 0.2480 0.2420 0.2390 0.2350 0.2290 0.2160 0.2200 0.2050 0.2110
 00 -.0660 -.0840 -.0900 -.1050 -.1040 -.0990 -.1070 -.0990 -.0990 -.1000 -.1010 -.1040 -.1040 -.1040 -.1060 -.1070 -.0920 -.0860 -.0680
 05 -.3170 -.3470 -.3900 -.4140 -.4200 -.4170 -.4170 -.4210 -.4240 -.4280 -.4210 -.4280 -.4220 -.4230 -.4250 -.4190 -.3950 -.5320 -.3220
 10 -.5690 -.6190 -.6790 -.7030 -.7280 -.7650 -.7720 -.7740 -.7720 -.7740 -.7700 -.7670 -.7610 -.7540 -.7560 -.7310 -.7070 -.6450 -.5970
 15 -0.853 -0.929 -1.018 -1.070 -1.098 -1.116 -1.114 -1.151 -1.142 -1.139 -1.135 -1.118 -1.112 -1.107 -1.099 -1.071 -1.019 -0.930 -0.854
 20 -1.106 -1.168 -1.228 -1.314 -1.348 -1.359 -1.362 -1.352 -1.357 -1.355 -1.371 -1.376 -1.370 -1.379 -1.399 -1.365 -1.279 -1.219 -1.157
 25 -1.314 -1.407 -1.465 -1.506 -1.564 -1.598 -1.628 -1.647 -1.646 -1.650 -1.642 -1.641 -1.618 -1.599 -1.585 -1.527 -1.486 -1.428 -1.335
 30 -1.496 -1.510 -1.589 -1.692 -1.775 -1.814 -1.846 -1.875 -1.879 -1.883 -1.891 -1.876 -1.843 -1.838 -1.811 -1.729 -1.625 -1.546 -1.532
 35 -1.594 -1.694 -1.807 -1.875 -1.957 -1.976 -2.032 -2.060 -2.070 -2.077 -2.038 -2.039 -2.028 -2.005 -1.986 -1.904 -1.836 -1.713 -1.623
 40 -1.683 -1.755 -1.912 -1.999 -2.111 -2.149 -2.147 -2.204 -2.207 -2.204 -2.205 -2.195 -2.193 -2.174 -2.133 -2.021 -1.934 -1.777 -1.705
 45 -1.664 -1.783 -1.859 -1.962 -2.030 -2.129 -1.917 -2.143 -2.050 -2.208 -2.201 -2.182 -2.077 -2.209 -2.126 -2.058 -1.955 -1.879 -1.790
                     </tableData>
                </table>
                <table name="table/Cz_dh0">
                    <independentVar lookup="row">aero/alpha-deg</independentVar>
                    <independentVar lookup="column">aero/beta-deg</independentVar>
                    <tableData>
       -30    -25    -20    -15    -10     -8     -6     -4     -2      0      2      4      6      8     10     15     20     25     30
-20 1.0910 1.1400 1.2030 1.2150 1.2390 1.2010 1.1710 1.1570 1.1220 1.1160 1.1560 1.1600 1.1750 1.1720 1.1610 1.1450 1.1150 1.0700 1.0150
-15 0.9050 0.9390 0.9590 0.9800 0.9670 0.9600 0.9540 0.9510 0.9530 0.9590 0.9660 0.9640 0.9650 0.9590 0.9780 0.9800 0.9700 0.9450 0.9100
-10 0.7130 0.7190 0.7060 0.7110 0.7050 0.6990 0.6960 0.6870 0.6970 0.6920 0.7050 0.7080 0.7100 0.7100 0.7090 0.7100 0.7100 0.7100 0.7100
-05 0.2650 0.2650 0.2700 0.2750 0.2880 0.3050 0.3060 0.3110 0.2850 0.2870 0.2860 0.2850 0.2800 0.2710 0.2600 0.2510 0.2510 0.2340 0.2470
 00 -0.006 -0.030 -0.050 -0.050 -0.036 -0.035 -0.028 -0.027 -0.027 -0.025 -0.028 -0.028 -0.029 -0.031 -0.034 -0.048 -0.037 -0.033 -0.006
 05 -0.275 -0.315 -0.345 -0.360 -0.359 -0.364 -0.362 -0.368 -0.368 -0.367 -0.368 -0.372 -0.368 -0.370 -0.373 -0.377 -0.360 -0.335 -0.292
 10 -0.550 -0.620 -0.670 -0.705 -0.719 -0.727 -0.737 -0.741 -0.747 -0.750 -0.750 -0.746 -0.744 -0.736 -0.735 -0.725 -0.689 -0.626 -0.564
 15 -0.825 -0.910 -0.980 -1.035 -1.069 -1.089 -1.105 -1.111 -1.111 -1.112 -1.112 -1.108 -1.106 -1.098 -1.083 -1.053 -0.999 -0.924 -0.840
 20 -1.115 -1.200 -1.280 -1.340 -1.379 -1.405 -1.421 -1.431 -1.422 -1.418 -1.408 -1.405 -1.403 -1.396 -1.382 -1.336 -1.271 -1.210 -1.113
 25 -1.375 -1.440 -1.510 -1.575 -1.626 -1.635 -1.650 -1.655 -1.659 -1.658 -1.660 -1.658 -1.655 -1.646 -1.631 -1.570 -1.513 -1.442 -1.367
 30 -1.520 -1.615 -1.710 -1.810 -1.910 -1.977 -1.997 -2.006 -2.002 -2.008 -2.006 -2.001 -1.981 -1.961 -1.939 -1.888 -1.799 -1.651 -1.550
 35 -1.555 -1.665 -1.770 -1.885 -1.998 -2.073 -2.152 -2.171 -2.182 -2.200 -2.186 -2.186 -2.174 -2.149 -2.104 -2.002 -1.897 -1.760 -1.663
 40 -1.715 -1.830 -1.945 -2.065 -2.188 -2.183 -2.301 -2.310 -2.314 -2.328 -2.355 -2.231 -2.156 -2.281 -2.231 -2.095 -1.991 -1.860 -1.747
 45 -1.625 -1.570 -1.785 -2.000 -2.178 -2.272 -2.210 -2.264 -2.358 -2.311 -2.353 -2.350 -2.299 -2.290 -2.255 -2.157 -2.002 -1.648 -1.702
 50 -1.570 -1.735 -1.900 -2.050 -2.165 -2.254 -2.288 -2.258 -2.258 -2.326 -2.312 -2.290 -2.277 -2.184 -2.239 -2.109 -1.986 -1.848 -1.649
 55 -1.775 -1.900 -1.970 -2.055 -2.176 -2.184 -2.223 -2.211 -2.196 -2.252 -2.235 -2.145 -2.182 -2.165 -2.152 -2.025 -1.965 -1.931 -1.800
 60 -1.900 -1.935 -1.960 -1.995 -2.128 -2.111 -2.173 -2.183 -2.181 -2.208 -2.190 -2.094 -2.131 -2.150 -2.114 -1.990 -1.986 -1.962 -1.876
 70 -1.930 -1.945 -1.940 -1.920 -1.929 -2.021 -2.161 -2.160 -2.120 -2.134 -2.085 -2.011 -2.108 -2.125 -2.063 -1.970 -2.016 -1.947 -1.924
 80 -2.000 -2.045 -2.075 -2.080 -2.045 -1.994 -2.048 -2.092 -1.992 -2.004 -2.019 -1.930 -2.014 -2.018 -1.919 -2.000 -2.034 -2.032 -1.958
 90 -1.960 -1.950 -1.900 -2.010 -2.060 -2.158 -2.112 -2.117 -2.145 -2.140 -2.110 -2.107 -2.101 -2.169 -2.073 -2.074 -2.038 -2.088 -2.060
                    </tableData>
                </table>
            </difference>
            </product>
        </function>

        <function name="aero/coefficient/dCz_sb">
            <description>
               Cz due speed brake coefficient.
            </description>
            <product>
                <property>aero/qbar-psf</property>
                <property>metrics/Sw-sqft</property>
                <property>fcs/speedbrake-pos-norm</property>
                <table name="table/dCz_sb">
                    <independentVar lookup="row">aero/alpha-deg</independentVar>
                    <tableData>
-20 -.3858
-15 -.3858
-10 -.3858
-05 -.3858
 00 -.3858
 05 -.2685
 10 -.3021
 15 -.4248
 20 -.2094
 25 -.0969
 30 0.0438
 35 0.0947
 40 0.0014
 45 -.0097
 50 -.0153
 55 -.0520
 60 -.0010
 70 -.0202
 80 -.0369
 90 -.0369
                     </tableData>
                </table>
            </product>
        </function>

        <function name="aero/coefficient/Cz_q">
            <description>
               Cz due to pitch rate coefficient.
            </description>
            <product>
                <property>aero/qbar-psf</property>
                <property>metrics/Sw-sqft</property>
                <property>aero/ci2vel</property>
                <property>velocities/q-rad_sec</property>
                <table name="table/Cz_q">
                    <independentVar lookup="row">aero/alpha-deg</independentVar>
                    <tableData>
-20 -23.9
-15 -23.9
-10 -23.9
-05 -29.5
 00 -29.5
 05 -30.5
 10 -31.3
 15 -30.1
 20 -27.7
 25 -28.2
 30 -29.0
 35 -29.8
 40 -38.3
 45 -35.3
 50 -32.3
 55 -27.3
 60 -25.2
 70 -27.3
 80 -9.35
 90 -2.16
                    </tableData>
                </table>
            </product>
        </function>

        <function name="aero/coefficient/dCz_q-lef">
            <description>
               Cz due to pitch rate due to leading edge flaps coefficient.
            </description>
            <product>
                <property>aero/qbar-psf</property>
                <property>metrics/Sw-sqft</property>
                <property>aero/ci2vel</property>
                <property>velocities/q-rad_sec</property>
                <property>fcs/fly-by-wire/lef/lef-pos-r-norm</property>
                <table name="table/dCz_q-lef">
                    <independentVar lookup="row">aero/alpha-deg</independentVar>
                    <tableData>
-20 15.1
-15 15.1
-10 15.1
-05 3.70
 00 .600
 05 -1.3
 10 0.30
 15 -3.8
 20 -4.6
 25 -.20
 30 -2.7
 35 -3.5
 40 -1.3
 45 -.65
                     </tableData>
                </table>
            </product>
        </function>

    </axis>


    <function name="aero/function/n_dh">
        <description>
           Elevator effectiveness factor.
        </description>
        <product>
            <table name="table/n_dh">
                <independentVar lookup="row">fcs/fly-by-wire/pitch/horz-tail-deflection-deg</independentVar>
                <tableData>
-25 1.0
-10 1.0
 00 1.0
 10 1.0
 25 .95
                 </tableData>
            </table>
        </product>
    </function>

    <axis name="PITCH">

        <function name="aero/coefficient/Cm">
            <description>
               Cm coefficient
            </description>
            <product>
                <property>aero/qbar-psf</property>
                <property>metrics/Sw-sqft</property>
                <property>metrics/cbarw-ft</property>
                <p>aero/function/n_dh</p>
                <table name="table/Cm">
                    <independentVar lookup="row">aero/alpha-deg</independentVar>
                    <independentVar lookup="column">aero/beta-deg</independentVar>
                    <independentVar lookup="table">fcs/fly-by-wire/pitch/horz-tail-deflection-deg</independentVar>
                    <tableData breakPoint="-25.0" note="Numbers in this table typed in by E.V.Oort and L.Sonneveldt">
       -30    -25    -20    -15    -10     -8     -6     -4     -2      0      2      4      6      8     10     15     20     25     30
-20 0.2059 0.1937 0.1918 0.1850 0.1692 0.1693 0.1770 0.1746 0.1742 0.1750 0.1721 0.1758 0.1801 0.1826 0.1912 0.2070 0.2140 0.2160 0.2270
-15 0.1698 0.1650 0.1733 0.1723 0.1533 0.1618 0.1639 0.1607 0.1597 0.1584 0.1589 0.1615 0.1573 0.1534 0.1464 0.1650 0.1670 0.1580 0.1630
-10 0.1426 0.1579 0.1807 0.1641 0.1533 0.1586 0.1595 0.1629 0.1615 0.1590 0.1566 0.1534 0.1523 0.1489 0.1493 0.1580 0.1750 0.1530 0.1380
-05 0.1620 0.1770 0.1530 0.1450 0.1380 0.1365 0.1329 0.1269 0.1242 0.1216 0.1183 0.1212 0.1236 0.1267 0.1303 0.1373 0.1444 0.1679 0.1538
 00 0.1530 0.1540 0.1480 0.1450 0.1445 0.1438 0.1430 0.1411 0.1412 0.1409 0.1410 0.1409 0.1403 0.1409 0.1414 0.1448 0.1453 0.1523 0.1513
 05 0.1470 0.1530 0.1560 0.1570 0.1586 0.1595 0.1585 0.1577 0.1580 0.1580 0.1591 0.1584 0.1576 0.1572 0.1573 0.1568 0.1557 0.1540 0.1472
 10 0.1500 0.1620 0.1650 0.1700 0.1746 0.1758 0.1768 0.1778 0.1833 0.1845 0.1840 0.1824 0.1811 0.1797 0.1784 0.1750 0.1701 0.1663 0.1547
 15 0.1670 0.1760 0.1910 0.1960 0.2000 0.2012 0.2041 0.2062 0.2069 0.2087 0.2070 0.2066 0.2055 0.2022 0.2000 0.1958 0.1901 0.1755 0.1668
 20 0.1510 0.1700 0.1900 0.2020 0.2073 0.2098 0.2122 0.2129 0.2137 0.2152 0.2133 0.2118 0.2109 0.2082 0.2061 0.1991 0.1878 0.1618 0.1479
 25 0.1200 0.1470 0.1750 0.1940 0.2043 0.2028 0.2028 0.1991 0.1981 0.1978 0.1969 0.1957 0.1958 0.1948 0.1953 0.1877 0.1687 0.1406 0.1130
 30 0.1080 0.0670 0.0980 0.1500 0.1704 0.1930 0.1985 0.2009 0.2022 0.2022 0.2021 0.2007 0.1972 0.1947 0.1901 0.1696 0.1186 0.0889 0.1270
 35 0.0820 0.0470 0.0680 0.0810 0.1174 0.1233 0.1522 0.1713 0.1789 0.1814 0.1815 0.1799 0.1790 0.1703 0.1459 0.1124 0.0962 0.0757 0.1132
 40 0.1130 0.0500 0.0600 0.0870 0.1131 0.1279 0.1341 0.1433 0.1483 0.1478 0.1291 0.1312 0.1245 0.1025 0.1028 0.0745 0.0495 0.0406 0.1024
 45 0.0930 0.0660 0.0650 0.0530 0.0734 0.0914 0.0968 0.0848 0.0935 0.0922 0.0940 0.0838 0.0610 0.0491 0.0420 0.0208 0.0343 0.0338 0.0600
 50 -.0150 -.0110 -.0250 0.0150 0.0663 0.0644 0.0498 0.0407 0.0521 0.0745 0.0670 0.0453 0.0373 0.0320 0.0397 -.0114 -.0514 -.0371 -.0408
 55 0.0190 0.0170 -.0860 -.0040 0.0794 0.0494 0.0174 0.0530 0.0292 0.0713 0.0404 0.0007 -.0024 0.0165 0.0281 -.0562 -.1373 -.0343 -.0335
 60 -.0360 -.0230 -.0750 -.0600 -.0627 -.0705 -.0556 -.0534 -.0549 -.0540 -.0618 -.0674 -.0828 -.0849 -.1004 -.0976 -.1117 -.0599 -.0714
 70 -.3070 -.3080 -.2850 -.3050 -.2769 -.2648 -.1828 -.2115 -.2032 -.2244 -.2264 -.2195 -.2054 -.2203 -.2191 -.2479 -.2276 -.2518 -.2503
 80 -.3650 -.3980 -.4030 -.3870 -.3411 -.3344 -.3425 -.3455 -.3254 -.3389 -.3522 -.3187 -.3262 -.3283 -.3285 -.3763 -.3923 -.3857 -.3532
 90 -.5260 -.5270 -.5150 -.5040 -.4900 -.5157 -.4801 -.4970 -.4831 -.4723 -.4830 -.4818 -.4911 -.5074 -.4863 -.5001 -.5124 -.5227 -.5219
                    </tableData>
                    <tableData breakPoint="-10.0" note="Numbers in this table typed in by E.V.Oort and L.Sonneveldt">
       -30    -25    -20    -15    -10     -8     -6     -4     -2      0      2      4      6      8     10     15     20     25     30
-20 0.1469 0.1272 0.1210 0.1075 0.0798 0.0756 0.0800 0.0827 0.0853 0.0864 0.0782 0.0811 0.0821 0.0847 0.0965 0.1240 0.1376 0.1439 0.1631
 00 0.0520 0.0540 0.0430 0.0390 0.0420 0.0410 0.0420 0.0430 0.0430 0.0430 0.0420 0.0430 0.0370 0.0380 0.0378 0.0430 0.0450 0.0570 0.0500
 20 0.0270 0.0250 0.0400 0.0500 0.0570 0.0560 0.0580 0.0600 0.0650 0.0674 0.0690 0.0660 0.0620 0.0550 0.0520 0.0460 0.0360 0.0200 0.0220
 40 0.0680 0.0190 -.0160 -.0130 -.0080 -.0070 -.0060 -.0050 -.0060 -.0094 -.0220 -.0220 -.0440 -.0380 -.0410 -.0470 -.0500 -.0130 0.0330
 60 -.0879 -.0315 -.0384 -.1757 -.0962 -.1050 -.0912 -.0857 -.0794 -.0708 -.0887 -.1045 -.1247 -.1264 -.1414 -.2209 -.0836 -.0767 -.1331
 90 -.6208 -.6173 -.6028 -.5959 -.5532 -.5881 -.5617 -.5859 -.5773 -.5718 -.5728 -.5618 -.5680 -.5878 -.5702 -.5789 -.5858 -.6003 -.6038
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                    </tableData>
                    <tableData breakPoint="0.0">
       -30    -25    -20    -15    -10     -8     -6     -4     -2      0      2      4      6      8     10     15     20     25     30
-20 0.0978 0.0719 0.0621 0.0430 0.0054 0.0023 0.0006 0.0062 0.0114 0.0127 0.0001 0.0023 0.0006 0.0033 0.0177 0.0550 0.0740 0.0840 0.1100
 00 -.0550 -.0460 -.0590 -.0640 -.0660 -.0660 -.0639 -.0615 -.0605 -.0598 -.0600 -.0606 -.0608 -.0617 -.0621 -.0606 -.0587 -.0484 -.0517
 20 -.0570 -.0710 -.0620 -.0520 -.0478 -.0518 -.0498 -.0463 -.0384 -.0342 -.0329 -.0366 -.0426 -.0532 -.0555 -.0620 -.0705 -.0800 -.0660
 40 0.0450 0.0050 -.0520 -.0610 -.0662 -.0729 -.0739 -.0789 -.0820 -.0835 -.0917 -.0971 -.1252 -.1071 -.1116 -.1057 -.0979 -.0402 0.0022
 60 -.1830 -.1480 -.1730 -.1720 -.1512 -.1428 -.1118 -.1094 -.1266 -.1414 -.1436 -.1437 -.1521 -.1459 -.1530 -.1709 -.1741 -.1475 -.1841
 90 -.6330 -.6300 -.6160 -.6160 -.6067 -.6366 -.6053 -.6281 -.6217 -.6184 -.6163 -.6022 -.6073 -.6281 -.6115 -.6209 -.6210 -.6351 -.6381
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                    </tableData>
                    <tableData breakPoint="10.0" note="Numbers in this table typed in by E.V.Oort and L.Sonneveldt">
       -30    -25    -20    -15    -10     -8     -6     -4     -2      0      2      4      6      8     10     15     20     25     30
-20 0.0200 -.0036 -.0107 -.0334 -.0778 -.0944 -.0926 -.0855 -.0815 -.0835 -.0955 -.0930 -.0943 -.0881 -.0743 -.0265 -.0040 0.0034 0.0268
 00 -.1170 -.1270 -.1520 -.1590 -.1600 -.1600 -.1590 -.1570 -.1620 -.1610 -.1620 -.1630 -.1670 -.1620 -.1620 -.1620 -.1530 -.1260 -.1170
 20 -.0620 -.0830 -.0970 -.1060 -.1340 -.1420 -.1380 -.1340 -.1300 -.1264 -.1260 -.1260 -.1510 -.1610 -.1660 -.1370 -.1260 -.1150 -.0940
 40 -.0438 -.1079 -.1281 -.1485 -.1405 -.1272 -.1301 -.1367 -.1555 -.1450 -.1543 -.1595 -.1527 -.1644 -.1682 -.1791 -.1553 -.1362 -.0744
 60 -.1710 -.1200 -.1350 -.1400 -.1588 -.1634 -.1455 -.1444 -.1512 -.1556 -.1653 -.1719 -.1866 -.1859 -.1985 -.1808 -.1758 -.1621 -.2116
 90 -.6368 -.6326 -.6174 -.6217 -.5909 -.6214 -.5906 -.6146 -.6099 -.6083 -.6080 -.5958 -.5979 -.6109 -.5865 -.6173 -.6130 -.6282 -.6324
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                    </tableData>
                    <tableData breakPoint="25.0" note="Numbers in this table typed in by E.V.Oort and L.Sonneveldt">
       -30    -25    -20    -15    -10     -8     -6     -4     -2      0      2      4      6      8     10     15     20     25     30
-20 -.0818 -.1023 -.1060 -.1334 -.1866 -.2149 -.2128 -.2055 -.2030 -.2093 -.2204 -.2176 -.2185 -.2077 -.1946 -.1330 -.1060 -.1020 -.0820
 00 -.1740 -.1970 -.2340 -.2470 -.2487 -.2486 -.2493 -.2489 -.2539 -.2527 -.2524 -.2524 -.2532 -.2517 -.2491 -.2491 -.2359 -.1983 -.1748
 20 -.0680 -.0930 -.1240 -.1540 -.2203 -.2311 -.2272 -.2205 -.2205 -.2165 -.2182 -.2138 -.2589 -.2705 -.2751 -.2111 -.1811 -.1482 -.1227
 40 -.0250 -.0840 -.1120 -.1300 -.1248 -.1157 -.1182 -.1245 -.1400 -.1320 -.1411 -.1463 -.1532 -.1523 -.1562 -.1636 -.1432 -.1159 -.0582
 60 -.1430 -.0820 -.0850 -.0910 -.1251 -.1492 -.1507 -.1570 -.1589 -.1584 -.1689 -.1773 -.1947 -.1982 -.2150 -.1808 -.1737 -.1719 -.2333
 90 -.5600 -.5920 -.5130 -.5930 -.5674 -.6030 -.5774 -.6021 -.5938 -.5886 -.5839 -.5673 -.5700 -.5885 -.5696 -.5961 -.6158 -.5951 -.5634
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                     </tableData>
                </table>
            </product>
        </function>

        <function name="aero/coefficient/dCm_lef">
            <description>
               Cm due to leading edge flaps coefficient.
            </description>
            <product>
                <property>aero/qbar-psf</property>
                <property>metrics/Sw-sqft</property>
                <property>metrics/cbarw-ft</property>
                <property>fcs/fly-by-wire/lef/lef-pos-r-norm</property>
                <difference>
                    <table name="table/dCm_lef">
                        <independentVar lookup="row">aero/alpha-deg</independentVar>
                        <independentVar lookup="column">aero/beta-deg</independentVar>
                        <tableData>
       -30    -25    -20    -15    -10     -8     -6     -4     -2      0      2      4      6      8     10     15     20     25     30
-20 0.0922 0.0559 0.0525 -.0338 -.0518 -.0605 -.0574 -.0554 -.0550 -.0503 -.0521 -.0483 -.0459 -.0404 -.0373 -.0193 0.0670 0.0704 0.1067
-15 0.0372 0.0062 -.0067 -.0217 -.0702 -.0860 -.1001 -.1000 -.1002 -.1012 -.0974 -.0939 -.0839 -.0837 -.0759 -.0274 -.0124 0.0005 0.0315
-10 0.0251 0.0006 0.0014 -.0229 -.0536 -.0634 -.0654 -.0656 -.0652 -.0647 -.0653 -.0659 -.0654 -.0631 -.0570 -.0263 -.0020 -.0028 -.0217
-05 -.0006 -.0193 -.0234 -.0321 -.0376 -.0389 -.0385 -.0386 -.0388 -.0387 -.0389 -.0387 -.0388 -.0392 -.0386 -.0321 -.0234 -.0193 -.0006
 00 -.0273 -.0246 -.0230 -.0231 -.0259 -.0255 -.0286 -.0271 -.0271 -.0267 -.0266 -.0272 -.0280 -.0267 -.0270 -.0242 -.0241 -.0257 -.0284
 05 -.0319 -.0272 -.0204 -.0270 -.0152 -.0148 -.0145 -.0138 -.0127 -.0128 -.0133 -.0141 -.0149 -.0157 -.0164 -.0182 -.0216 -.0287 -.0331
 10 -.0446 -.0368 -.0266 -.0166 -.0127 -.0113 -.0092 -.0057 -.0033 -.0016 -.0017 -.0025 -.0038 -.0049 -.0085 -.0124 -.0224 -.0326 -.0404
 15 -.0682 -.0587 -.0425 -.0197 0.0000 0.0026 0.0078 0.0158 0.0243 0.0323 0.0328 0.0290 0.0189 0.0120 0.0061 -.0136 -.0364 -.0526 -.0621
 20 -.0947 -.0851 -.0642 -.0536 -.0308 -.0293 -.0275 -.0234 -.0188 -.0161 -.0141 -.0136 -.0154 -.0180 -.0273 -.0501 -.0607 -.0816 -.0912
 25 -.1090 -.1235 -.0938 -.0777 -.0674 -.0648 -.0607 -.0558 -.0526 -.0455 -.0471 -.0479 -.0530 -.0563 -.0610 -.0713 -.0874 -.1171 -.1026<!-- -.1607 changed to -.0607-->
 30 -.0135 -.0857 -.0907 -.1013 -.0875 -.0983 -.0951 -.0913 -.0902 -.0871 -.0865 -.0896 -.0962 -.0997 -.1060 -.1198 -.1092 -.1042 -.0320
 35 0.0202 -.0510 -.0891 -.1086 -.1018 -.1014 -.1105 -.1117 -.1127 -.1151 -.1167 -.1230 -.1301 -.1387 -.1402 -.1470 -.1275 -.0894 -.0142
 40 -.0116 -.0639 -.0971 -.1156 -.1170 -.1142 -.1182 -.1160 -.1178 -.1206 -.1280 -.1347 -.1436 -.1512 -.1516 -.1502 -.1317 -.0985 -.0462
 45 -.0023 -.0164 -.0417 -.0987 -.0985 -.0975 -.1278 -.1042 -.1156 -.0979 -.1122 -.1225 -.1444 -.1340 -.1461 -.1463 -.0893 -.0640 -.0499
                         </tableData>
                    </table>
                    <table name="table/Cm_dh0">
                        <independentVar lookup="row">aero/alpha-deg</independentVar>
                        <independentVar lookup="column">aero/beta-deg</independentVar>
                        <tableData>
       -30    -25    -20    -15    -10     -8     -6     -4     -2      0      2      4      6      8     10     15     20     25     30
-20 0.0978 0.0719 0.0621 0.0430 0.0054 0.0023 0.0006 0.0062 0.0114 0.0127 0.0001 0.0023 0.0006 0.0033 0.0177 0.0550 0.0740 0.0840 0.1100
 00 -.0550 -.0460 -.0590 -.0640 -.0660 -.0660 -.0639 -.0615 -.0605 -.0598 -.0600 -.0606 -.0608 -.0617 -.0621 -.0606 -.0587 -.0484 -.0517
 20 -.0570 -.0710 -.0620 -.0520 -.0478 -.0518 -.0498 -.0463 -.0384 -.0342 -.0329 -.0366 -.0426 -.0532 -.0555 -.0620 -.0705 -.0800 -.0660
 40 0.0450 0.0050 -.0520 -.0610 -.0662 -.0729 -.0739 -.0789 -.0820 -.0835 -.0917 -.0971 -.1252 -.1071 -.1116 -.1057 -.0979 -.0402 0.0022
 60 -.1830 -.1480 -.1730 -.1720 -.1512 -.1428 -.1118 -.1094 -.1266 -.1414 -.1436 -.1437 -.1521 -.1459 -.1530 -.1709 -.1741 -.1475 -.1841
 90 -.6330 -.6300 -.6160 -.6160 -.6067 -.6366 -.6053 -.6281 -.6217 -.6184 -.6163 -.6022 -.6073 -.6281 -.6115 -.6209 -.6210 -.6351 -.6381
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                        </tableData>
                    </table>
                </difference>
            </product>
        </function>

        <function name="aero/coefficient/dCm_sb">
            <description>
               Cm due speed brake coefficient.
            </description>
            <product>
                <property>aero/qbar-psf</property>
                <property>metrics/Sw-sqft</property>
                <property>metrics/cbarw-ft</property>
                <property>fcs/speedbrake-pos-norm</property>
                <table name="table/dCm_sb">
                    <independentVar lookup="row">aero/alpha-deg</independentVar>
                    <tableData>
-20 -.0034
-15 -.0034
 00 -.0034
 15 0.0122
 30 -.0163
 45 -.0844
 60 -.0450
 90 -.0107
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                     </tableData>
                </table>
            </product>
        </function>

        <function name="aero/coefficient/dCm_alpha">
            <description>
               Cm due to alpha coefficient.
            </description>
            <product>
                <property>aero/qbar-psf</property>
                <property>metrics/Sw-sqft</property>
                <property>metrics/cbarw-ft</property>
                <table name="table/dCm_alpha">
                    <independentVar lookup="row">aero/alpha-deg</independentVar>
                    <tableData>
-20 .019
-15 .019
 00 .019
 15 .04
 30 .06
 45 .06
 60 .06
 90 .06
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                     </tableData>
                </table>
            </product>
        </function>

        <function name="aero/coefficient/Cm_q">
            <description>
               Cm due to pitch rate coefficient.
            </description>
            <product>
                <property>aero/qbar-psf</property>
                <property>metrics/Sw-sqft</property>
                <property>metrics/cbarw-ft</property>
                <property>aero/ci2vel</property>
                <property>velocities/q-rad_sec</property>
                <table name="table/Cm_q">
                    <independentVar lookup="row">aero/alpha-deg</independentVar>
                    <tableData>
-20 -6.84
-15 -6.84
 00 -5.48
 15 -6.70
 30 -6.20
 45 -6.00
 60 -4.50
 90 -4.04
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                    </tableData>
                </table>
            </product>
        </function>

        <function name="aero/coefficient/dCm_q-lef">
            <description>
               Cm due to pitch rate due to leading edge flaps coefficient.
            </description>
            <product>
                <property>aero/qbar-psf</property>
                <property>metrics/Sw-sqft</property>
                <property>metrics/cbarw-ft</property>
                <property>aero/ci2vel</property>
                <property>velocities/q-rad_sec</property>
                <property>fcs/fly-by-wire/lef/lef-pos-r-norm</property>
                <table name="table/dCm_q-lef">
                    <independentVar lookup="row">aero/alpha-deg</independentVar>
                    <tableData>
-20 -.367
-15 -.367
-05 2.88
 05 .27
 15 .36
 25 -2.51
 35 -1.72
 45 -.60
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                     </tableData>
                </table>
            </product>
        </function>

        <function name="aero/coefficient/dCm_ds">
            <description>
               Cm due to deep stall coefficient
            </description>
            <product>
                <property>aero/qbar-psf</property>
                <property>metrics/Sw-sqft</property>
                <property>metrics/cbarw-ft</property>
                <table name="table/dCm_ds">
                    <independentVar lookup="row">aero/alpha-deg</independentVar>
                    <independentVar lookup="column">fcs/fly-by-wire/pitch/horz-tail-deflection-deg</independentVar>
                    <tableData>
        -25     -10       0      10      15      20      25
 30 0.00000 0.00000 0.00000 0.00000 0.00000 0.00000 0.00000
 35 0.00000 0.00000 0.00000 0.00000 -.01130 -.01320 0.00000
 40 0.00000 0.01000 0.01000 0.02000 0.00410 0.02970 0.02540
 45 0.04800 0.05700 0.06400 0.07000 0.07060 0.05060 0.04070
 50 0.03900 0.05400 0.10500 0.07500 0.07920 0.07470 0.08220
 55 0.00000 0.02500 0.07500 0.04000 0.04160 0.05000 0.05830
 60 0.08400 0.08000 0.10600 0.10000 0.08860 0.07760 0.07850
 70 0.09900 0.07500 0.13200 0.02000 0.02875 0.03610 0.04680
 80 0.02000 0.01000 0.05000 0.00000 0.02180 -.02510 -.02100
 90 0.00000 0.01000 0.04000 0.00000 -.03445 -.03780 -.03780
                    </tableData>
                </table>
            </product>
        </function>

    </axis>


    <function name="aero/coefficient/Cy">
        <description>
           Cy coefficient
        </description>
        <table name="table/Cy">
            <independentVar lookup="row">aero/alpha-deg</independentVar>
            <independentVar lookup="column">aero/beta-deg</independentVar>
            <tableData note="Numbers in this table typed in by E.V.Oort and L.Sonneveldt">
       -30    -25    -20    -15    -10     -8     -6     -4     -2      0      2      4      6      8     10     15     20     25     30
-20 0.3677 0.3070 0.2460 0.1844 0.1062 0.0850 0.0677 0.0380 0.0186 0.0000 -.0232 -.0467 -.0747 -.1078 -.1421 -.2221 -.2861 -.3461 -.4081
 00 0.6218 0.5258 0.4208 0.3088 0.2014 0.1553 0.1138 0.0726 0.0371 0.0000 -.0394 -.0764 -.1191 -.1674 -.2134 -.3198 -.4315 -.5369 -.6400
 20 0.5783 0.4633 0.3383 0.2563 0.1814 0.1504 0.1116 0.0703 0.0332 0.0000 -.0248 -.0558 -.0984 -.1366 -.1729 -.2479 -.3280 -.4542 -.5698
 40 0.4470 0.3885 0.3025 0.2135 0.0748 0.0531 0.0303 0.0360 0.0123 0.0000 -.0320 -.0484 -.0664 -.0958 -.1075 -.1539 -.1575 -.1807 -.2242
 60 0.2233 0.1713 0.2083 0.1883 0.1230 0.1051 0.0788 0.0546 0.0474 0.0000 -.0048 -.0571 -.0840 -.1047 -.1242 -.1885 -.2077 -.1719 -.2099
 90 0.3078 0.2498 0.1998 0.1568 0.1089 0.0843 0.0658 0.0446 0.0203 0.0000 -.0263 -.0418 -.0611 -.0836 -.1068 -.1547 -.1986 -.2474 -.3047
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            </tableData>
        </table>
    </function>

    <function name="aero/coefficient/Cy_dr">
        <description>
           Cy due to rudder coefficient
        </description>
        <table name="table/Cy_dr">
            <independentVar lookup="row">aero/alpha-deg</independentVar>
            <independentVar lookup="column">aero/beta-deg</independentVar>
            <tableData note="Numbers in this table typed in by E.V.Oort and L.Sonneveldt">
       -30    -25    -20    -15    -10     -8     -6     -4     -2      0      2      4      6      8     10     15     20     25     30
-20 0.4196 0.3510 0.2977 0.2414 0.1906 0.1827 0.1760 0.1446 0.1264 0.0945 0.0772 0.0538 0.0320 -.0018 -.0465 -.0970 -.1530 -.2050 -.2730
 00 0.6350 0.5660 0.4960 0.3800 0.2698 0.2407 0.1979 0.1572 0.1202 0.0821 0.0492 0.0147 -.0297 -.0788 -.1309 -.2407 -.3564 -.4250 -.4950
 20 0.6550 0.5430 0.4380 0.3490 0.2371 0.2163 0.1941 0.1455 0.1181 0.0783 0.0473 0.0199 -.0179 -.0538 -.0913 -.2012 -.2911 -.4010 -.5100
 40 0.1520 0.1620 0.1190 0.0910 0.0369 0.0042 0.0064 -.0024 -.0064 -.0096 -.0377 -.0541 -.0850 -.1087 -.1438 -.1967 -.2260 -.2711 -.2624
 60 0.1760 0.1410 0.1750 0.1460 0.0952 0.0644 0.0423 0.0019 -.0112 -.0357 -.0464 -.0974 -.1185 -.1145 -.1705 -.2213 -.2515 -.2160 -.2518
 90 0.3000 0.2410 0.1910 0.1580 0.1054 0.0784 0.0628 0.0482 0.0252 0.0064 -.0112 -.0323 -.0634 -.0829 -.1004 -.1527 -.1861 -.2362 -.2997
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            </tableData>
        </table>
    </function>

    <function name="aero/coefficient/Cy_lef">
        <description>
           Cy due to rudder coefficient
        </description>
        <table name="table/Cy_lef">
            <independentVar lookup="row">aero/alpha-deg</independentVar>
            <independentVar lookup="column">aero/beta-deg</independentVar>
            <tableData note="Numbers in this table typed in by E.V.Oort and L.Sonneveldt">
       -30    -25    -20    -15    -10     -8     -6     -4     -2      0      2      4      6      8     10     15     20     25     30
-20 0.3692 0.2991 0.2417 0.1692 0.1078 0.0874 0.0837 0.0572 0.0260 0.0000 -.0258 -.0592 -.0863 -.1209 -.1504 -.2106 -.2836 -.3396 -.4106
-05 0.5683 0.4913 0.3913 0.2943 0.1926 0.1490 0.1125 0.0723 0.0369 0.0000 -.0363 -.0765 -.1169 -.1644 -.2132 -.3148 -.4118 -.5130 -.5889
 10 0.6132 0.5192 0.4302 0.3142 0.2080 0.1631 0.1187 0.0784 0.0370 0.0000 -.0378 -.0774 -.1228 -.1664 -.2153 -.3196 -.4353 -.5237 -.6177
 25 0.4878 0.3708 0.2508 0.1578 0.1176 0.1174 0.0893 0.0585 0.0286 0.0000 -.0301 -.0566 -.0925 -.1126 -.1321 -.1714 -.2647 -.3850 -.5025
 40 0.1976 0.1776 0.1566 0.1286 0.0906 0.0737 0.0593 0.0505 0.0188 0.0000 -.0286 -.0516 -.0737 -.0938 -.1132 -.1503 -.1791 -.1996 -.2195
 45 0.1741 0.1251 0.1201 0.1320 0.1110 0.0854 0.0550 0.0339 0.0183 0.0000 -.0544 -.0929 -.1312 -.1581 -.1766 -.1977 -.1859 -.1900 -.2385
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            </tableData>
        </table>
    </function>

    <function name="aero/coefficient/Cy_da">
        <description>
           Cy due to aileron coefficient
        </description>
        <table name="table/Cy_da">
            <independentVar lookup="row">aero/alpha-deg</independentVar>
            <independentVar lookup="column">aero/beta-deg</independentVar>
            <tableData note="Numbers in this table typed in by E.V.Oort and L.Sonneveldt">
       -30    -25    -20    -15    -10     -8     -6     -4     -2      0      2      4      6      8     10     15     20     25     30
-20 0.3838 0.3204 0.2946 0.2275 0.1467 0.1200 0.1010 0.0717 0.0500 0.0281 0.0028 -.0154 -.0412 -.0694 -.0949 -.1760 -.2440 -.2700 -.3340
 00 0.6590 0.5630 0.4490 0.3300 0.2130 0.1799 0.1390 0.0963 0.0573 0.0197 -.0166 -.0528 -.0957 -.1350 -.1821 -.3000 -.4190 -.5326 -.6294
 20 0.5720 0.4820 0.3860 0.2980 0.1930 0.1520 0.1166 0.0750 0.0327 0.0028 -.0200 -.0510 -.0889 -.1273 -.1667 -.2716 -.3586 -.4536 -.5415
 40 0.0967 0.0825 0.0349 0.0078 -.0310 -.0492 -.0576 -.0533 -.0696 -.0840 -.1036 -.1271 -.1460 -.1763 -.1919 -.2328 -.2557 -.3029 -.3183
 60 0.1232 0.1021 0.1151 0.0882 0.0311 0.0001 -.0094 -.0503 -.0647 -.0920 -.0976 -.1289 -.1540 -.1714 -.1950 -.2546 -.2846 -.2656 -.2868
 90 0.2845 0.2302 0.1800 0.1510 0.0998 0.0777 0.0577 0.0351 0.0111 -.0048 -.0320 -.0476 -.0770 -.0989 -.1204 -.1735 -.2153 -.2572 -.3173
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            </tableData>
        </table>
    </function>

    <function name="aero/coefficient/Cy_da-lef">
        <description>
           Cy due to aileron and leading edge flaps coefficient
        </description>
        <table name="table/Cy_da-lef">
            <independentVar lookup="row">aero/alpha-deg</independentVar>
            <independentVar lookup="column">aero/beta-deg</independentVar>
            <tableData note="Numbers in this table typed in by E.V.Oort and L.Sonneveldt">
       -30    -25    -20    -15    -10     -8     -6     -4     -2      0      2      4      6      8     10     15     20     25     30
-20 0.3860 0.3207 0.2777 0.1838 0.1290 0.1215 0.1051 0.0758 0.0498 0.0247 -.0067 -.0334 -.0645 -.0939 -.1248 -.1790 -.2730 -.3160 -.3810
-05 0.6320 0.5470 0.4410 0.3320 0.2109 0.1775 0.1379 0.0940 0.0585 0.0202 -.0132 -.0538 -.0901 -.1326 -.1786 -.2971 -.4064 -.5121 -.5958
 10 0.6450 0.5620 0.4580 0.3360 0.2190 0.1828 0.1381 0.0955 0.0562 0.0164 -.0231 -.0582 -.1041 -.1462 -.1962 -.3136 -.4322 -.5393 -.6208
 25 0.4920 0.3630 0.2720 0.1810 0.1246 0.1206 0.0935 0.0676 0.0338 0.0010 -.0261 -.0531 -.0801 -.1061 -.1274 -.1823 -.2714 -.3631 -.4930
 40 0.1320 0.0870 0.0740 0.0500 0.0012 -.0165 -.0197 -.0465 -.0602 -.0807 -.1014 -.1290 -.1431 -.1644 -.1864 -.2334 -.2568 -.2685 -.3138
 45 0.1020 0.0520 0.0690 0.0650 0.0456 0.0212 0.0018 -.0260 -.0392 -.0611 -.1056 -.1607 -.1729 -.1961 -.2268 -.2456 -.2495 -.2313 -.2828
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            </tableData>
        </table>
    </function>

    <function name="aero/coefficient/Cy_r">
        <description>
           Cy due to yaw rate coefficient.
        </description>
        <product>
            <property>aero/bi2vel</property>
            <property>velocities/r-rad_sec</property>
            <table name="table/Cy_r">
                <independentVar lookup="row">aero/alpha-deg</independentVar>
                <tableData>
-20 1.44
-15 1.44
 00 .981
 15 .981
 30 .590
 45 -1.04
 60 -1.37
 90 .193
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                 </tableData>
            </table>
        </product>
    </function>

    <function name="aero/coefficient/dCy_r-lef">
        <description>
           Cy due to yaw rate due to leading edge flaps coefficient.
        </description>
        <product>
            <property>aero/bi2vel</property>
            <property>velocities/r-rad_sec</property>
            <property>fcs/fly-by-wire/lef/lef-pos-r-norm</property>
            <table name="table/Cy_r-lef">
                <independentVar lookup="row">aero/alpha-deg</independentVar>
                <tableData>
-20 -.558
-15 -.558
-05 -.198
 05 .027
 15 -.046
 25 .215
 35 -.060
 45 -.187
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                 </tableData>
            </table>
        </product>
    </function>

    <function name="aero/coefficient/Cy_p">
        <description>
           Cy due to roll rate coefficient.
        </description>
        <product>
            <property>aero/bi2vel</property>
            <property>velocities/p-rad_sec</property>
            <table name="table/Cy_p">
                <independentVar lookup="row">aero/alpha-deg</independentVar>
                <tableData>
-20 .0333
-15 .0333
 00 .0055
 15 .234
 30 .611
 45 -2.27
 60 2.90
 90 -.261
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                </tableData>
            </table>
        </product>
    </function>

    <function name="aero/coefficient/dCy_p-lef">
        <description>
           Cy due to roll rate due to leading edge flaps coefficient.
        </description>
        <product>
            <property>aero/bi2vel</property>
            <property>velocities/p-rad_sec</property>
            <property>fcs/fly-by-wire/lef/lef-pos-r-norm</property>
            <table name="table/Cy_p-lef">
                <independentVar lookup="row">aero/alpha-deg</independentVar>
                <tableData>
-20 -.141
-15 -.141
-05 .069
 05 .0601
 15 -.052
 25 .106
 35 -.642
 45 -.128
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                 </tableData>
            </table>
        </product>
    </function>

    <function name="aero/coefficient/dCy_lef">
        <description>
           Cy due to leading edge flaps coefficient.
        </description>
        <product>
            <property>fcs/fly-by-wire/lef/lef-pos-r-norm</property>
            <difference>
                <p>aero/coefficient/Cy_lef</p>
                <p>aero/coefficient/Cy</p>
            </difference>
        </product>
    </function>

    <function name="aero/coefficient/dCy_da-lef">
        <description>
           Cy due to aileron due to leading edge flaps coefficient
        </description>
        <product>
            <p>fcs/fly-by-wire/roll/aileron-pos-norm</p><!-- 1 = 20 degs (should it rely on absolute norm instead? [maybe]) -->
            <sum>
                <difference>
                    <p>aero/coefficient/Cy_da</p>
                    <p>aero/coefficient/Cy</p>
                </difference>
                <product>
                    <p>fcs/fly-by-wire/lef/lef-pos-r-norm</p>
                    <difference>
                        <p>aero/coefficient/Cy_da-lef</p>
                        <p>aero/coefficient/Cy_lef</p>
                        <difference>
                            <p>aero/coefficient/Cy_da</p>
                            <p>aero/coefficient/Cy</p>
                        </difference>
                    </difference>
                </product>
            </sum>
        </product>
    </function>

    <function name="aero/coefficient/dCy_dr">
        <description>
           Cy due to rudder coefficient
        </description>
        <product>
            <p>fcs/fly-by-wire/yaw/rudder-pos-norm</p><!-- 1 = 30 degs (should it rely on absolute norm instead? [probably]) -->
            <difference>
                <p>aero/coefficient/Cy_dr</p>
                <p>aero/coefficient/Cy</p>
            </difference>
        </product>
    </function>

    <function name="aero/coefficient/Cy_t">
        <description>
           Total Side Force Coefficient
        </description>
        <product>
            <sum>
                <p>aero/coefficient/Cy</p>
                <p>aero/coefficient/dCy_lef</p>
                <p>aero/coefficient/dCy_da-lef</p>
                <p>aero/coefficient/dCy_dr</p>
                <p>aero/coefficient/Cy_r</p>
                <p>aero/coefficient/dCy_r-lef</p>
                <p>aero/coefficient/Cy_p</p>
                <p>aero/coefficient/dCy_p-lef</p>
            </sum>
        </product>
    </function>

    <axis name="Y">

        <function name="aero/coefficient/Y_t-lbf">
            <description>
               Side Force
            </description>
            <product>
                <property>aero/qbar-psf</property>
                <property>metrics/Sw-sqft</property>
                <p>aero/coefficient/Cy_t</p>
            </product>
        </function>

    </axis>


    <function name="aero/coefficient/Cn_dh0">
        <description>
            coefficient
        </description>
            <table name="table/Cn_dh0">
                <independentVar lookup="row">aero/alpha-deg</independentVar>
                <independentVar lookup="column">aero/beta-deg</independentVar>
                <tableData note="Numbers in this table typed in by E.V.Oort and L.Sonneveldt">
       -30    -25    -20    -15    -10     -8     -6     -4     -2      0      2      4      6      8     10     15     20     25     30
-20 -.0551 -.0588 -.0496 -.0406 -.0219 -.0145 -.0075 -.0012 0.0002 0.0000 -.0090 0.0012 0.0059 0.0099 0.0141 0.0333 0.0425 0.0516 0.0477
 00 -.1058 -.0916 -.0749 -.0578 -.0413 -.0317 -.0226 -.0138 -.0066 0.0000 0.0061 0.0135 0.0225 0.0324 0.0414 0.0579 0.0746 0.0914 0.1055
 20 -.0684 -.0491 -.0290 -.0321 -.0308 -.0262 -.0179 -.0102 -.0042 0.0000 0.0018 0.0068 0.0152 0.0233 0.0296 0.0309 0.0279 0.0479 0.0674
 40 -.0025 0.0054 0.0683 0.0744 0.0506 0.0351 0.0207 0.0131 0.0052 0.0000 -.0071 -.0136 -.0216 -.0329 -.0440 -.0677 -.0622 0.0012 0.0202
 60 -.0188 -.0075 0.0211 0.0080 -.0061 -.0100 -.0174 -.0219 -.0079 0.0000 0.0075 0.0103 0.0043 -.0013 -.0019 -.0156 -.0284 0.0004 0.0110
 90 0.0274 0.0128 0.0118 0.0059 0.0051 0.0044 0.0031 0.0027 0.0017 0.0000 -.0018 -.0023 -.0031 -.0048 -.0048 -.0054 -.0111 -.0121 -.0163
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             </tableData>
        </table>
    </function>

    <function name="aero/coefficient/Cn_lef">
        <description>
            coefficient
        </description>
            <table name="table/Cn_lef">
                <independentVar lookup="row">aero/alpha-deg</independentVar>
                <independentVar lookup="column">aero/beta-deg</independentVar>
                <tableData note="Numbers in this table typed in by E.V.Oort and L.Sonneveldt">
       -30    -25    -20    -15    -10     -8     -6     -4     -2      0      2      4      6      8     10     15     20     25     30
-20 -.0541 -.0563 -.0461 -.0495 -.0296 -.0208 -.0173 -.0100 -.0043 0.0000 0.0037 0.0076 0.0121 0.0186 0.0231 0.0428 0.0393 0.0494 0.0468
-05 -.0881 -.0851 -.0753 -.0556 -.0402 -.0308 -.0254 -.0141 -.0067 0.0000 0.0067 0.0144 0.0234 0.0328 0.0430 0.0586 0.0785 0.0872 0.0913
 10 -.0926 -.0797 -.0731 -.0580 -.0424 -.0327 -.0235 -.0154 -.0064 0.0000 0.0064 0.0115 0.0243 0.0330 0.0425 0.0579 0.0730 0.0796 0.0925
 25 -.0342 -.0208 -.0017 0.0063 -.0059 -.0094 -.0061 -.0029 -.0012 0.0000 0.0008 0.0038 0.0069 0.0078 0.0034 -.0088 -.0008 0.0183 0.0317
 40 0.0302 0.0357 0.0675 0.0645 0.0445 0.0330 0.0214 0.0156 0.0065 0.0000 -.0060 -.0136 -.0155 -.0266 -.0330 -.0532 -.0561 -.0240 0.0014
 45 0.0003 -.0038 0.0214 0.0400 0.0326 0.0261 0.0199 0.0130 0.0047 0.0000 -.0170 -.0369 -.0464 -.0533 -.0611 -.0681 -.0495 -.0245 -.0280
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             </tableData>
        </table>
    </function>

    <function name="aero/coefficient/Cn_da">
        <description>
            coefficient
        </description>
            <table name="table/Cn_da">
                <independentVar lookup="row">aero/alpha-deg</independentVar>
                <independentVar lookup="column">aero/beta-deg</independentVar>
                <tableData note="Numbers in this table typed in by E.V.Oort and L.Sonneveldt">
       -30    -25    -20    -15    -10     -8     -6     -4     -2      0      2      4      6      8     10     15     20     25     30
-20 -.0639 -.0628 -.0616 -.0550 -.0359 -.0267 -.0188 -.0119 -.0093 -.0089 -.0081 -.0071 -.0043 -.0040 0.0020 0.0211 0.0277 0.0289 0.0300
 00 -.1234 -.1094 -.0915 -.0721 -.0498 -.0448 -.0377 -.0277 -.0193 -.0120 -.0056 0.0015 0.0092 0.0175 0.0268 0.0491 0.0685 0.0864 0.1004
 20 -.0670 -.0561 -.0505 -.0472 -.0358 -.0269 -.0198 -.0111 -.0029 -.0001 0.0015 0.0052 0.0121 0.0204 0.0273 0.0387 0.0420 0.0476 0.0585
 40 0.0056 0.0322 0.0831 0.0881 0.0563 0.0395 0.0271 0.0187 0.0127 0.0044 -.0009 -.0060 -.0131 -.0224 -.0328 -.0646 -.0578 -.0087 0.0179
 60 0.0047 -.0008 0.0281 0.0257 0.0165 0.0169 0.0115 0.0092 0.0207 0.0182 0.0236 0.0195 0.0158 0.0112 0.0039 -.0053 -.0077 0.0212 0.0157
 90 0.0320 0.0287 0.0237 0.0165 0.0165 0.0153 0.0151 0.0155 0.0138 0.0125 0.0113 0.0110 0.0101 0.0101 0.0117 0.0117 0.0045 -.0050 -.0038
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            </tableData>
        </table>
    </function>

    <function name="aero/coefficient/Cn_da-lef">
        <description>
            coefficient
        </description>
            <table name="table/Cn_da-lef">
                <independentVar lookup="row">aero/alpha-deg</independentVar>
                <independentVar lookup="column">aero/beta-deg</independentVar>
                <tableData note="Numbers in this table typed in by E.V.Oort and L.Sonneveldt">
       -30    -25    -20    -15    -10     -8     -6     -4     -2      0      2      4      6      8     10     15     20     25     30
-20 -.0683 -.0615 -.0556 -.0519 -.0393 -.0314 -.0264 -.0199 -.0140 -.0095 -.0054 -.0029 0.0019 0.0074 0.0124 0.0251 0.0293 0.0354 0.0421
-05 -.1149 -.1067 -.0898 -.0716 -.0482 -.0429 -.0359 -.0267 -.0188 -.0113 -.0050 0.0024 0.0093 0.0186 0.0278 0.0511 0.0689 0.0856 0.0932
 10 -.1024 -.0944 -.0827 -.0658 -.0450 -.0401 -.0307 -.0224 -.0137 -.0056 0.0015 0.0079 0.0164 0.0251 0.0345 0.0550 0.0719 0.0838 0.0917
 25 -.0370 -.0163 -.0025 0.0028 -.0087 -.0105 -.0071 -.0049 -.0019 -.0006 0.0004 0.0024 0.0041 0.0055 0.0015 -.0098 -.0050 0.0089 0.0307
 40 0.0189 0.0463 0.0803 0.0786 0.0519 0.0392 0.0287 0.0209 0.0127 0.0062 -.0017 -.0079 -.0105 -.0161 -.0221 -.0486 -.0497 -.0155 0.0116
 45 0.0055 0.0045 0.0224 0.0432 0.0419 0.0355 0.0274 0.0202 0.0141 0.0069 -.0105 -.0321 -.0375 -.0468 -.0536 -.0549 -.0344 -.0164 -.0174
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             </tableData>
        </table>
    </function>

    <function name="aero/coefficient/Cn_dr">
        <description>
            coefficient
        </description>
            <table name="table/Cn_dr">
                <independentVar lookup="row">aero/alpha-deg</independentVar>
                <independentVar lookup="column">aero/beta-deg</independentVar>
                <tableData note="Numbers in this table typed in by E.V.Oort and L.Sonneveldt">
       -30    -25    -20    -15    -10     -8     -6     -4     -2      0      2      4      6      8     10     15     20     25     30
-20 -.0787 -.0815 -.0741 -.0656 -.0620 -.0627 -.0616 -.0551 -.0520 -.0481 -.0494 -.0486 -.0465 -.0396 -.0310 -.0270 -.0191 -.0113 -.0143
 00 -.1576 -.1381 -.1181 -.0981 -.0791 -.0783 -.0693 -.0610 -.0527 -.0451 -.0389 -.0323 -.0230 -.0116 0.0000 0.0190 0.0389 0.0584 0.0784
 20 -.1271 -.1071 -.0866 -.0836 -.0677 -.0685 -.0676 -.0628 -.0543 -.0475 -.0431 -.0404 -.0321 -.0230 -.0047 0.0012 0.0043 0.0249 0.0447
 40 -.0289 -.0111 0.0386 0.0484 0.0321 0.0145 0.0013 -.0103 -.0243 -.0328 -.0405 -.0449 -.0496 -.0570 -.0659 -.0824 -.0726 -.0227 -.0053
 60 -.0162 -.0127 0.0181 0.0026 -.0084 -.0121 -.0195 -.0193 -.0082 -.0012 0.0066 0.0096 0.0046 -.0033 -.0048 -.0163 -.0317 -.0012 0.0026
 90 0.0089 0.0077 0.0068 0.0014 -.0036 -.0044 -.0057 -.0010 -.0009 -.0024 -.0042 -.0047 -.0054 -.0058 -.0057 -.0109 -.0157 -.0170 -.0181
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            </tableData>
        </table>
    </function>
    <axis name="YAW">

        <function name="aero/coefficient/Cn">
            <description>
               Cn coefficient
            </description>
            <product>
                <property>aero/qbar-psf</property>
                <property>metrics/Sw-sqft</property>
                <property>metrics/bw-ft</property>
                <table name="table/Cn">
                    <independentVar lookup="row">aero/alpha-deg</independentVar>
                    <independentVar lookup="column">aero/beta-deg</independentVar>
                    <independentVar lookup="table">fcs/fly-by-wire/pitch/horz-tail-deflection-deg</independentVar>
                    <tableData breakPoint="-25.0" note="Numbers in this table typed in by E.V.Oort and L.Sonneveldt">
       -30    -25    -20    -15    -10     -8     -6     -4     -2      0      2      4      6      8     10     15     20     25     30
-20 -.0633 -.0667 -.0565 -.0418 -.0175 -.0093 -.0060 0.0047 0.0034 0.0000 -.0048 -.0106 -.0074 -.0015 0.0052 0.0297 0.0443 0.0545 0.0510
 00 -.0995 -.0869 -.0795 -.0528 -.0375 -.0280 -.0193 -.0118 -.0053 0.0000 0.0055 0.0122 0.0208 0.0302 0.0393 0.0547 0.0706 0.0891 0.1034
 20 -.0677 -.0506 -.0290 -.0276 -.0259 -.0216 -.0151 -.0088 -.0040 0.0000 -.0022 0.0021 0.0099 0.0161 0.0210 0.0226 0.0241 0.0460 0.0627
 40 -.0037 0.0167 0.0770 0.0803 0.0573 0.0433 0.0292 0.0184 0.0068 0.0000 -.0048 -.0115 -.0233 -.0332 -.0492 -.0762 -.0727 -.0125 0.0079
 60 -.0055 0.0068 0.0374 0.0119 0.0234 0.0127 -.0016 -.0120 -.0029 0.0000 0.0052 0.0057 -.0101 -.0215 -.0221 -.0263 -.0358 -.0055 0.0066
 90 0.0319 0.0199 0.0108 0.0018 0.0079 0.0062 0.0039 0.0029 0.0018 0.0000 -.0064 -.0051 -.0098 -.0097 -.0101 -.0038 -.0072 -.0159 -.0277
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                    </tableData>
                    <tableData breakPoint="0.0" note="Numbers in this table typed in by E.V.Oort and L.Sonneveldt">
       -30    -25    -20    -15    -10     -8     -6     -4     -2      0      2      4      6      8     10     15     20     25     30
-20 -.0551 -.0588 -.0496 -.0406 -.0219 -.0145 -.0075 -.0012 0.0002 0.0000 -.0090 0.0012 0.0059 0.0099 0.0141 0.0333 0.0425 0.0516 0.0477
 00 -.1058 -.0916 -.0749 -.0578 -.0413 -.0317 -.0226 -.0138 -.0066 0.0000 0.0061 0.0135 0.0225 0.0324 0.0414 0.0579 0.0746 0.0914 0.1055
 20 -.0684 -.0491 -.0290 -.0321 -.0308 -.0262 -.0179 -.0102 -.0042 0.0000 0.0018 0.0068 0.0152 0.0233 0.0296 0.0309 0.0279 0.0479 0.0674
 40 -.0025 0.0054 0.0683 0.0744 0.0506 0.0351 0.0207 0.0131 0.0052 0.0000 -.0071 -.0136 -.0216 -.0329 -.0440 -.0677 -.0622 0.0012 0.0202
 60 -.0188 -.0075 0.0211 0.0080 -.0061 -.0100 -.0174 -.0219 -.0079 0.0000 0.0075 0.0103 0.0043 -.0013 -.0019 -.0156 -.0284 0.0004 0.0110
 90 0.0274 0.0128 0.0118 0.0059 0.0051 0.0044 0.0031 0.0027 0.0017 0.0000 -.0018 -.0023 -.0031 -.0048 -.0048 -.0054 -.0111 -.0121 -.0163
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                    </tableData>
                    <tableData breakPoint="25.0" note="Numbers in this table typed in by E.V.Oort and L.Sonneveldt">
       -30    -25    -20    -15    -10     -8     -6     -4     -2      0      2      4      6      8     10     15     20     25     30
-20 -.0488 -.0515 -.0442 -.0428 -.0215 -.0136 -.0046 -.0018 0.0001 0.0000 -.0005 -.0003 0.0048 0.0084 0.0143 0.0356 0.0369 0.0441 0.0425
-10 -.0574 -.0534 -.0477 -.0424 -.0277 -.0208 -.0134 -.0073 -.0025 0.0000 0.0018 0.0075 0.0140 0.0222 0.0277 0.0421 0.0476 0.0534 0.0572
 00 -.0919 -.0818 -.0694 -.0560 -.0402 -.0311 -.0223 -.0141 -.0065 0.0000 0.0069 0.0147 0.0230 0.0319 0.0408 0.0565 0.0696 0.0824 0.0924
 10 -.0821 -.0723 -.0653 -.0534 -.0403 -.0328 -.0233 -.0135 -.0061 0.0000 0.0049 0.0126 0.0218 0.0310 0.0400 0.0531 0.0649 0.0718 0.0814
 20 -.0398 -.0355 -.0237 -.0284 -.0311 -.0270 -.0183 -.0091 -.0035 0.0000 0.0028 0.0052 0.0178 0.0268 0.0332 0.0305 0.0259 0.0374 0.0417
 30 -.0116 0.0142 0.0273 0.0242 0.0111 -.0066 -.0063 -.0020 0.0009 0.0000 -.0010 -.0006 0.0018 0.0039 0.0018 -.0111 -.0146 -.0012 0.0244
 35 0.0018 0.0282 0.0499 0.0550 0.0430 0.0382 0.0193 0.0099 0.0069 0.0000 -.0086 -.0126 -.0154 -.0181 -.0288 -.0456 -.0402 -.0185 0.0071
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 40 0.0003 0.0193 0.0698 0.0788 0.0534 0.0372 0.0252 0.0169 0.0073 0.0000 -.0084 -.0147 -.0248 -.0362 -.0480 -.0733 -.0641 -.0052 0.0051<!-- -.01930 changed to 0.0193 -->
 45 -.0149 -.0007 0.0226 0.0569 0.0455 0.0363 0.0288 0.0188 0.0089 0.0000 -.0252 -.0403 -.0511 -.0621 -.0712 -.0804 -.0480 -.0247 -.0207
 50 -.0219 -.0174 -.0077 0.0171 0.0310 0.0307 0.0328 0.0189 0.0120 0.0000 -.0058 -.0251 -.0408 -.0543 -.0664 -.0530 -.0292 -.0187 -.0151
 55 -.0518 -.0435 -.0053 -.0307 -.0231 -.0108 -.0022 -.0016 0.0065 0.0000 -.0026 -.0085 -.0223 -.0257 -.0244 -.0171 -.0424 -.0042 0.0031
 60 -.0270 -.0207 0.0042 -.0137 -.0137 -.0138 -.0173 -.0203 -.0071 0.0000 0.0093 0.0138 0.0067 -.0028 -.0073 -.0072 -.0254 -.0008 0.0056
 70 0.0158 0.0270 0.0252 0.0117 -.0010 -.0039 -.0068 -.0132 -.0159 0.0000 -.0039 0.0110 0.0088 0.0084 0.0069 -.0059 -.0191 -.0209 -.0104
 80 0.0106 0.0182 0.0182 0.0117 0.0081 0.0096 0.0099 0.0081 0.0056 0.0000 -.0010 0.0042 -.0043 0.0016 -.0035 -.0112 -.0135 -.0135 -.0058
 90 0.0118 0.0101 0.0117 0.0036 0.0060 0.0053 0.0041 0.0035 0.0021 0.0000 -.0002 0.0008 0.0008 -.0008 -.0008 0.0014 -.0068 -.0054 -.0072
                     </tableData>
                </table>
            </product>
        </function>

        <function name="aero/coefficient/dCn_lef">
            <description>
               Cn due to leading edge flaps coefficient.
            </description>
            <product>
                <property>aero/qbar-psf</property>
                <property>metrics/Sw-sqft</property>
                <property>metrics/bw-ft</property>
                <property>fcs/fly-by-wire/lef/lef-pos-r-norm</property>
                <difference>
                    <p>aero/coefficient/Cn_lef</p>
                    <p>aero/coefficient/Cn_dh0</p>
                </difference>
            </product>
        </function>

        <function name="aero/coefficient/dCn_da-lef">
            <description>
               Cn due to aileron coefficient
            </description>
            <product>
                <property>aero/qbar-psf</property>
                <property>metrics/Sw-sqft</property>
                <property>metrics/bw-ft</property>
                <p>fcs/fly-by-wire/roll/aileron-pos-norm</p><!-- 1 = 20 degs -->
                <sum>
                    <difference>
                        <p>aero/coefficient/Cn_da</p>
                        <p>aero/coefficient/Cn_dh0</p>
                    </difference>
                    <product>
                        <p>fcs/fly-by-wire/lef/lef-pos-r-norm</p>
                        <difference>
                            <p>aero/coefficient/Cn_da-lef</p>
                            <p>aero/coefficient/Cn_lef</p>
                            <difference>
                                <p>aero/coefficient/Cn_da</p>
                                <p>aero/coefficient/Cn_dh0</p>
                            </difference>
                        </difference>
                    </product>
                </sum>
            </product>
        </function>

        <function name="aero/coefficient/Cn_cg">
            <description>
               Cn due to CoG shift
            </description>
            <product>
                <property>aero/qbar-psf</property>
                <property>metrics/Sw-sqft</property>
                <property>metrics/bw-ft</property>
                <v>-1</v>
                <difference>
                    <v>-193</v>
                    <p>inertia/cg-x-in</p>
                </difference>
                <p>aero/coefficient/Cy_t</p>
                <quotient>
                    <property>metrics/cbarw-ft</property>
                    <property>metrics/bw-ft</property>
                </quotient>
            </product>
        </function>

        <function name="aero/coefficient/dCn_dr">
            <description>
               Cn due to rudder coefficient
            </description>
            <product>
                <property>aero/qbar-psf</property>
                <property>metrics/Sw-sqft</property>
                <property>metrics/bw-ft</property>
                <p>fcs/fly-by-wire/yaw/rudder-pos-norm</p><!-- 1 = 30 degs -->
                <difference>
                    <p>aero/coefficient/Cn_dr</p>
                    <p>aero/coefficient/Cn_dh0</p>
                </difference>
            </product>
        </function>

        <function name="aero/coefficient/Cn_r">
            <description>
               Cn due to yaw rate coefficient.
            </description>
            <product>
                <property>aero/qbar-psf</property>
                <property>metrics/Sw-sqft</property>
                <property>metrics/bw-ft</property>
                <property>aero/bi2vel</property>
                <property>velocities/r-rad_sec</property>
                <table name="table/Cn_r">
                    <independentVar lookup="row">aero/alpha-deg</independentVar>
                    <tableData>
-20 -.517
-15 -.517
 00 -.414
 15 -.455
 30 -.595
 45 -.84
 60 -.35
 90 -.15
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                     </tableData>
                </table>
            </product>
        </function>

        <function name="aero/coefficient/dCn_b">
            <description>
               Cn due to beta coefficient.
            </description>
            <product>
                <property>aero/qbar-psf</property>
                <property>metrics/Sw-sqft</property>
                <property>metrics/bw-ft</property>
                <property>aero/beta-deg</property>
                <table name="table/dCn_b">
                    <independentVar lookup="row">aero/alpha-deg</independentVar>
                    <tableData>
-20 .0
-15 .0
 00 .0
 15 .0
 30 .001
 45 .0
 60 .0
 90 .0
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                    </tableData>
                </table>
            </product>
        </function>

        <!--<function name="aero/coefficient/dCn_da">
            <description>
               Cn due to aileron coefficient.

               Note: This is not included in equations of motion and is quite insignificant, so ignored.
            </description>
            <product>
                <v>0</v>
                <property>aero/qbar-psf</property>
                <property>metrics/Sw-sqft</property>
                <property>metrics/bw-ft</property>
                <property>fcs/aileron-pos-rad</property>
                <table name="table/dCn_da">
                    <independentVar lookup="row">aero/alpha-deg</independentVar>
                    <tableData>
-20 .0
-15 .0
 00 .0001
 15 .00010
 30 .0
 45 .0
 60 .0
 90 .0
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                     </tableData>
                </table>
            </product>
        </function>-->

        <function name="aero/coefficient/dCn_r-lef">
            <description>
               Cn due to yaw rate due to leading edge flaps coefficient.
            </description>
            <product>
                <property>aero/qbar-psf</property>
                <property>metrics/Sw-sqft</property>
                <property>metrics/bw-ft</property>
                <property>aero/bi2vel</property>
                <property>velocities/r-rad_sec</property>
                <property>fcs/fly-by-wire/lef/lef-pos-r-norm</property>
                <table name="table/dCn_r-lef">
                    <independentVar lookup="row">aero/alpha-deg</independentVar>
                    <tableData>
-20 .137
-15 .137
-05 .098
 05 .016
 15 .014
 25 -.098
 35 -.437
 45 .084
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                     </tableData>
                </table>
            </product>
        </function>

        <function name="aero/coefficient/Cn_p">
            <description>
               Cn due to roll rate coefficient.
            </description>
            <product>
                <property>aero/qbar-psf</property>
                <property>metrics/Sw-sqft</property>
                <property>metrics/bw-ft</property>
                <property>aero/bi2vel</property>
                <property>velocities/p-rad_sec</property>
                <table name="table/Cn_p">
                    <independentVar lookup="row">aero/alpha-deg</independentVar>
                    <tableData>
-20 -.0006
-15 -.0006
 00 -.0075
 15 -.0320
 30 .13
 45 .15
 60 -.3
 90 0.0
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                     </tableData>
                </table>
            </product>
        </function>

        <function name="aero/coefficient/dCn_p-lef">
            <description>
               Cn due to roll rate due to leading edge flaps coefficient.
            </description>
            <product>
                <property>aero/qbar-psf</property>
                <property>metrics/Sw-sqft</property>
                <property>metrics/bw-ft</property>
                <property>aero/bi2vel</property>
                <property>velocities/p-rad_sec</property>
                <property>fcs/fly-by-wire/lef/lef-pos-r-norm</property>
                <table name="table/dCn_p-lef">
                    <independentVar lookup="row">aero/alpha-deg</independentVar>
                    <tableData>
-20 .0615
-15 .0615
-05 .0091
 05 .0129
 15 .0512
 25 .0017
 35 .211
 45 .196
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                     </tableData>
                </table>
            </product>
        </function>

    </axis>


    <function name="aero/coefficient/Cl_dh0">
        <description>
            coefficient
        </description>
            <table name="table/Cl_dh0">
                <independentVar lookup="row">aero/alpha-deg</independentVar>
                <independentVar lookup="column">aero/beta-deg</independentVar>
                <tableData note="Numbers in this table typed in by E.V.Oort and L.Sonneveldt">
       -30    -25    -20    -15    -10     -8     -6     -4     -2      0      2      4      6      8     10     15     20     25     30
-20 -.0153 -.0028 0.0091 0.0188 0.0234 0.0173 0.0106 0.0090 0.0041 0.0000 -.0031 -.0064 -.0084 -.0128 -.0171 -.0120 -.0022 0.0097 0.0225
 00 0.0157 0.0190 0.0199 0.0207 0.0185 0.0153 0.0110 0.0071 0.0033 0.0000 -.0030 -.0067 -.0107 -.0147 -.0182 -.0204 -.0196 -.0187 -.0154
 20 0.0895 0.0815 0.0692 0.0579 0.0453 0.0354 0.0270 0.0171 0.0076 0.0000 -.0085 -.0177 -.0271 -.0365 -.0440 -.0569 -.0682 -.0804 -.0884
 40 0.0721 0.0573 0.0302 0.0087 0.0050 0.0104 0.0174 0.0124 0.0062 0.0000 -.0075 -.0108 -.0131 -.0145 -.0148 -.0185 -.0399 -.0671 -.0815
 60 0.0650 0.0481 0.0387 0.0301 0.0229 0.0192 0.0155 0.0094 0.0063 0.0000 -.0029 -.0055 -.0111 -.0163 -.0188 -.0260 -.0346 -.0440 -.0609
 90 0.0701 0.0534 0.0410 0.0293 0.0205 0.0188 0.0163 0.0110 0.0066 0.0000 0.0000 -.0001 -.0067 -.0124 -.0154 -.0242 -.0359 -.0483 -.0650
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             </tableData>
        </table>
    </function>

    <function name="aero/coefficient/Cl_lef">
        <description>
            coefficient
        </description>
            <table name="table/Cl_lef">
                <independentVar lookup="row">aero/alpha-deg</independentVar>
                <independentVar lookup="column">aero/beta-deg</independentVar>
                <tableData note="Numbers in this table typed in by E.V.Oort and L.Sonneveldt">
       -30    -25    -20    -15    -10     -8     -6     -4     -2      0      2      4      6      8     10     15     20     25     30
-20 -.0205 -.0170 -.0076 0.0047 0.0150 0.0134 0.0008 0.0013 0.0027 0.0000 -.0012 -.0031 -.0054 -.0051 -.0054 0.0036 0.0159 0.0256 0.0297
-05 0.0106 0.0102 0.0104 0.0103 0.0093 0.0073 0.0052 0.0030 0.0012 0.0000 -.0010 -.0027 -.0044 -.0065 -.0087 -.0100 -.0103 -.0102 -.0106
 10 0.0485 0.0463 0.0430 0.0347 0.0263 0.0213 0.0155 0.0100 0.0046 0.0000 -.0048 -.0115 -.0175 -.0227 -.0278 -.0360 -.0443 -.0476 -.0498
 25 0.0731 0.0573 0.0371 0.0221 0.0233 0.0203 0.0175 0.0120 0.0061 0.0000 -.0058 -.0128 -.0183 -.0186 -.0260 -.0248 -.0398 -.0610 -.0758
 40 0.0555 0.0435 0.0339 0.0173 0.0094 0.0156 0.0193 0.0110 0.0110 0.0000 -.0074 -.0126 -.0194 -.0213 -.0253 -.0332 -.0498 -.0594 -.0714
 45 0.0500 0.0493 0.0351 0.0306 0.0179 0.0158 0.0128 0.0077 0.0019 0.0000 -.0118 -.0124 -.0150 -.0173 -.0214 -.0341 -.0386 -.0528 -.0535
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             </tableData>
        </table>
    </function>

    <function name="aero/coefficient/Cl_da">
        <description>
            coefficient
        </description>
            <table name="table/Cl_da">
                <independentVar lookup="row">aero/alpha-deg</independentVar>
                <independentVar lookup="column">aero/beta-deg</independentVar>
                <tableData note="Numbers in this table typed in by E.V.Oort and L.Sonneveldt">
       -30    -25    -20    -15    -10     -8     -6     -4     -2      0      2      4      6      8     10     15     20     25     30
-20 -.0499 -.0325 -.0184 -.0113 -.0023 -.0059 -.0125 -.0116 -.0170 -.0211 -.0242 -.0271 -.0331 -.0352 -.0392 -.0302 -.0231 -.0090 0.0084
 00 -.0404 -.0372 -.0327 -.0302 -.0323 -.0342 -.0373 -.0414 -.0451 -.0482 -.0510 -.0536 -.0570 -.0595 -.0624 -.0645 -.0620 -.0575 -.0543
 20 0.0074 0.0045 0.0038 0.0063 0.0026 -.0053 -.0137 -.0228 -.0322 -.0416 -.0515 -.0606 -.0689 -.0784 -.0863 -.0900 -.0875 -.0882 -.0911
 40 0.0419 0.0253 0.0041 -.0183 -.0154 -.0061 -.0014 -.0057 -.0117 -.0195 -.0276 -.0310 -.0347 -.0346 -.0339 -.0310 -.0534 -.0746 -.0912
 60 0.0490 0.0323 0.0267 0.0182 0.0089 0.0046 -.0005 -.0043 -.0070 -.0119 -.0155 -.0193 -.0235 -.0277 -.0296 -.0389 -.0474 -.0530 -.0697
 90 0.0706 0.0522 0.0400 0.0317 0.0182 0.0143 0.0105 0.0076 0.0037 0.0012 -.0035 -.0062 -.0100 -.0133 -.0170 -.0305 -.0388 -.0510 -.0694
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            </tableData>
        </table>
    </function>

    <function name="aero/coefficient/Cl_da-lef">
        <description>
            coefficient
        </description>
            <table name="table/Cl_da-lef">
                <independentVar lookup="row">aero/alpha-deg</independentVar>
                <independentVar lookup="column">aero/beta-deg</independentVar>
                <tableData note="Numbers in this table typed in by E.V.Oort and L.Sonneveldt">
       -30    -25    -20    -15    -10     -8     -6     -4     -2      0      2      4      6      8     10     15     20     25     30
-20 -.0522 -.0388 -.0295 -.0190 -.0133 -.0214 -.0230 -.0214 -.0213 -.0219 -.0217 -.0242 -.0274 -.0289 -.0304 -.0245 -.0137 -.0038 0.0101
-05 -.0419 -.0447 -.0428 -.0407 -.0446 -.0458 -.0469 -.0493 -.0508 -.0524 -.0533 -.0537 -.0550 -.0566 -.0578 -.0614 -.0591 -.0579 -.0603
 10 0.0048 0.0017 -.0026 -.0198 -.0179 -.0221 -.0277 -.0329 -.0389 -.0432 -.0479 -.0529 -.0576 -.0625 -.0674 -.0759 -.0830 -.0872 -.0901
 25 0.0308 0.0244 0.0078 -.0102 -.0021 -.0006 -.0086 -.0144 -.0196 -.0261 -.0306 -.0369 -.0417 -.0441 -.0464 -.0386 -.0485 -.0657 -.0820
 40 0.0436 0.0345 0.0217 0.0087 0.0033 0.0121 0.0088 0.0090 0.0071 -.0080 -.0097 -.0210 -.0288 -.0347 -.0351 -.0405 -.0534 -.0665 -.0754
 45 0.0499 0.0450 0.0350 0.0263 0.0128 0.0097 0.0089 0.0058 0.0002 -.0059 -.0096 -.0168 -.0172 -.0232 -.0233 -.0378 -.0460 -.0560 -.0599
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             </tableData>
        </table>
    </function>

    <function name="aero/coefficient/Cl_dr">
        <description>
            coefficient
        </description>
            <table name="table/Cl_dr">
                <independentVar lookup="row">aero/alpha-deg</independentVar>
                <independentVar lookup="column">aero/beta-deg</independentVar>
                <tableData note="Numbers in this table typed in by E.V.Oort and L.Sonneveldt">
       -30    -25    -20    -15    -10     -8     -6     -4     -2      0      2      4      6      8     10     15     20     25     30
-20 -.0100 0.0057 0.0178 0.0291 0.0365 0.0364 0.0336 0.0316 0.0251 0.0216 0.0159 0.0154 0.0142 0.0100 0.0005 0.0079 0.0191 0.0311 0.0465
 00 0.0291 0.0328 0.0338 0.0329 0.0293 0.0298 0.0261 0.0220 0.0181 0.0145 0.0111 0.0078 0.0035 -.0010 -.0054 -.0087 -.0093 -.0080 -.0044
 20 0.1090 0.0930 0.0810 0.0710 0.0532 0.0476 0.0414 0.0315 0.0227 0.0139 0.0058 -.0030 -.0120 -.0231 -.0324 -.0501 -.0598 -.0719 -.0799
 40 0.0584 0.0577 0.0360 0.0088 0.0047 0.0092 0.0143 0.0140 0.0129 0.0030 -.0006 -.0053 -.0073 -.0088 -.0110 -.0143 -.0426 -.0641 -.0648
 60 0.0600 0.0448 0.0350 0.0270 0.0182 0.0157 0.0130 0.0077 0.0048 -.0012 -.0055 -.0078 -.0140 -.0172 -.0202 -.0290 -.0375 -.0470 -.0624
 90 0.0660 0.0532 0.0390 0.0269 0.0174 0.0156 0.0102 0.0089 0.0069 0.0008 -.0030 -.0051 -.0074 -.0132 -.0156 -.0247 -.0368 -.0513 -.0638
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            </tableData>
        </table>
    </function>

    <axis name="ROLL">

        <function name="aero/coefficient/Cl">
            <description>
               Cl coefficient
            </description>
            <product>
                <property>aero/qbar-psf</property>
                <property>metrics/Sw-sqft</property>
                <property>metrics/bw-ft</property>
                <table name="table/Cl">
                    <independentVar lookup="row">aero/alpha-deg</independentVar>
                    <independentVar lookup="column">aero/beta-deg</independentVar>
                    <independentVar lookup="table">fcs/fly-by-wire/pitch/horz-tail-deflection-deg</independentVar>
                    <tableData breakPoint="-25.0" note="Numbers in this table typed in by E.V.Oort and L.Sonneveldt">
       -30    -25    -20    -15    -10     -8     -6     -4     -2      0      2      4      6      8     10     15     20     25     30
-20 -.0060 0.0065 0.0133 0.0217 0.0268 0.0238 0.0219 0.0179 0.0121 0.0000 -.0096 -.0167 -.0210 -.0239 -.0245 -.0196 -.0107 -.0039 -.0118
 00 0.0276 0.0285 0.0262 0.0225 0.0189 0.0151 0.0112 0.0075 0.0035 0.0000 -.0035 -.0075 -.0114 -.0151 -.0187 -.0223 -.0260 -.0283 -.0274
 20 0.0761 0.0708 0.0654 0.0551 0.0454 0.0377 0.0284 0.0185 0.0093 0.0000 -.0101 -.0180 -.0293 -.0369 -.0448 -.0542 -.0642 -.0694 -.0743
 40 0.0665 0.0605 0.0353 0.0132 0.0077 0.0092 0.0156 0.0096 0.0048 0.0000 -.0077 -.0117 -.0123 -.0150 -.0130 -.0180 -.0403 -.0656 -.0716
 60 0.0610 0.0413 0.0336 0.0230 0.0137 0.0122 0.0106 0.0064 0.0048 0.0000 -.0026 -.0049 -.0095 -.0132 -.0141 -.0234 -.0340 -.0417 -.0614
 90 0.0601 0.0460 0.0363 0.0253 0.0213 0.0183 0.0147 0.0091 0.0056 0.0000 -.0006 -.0012 -.0086 -.0152 -.0191 -.0231 -.0341 -.0438 -.0579
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                    </tableData>
                    <tableData breakPoint="0.0" note="Numbers in this table typed in by E.V.Oort and L.Sonneveldt">
       -30    -25    -20    -15    -10     -8     -6     -4     -2      0      2      4      6      8     10     15     20     25     30
-20 -.0153 -.0028 0.0091 0.0188 0.0234 0.0173 0.0106 0.0090 0.0041 0.0000 -.0031 -.0064 -.0084 -.0128 -.0171 -.0120 -.0022 0.0097 0.0225
 00 0.0157 0.0190 0.0199 0.0207 0.0185 0.0153 0.0110 0.0071 0.0033 0.0000 -.0030 -.0067 -.0107 -.0147 -.0182 -.0204 -.0196 -.0187 -.0154
 20 0.0895 0.0815 0.0692 0.0579 0.0453 0.0354 0.0270 0.0171 0.0076 0.0000 -.0085 -.0177 -.0271 -.0365 -.0440 -.0569 -.0682 -.0804 -.0884
 40 0.0721 0.0573 0.0302 0.0087 0.0050 0.0104 0.0174 0.0124 0.0062 0.0000 -.0075 -.0108 -.0131 -.0145 -.0148 -.0185 -.0399 -.0671 -.0815
 60 0.0650 0.0481 0.0387 0.0301 0.0229 0.0192 0.0155 0.0094 0.0063 0.0000 -.0029 -.0055 -.0111 -.0163 -.0188 -.0260 -.0346 -.0440 -.0609
 90 0.0701 0.0534 0.0410 0.0293 0.0205 0.0188 0.0163 0.0110 0.0066 0.0000 0.0000 -.0001 -.0067 -.0124 -.0154 -.0242 -.0359 -.0483 -.0650
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                    </tableData>
                    <tableData breakPoint="25.0" note="Numbers in this table typed in by E.V.Oort and L.Sonneveldt">
       -30    -25    -20    -15    -10     -8     -6     -4     -2      0      2      4      6      8     10     15     20     25     30
-20 -.0138 -.0090 0.0106 0.0227 0.0248 0.0145 0.0112 0.0050 0.0031 0.0000 -.0033 -.0081 -.0077 -.0160 -.0186 -.0167 -.0044 -.0074 -.0256
 00 0.0267 0.0261 0.0245 0.0215 0.0188 0.0147 0.0105 0.0058 0.0026 0.0000 -.0029 -.0065 -.0108 -.0152 -.0188 -.0215 -.0247 -.0263 -.0269
 20 0.0830 0.0794 0.0694 0.0558 0.0427 0.0332 0.0243 0.0172 0.0079 0.0000 -.0102 -.0202 -.0215 -.0294 -.0394 -.0520 -.0653 -.0753 -.0784
 40 0.0673 0.0583 0.0297 0.0050 -.0002 0.0031 0.0106 0.0053 0.0055 0.0000 -.0054 -.0077 -.0099 -.0058 -.0068 -.0120 -.0367 -.0654 -.0741
 60 0.0611 0.0428 0.0321 0.0263 0.0219 0.0165 0.0161 0.0102 0.0071 0.0000 -.0042 -.0081 -.0142 -.0190 -.0211 -.0255 -.0313 -.0420 -.0603
 90 0.0607 0.0486 0.0407 0.0305 0.0211 0.0180 0.0165 0.0116 0.0070 0.0000 -.0008 -.0017 -.0198 -.0130 -.0150 -.0244 -.0346 -.0425 -.0546
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                     </tableData>
                </table>
            </product>
        </function>

        <function name="aero/coefficient/dCl_lef">
            <description>
               Cl due to leading edge flaps coefficient.
            </description>
            <product>
                <property>aero/qbar-psf</property>
                <property>metrics/Sw-sqft</property>
                <property>metrics/bw-ft</property>
                <property>fcs/fly-by-wire/lef/lef-pos-r-norm</property>
                <difference>
                    <p>aero/coefficient/Cl_lef</p>
                    <p>aero/coefficient/Cl_dh0</p>
                </difference>
            </product>
        </function>

        <function name="aero/coefficient/dCl_da-lef">
            <description>
               Cl due to aileron coefficient
            </description>
            <product>
                <property>aero/qbar-psf</property>
                <property>metrics/Sw-sqft</property>
                <property>metrics/bw-ft</property>
                <p>fcs/fly-by-wire/roll/aileron-pos-norm</p><!-- 1 = 20 degs -->
                <sum>
                    <difference>
                        <p>aero/coefficient/Cl_da</p>
                        <p>aero/coefficient/Cl_dh0</p>
                    </difference>
                    <product>
                        <p>fcs/fly-by-wire/lef/lef-pos-r-norm</p>
                        <difference>
                            <p>aero/coefficient/Cl_da-lef</p>
                            <p>aero/coefficient/Cl_lef</p>
                            <difference>
                                <p>aero/coefficient/Cl_da</p>
                                <p>aero/coefficient/Cl_dh0</p>
                            </difference>
                        </difference>
                    </product>
                </sum>
            </product>
        </function>

        <function name="aero/coefficient/dCl_dr">
            <description>
               Cl due to rudder coefficient
            </description>
            <product>
                <property>aero/qbar-psf</property>
                <property>metrics/Sw-sqft</property>
                <property>metrics/bw-ft</property>
                <p>fcs/fly-by-wire/yaw/rudder-pos-norm</p><!-- 1 = 30 degs -->
                <difference>
                    <p>aero/coefficient/Cl_dr</p>
                    <p>aero/coefficient/Cl_dh0</p>
                </difference>
            </product>
        </function>

        <function name="aero/coefficient/Cl_r">
            <description>
               Cl due to yaw rate coefficient.
            </description>
            <product>
                <property>aero/qbar-psf</property>
                <property>metrics/Sw-sqft</property>
                <property>metrics/bw-ft</property>
                <property>aero/bi2vel</property>
                <property>velocities/r-rad_sec</property>
                <table name="table/Cl_r">
                    <independentVar lookup="row">aero/alpha-deg</independentVar>
                    <tableData>
-20 -.155
-15 -.155
 00 -.0024
 15 .22
 30 .68
 45 -.33
 60 .0802
 90 -.0183
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                    </tableData>
                </table>
            </product>
        </function>

        <function name="aero/coefficient/dCl_b">
            <description>
               Cl due to beta coefficient.
            </description>
            <product>
                <property>aero/qbar-psf</property>
                <property>metrics/Sw-sqft</property>
                <property>metrics/bw-ft</property>
                <property>aero/beta-deg</property>
                <table name="table/dCl_b">
                    <independentVar lookup="row">aero/alpha-deg</independentVar>
                    <tableData>
-20 .0
-15 .0
 00 .0
 15 .0007
 30 .0
 45 .0
 60 .0
 90 .0
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                    </tableData>
                </table>
            </product>
        </function>

        <function name="aero/coefficient/dCl_r-lef">
            <description>
               Cl due to yaw rate due to leading edge flaps coefficient.
            </description>
            <product>
                <property>aero/qbar-psf</property>
                <property>metrics/Sw-sqft</property>
                <property>metrics/bw-ft</property>
                <property>aero/bi2vel</property>
                <property>velocities/r-rad_sec</property>
                <property>fcs/fly-by-wire/lef/lef-pos-r-norm</property>
                <table name="table/dCl_r-lef">
                    <independentVar lookup="row">aero/alpha-deg</independentVar>
                    <tableData>
-20 .029
-15 .029
-05 .175
 05 .036
 15 .066
 25 .006
 35 -.537
 45 -.394
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                    </tableData>
                </table>
            </product>
        </function>

        <function name="aero/coefficient/Cl_p">
            <description>
               Cl due to roll rate coefficient.
            </description>
            <product>
                <property>aero/qbar-psf</property>
                <property>metrics/Sw-sqft</property>
                <property>metrics/bw-ft</property>
                <property>aero/bi2vel</property>
                <property>velocities/p-rad_sec</property>
                <table name="table/Cl_p">
                    <independentVar lookup="row">aero/alpha-deg</independentVar>
                    <tableData>
-20 -.366
-15 -.366
 00 -.345
 15 -.388
 30 -.23
 45 -.10
 60 -.14
 90 -.2
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                    </tableData>
                </table>
            </product>
        </function>

        <function name="aero/coefficient/dCl_p-lef">
            <description>
               Cl due to roll rate due to leading edge flaps coefficient.
            </description>
            <product>
                <property>aero/qbar-psf</property>
                <property>metrics/Sw-sqft</property>
                <property>metrics/bw-ft</property>
                <property>aero/bi2vel</property>
                <property>velocities/p-rad_sec</property>
                <property>fcs/fly-by-wire/lef/lef-pos-r-norm</property>
                <table name="table/dCl_p-lef">
                    <independentVar lookup="row">aero/alpha-deg</independentVar>
                    <tableData>
-20 .006
-15 .006
-05 .018
 05 .02
 15 .087
 25 -.056
 35 .362
 45 .097
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                    </tableData>
                </table>
            </product>
        </function>

    </axis>

</aerodynamics>
<!--
<output name="c:/users/nikolai/documents/f16_datalog.csv" type="CSV" rate="120">
 <property> fcs/fly-by-wire/pitch/q-washout </property>
 <property> velocities/q-aero-deg_sec </property>-->
 <!--<property> attitude/phi-rad </property>
 <property> position/h-sl-ft </property>
 <property> velocities/vc-kts </property>
 <property> fcs/throttle-cmd-norm </property>
 <property> fcs/elevator-cmd-norm </property>
 <property> fcs/pitch-trim-cmd-norm </property>
 <property> propulsion/total-fuel-lbs </property>
 <property> flight-path/gamma-rad </property>
 <property> accelerations/n-pilot-z-norm </property>
 <rates> ON </rates>
 <velocities> ON </velocities>
 <forces> ON </forces>
 <moments> ON </moments>
 <position> ON </position>
 <fcs> ON </fcs>
 <propulsion> OFF </propulsion>
 <aerosurfaces> ON </aerosurfaces>
 <fcs> ON </fcs>
 <ground_reactions> ON </ground_reactions>-->
<!--</output>-->

</fdm_config>
